Simulations: Version=213
  DataStore
    ExcelInput: FileNames=[AusFarm.xlsx]; SheetNames=[Ausfarm]
  Experiment
    Factors
      Permutation
        Factor PlusMinus
          CompositeFactor Fert50Irri50
            Specifications:
              [FertiliserEvents]
              [IrrigationEvents]
            Operations FertiliserEvents
              1990-09-01  [Fertiliser].Apply(50, "NO3N",10);
              1991-09-01  [Fertiliser].Apply(50, "NO3N",10);
              1992-09-01  [Fertiliser].Apply(50, "NO3N",10);
            Operations IrrigationEvents
              1990-11-18  [Irrigation].Apply(50);
          CompositeFactor Fert0Irri0
            Specifications:
              [FertiliserEvents]
              [IrrigationEvents]
            Operations FertiliserEvents
              1990-09-01  [Fertiliser].Apply(0, "NO3N",10);
              1991-09-01  [Fertiliser].Apply(0, "NO3N",10);
              1992-09-01  [Fertiliser].Apply(0, "NO3N",10);
            Operations IrrigationEvents
              1990-11-18  [Irrigation].Apply(0);
          CompositeFactor Fert50Irri0
            Specifications:
              [FertiliserEvents]
              [IrrigationEvents]
            Operations FertiliserEvents: same as Experiment.Factors.Permutation.PlusMinus.Fert50Irri50.FertiliserEvents
            Operations IrrigationEvents
              1990-11-18  [Irrigation].Apply(0);
          CompositeFactor Fert0Irri50
            Specifications:
              [FertiliserEvents]
              [IrrigationEvents]
            Operations FertiliserEvents: same as Experiment.Factors.Permutation.PlusMinus.Fert0Irri0.FertiliserEvents
            Operations IrrigationEvents
              1990-11-18  [Irrigation].Apply(50);
    Simulation Ryegrass
      Weather: FileName=cbr_70014.met
      Clock: Start=1990-08-01; End=1992-02-03
      Summary summaryfile
      SoilArbitrator Soil Arbitrator
      MicroClimate: a_interception=0; b_interception=1; c_interception=0; d_interception=0; SoilHeatFluxFraction=0.4; MinimumHeightDiffForNewLayer=0; NightInterceptionFraction=0.5; ReferenceHeight=2
      Zone Paddock: Area=1; Slope=4.2; AspectAngle=0; Altitude=50
        Operations IrrigationEvents
        Operations FertiliserEvents
        Operations Harvest (disabled)
          1990-02-23  [Barley].Harvest();
        SurfaceOrganicMatter Surface Organic Matter: InitialResidueType=Barley; InitialResidueMass=0; InitialStandingFraction=0; InitialCPR=0; InitialCNR=60
        Irrigation
        Fertiliser
        Pasture: Species=Perennial Ryegrass; Fertility=0.8; Nutrients=N; MaxRtDep=650; LaggedDayT=-999.9; Phenology=1.5; FlowerLen=0; FlowerTime=0; SencIndex=0; DormIndex=0; DormT=-999.9; ExtinctCoeff=[0, 10, 0]; SeedDormTime=0; GermIndex=0; Albedo=0.23; Gsmax=0.011; R50=200; WaterDemand=0; LAI=0
          GreenCohortInitialise: RootWeight=[400, 400]; RootDepth=650; EstIndex=0; StressIndex=0; StemReloc=0; Frosts=0; Status=established; LeafDMD=[0.825]; LeafWeight=[800]; LeafNConc=[0.01]; LeafSpecificArea=[430]; StemDMD=[0.825]; StemWeight=[800]; StemNConc=[0.01]; StemSpecificArea=[10]
          DryCohortInitialise: Status=dead; LeafDMD=[0.6]; LeafWeight=[500]; LeafNConc=[0.01]; LeafSpecificArea=[430]; StemDMD=[0.35]; StemWeight=[1500]; StemNConc=[0.01]; StemSpecificArea=[10]
          GenericOrgan Leaf: IsAboveGround=true
        Report DailyReport
          VariableNames:
            [Clock].Today
            [Weather].Rain
            [Pasture].ShootDM
            [Pasture].GreenDM
            [Pasture].GreenN
            [Pasture].LeafDM
            [Pasture].StemDM
            [Pasture].RootDM
            [Pasture].LeafN
            [Pasture].Leaf.N
            [Pasture].Leaf.NConc
            [Pasture].StemN
            [Pasture].RootN
            [Pasture].LAI
            [Pasture].GLF_WL
            [Pasture].GLF_N
            sum([Soil].NO3.kgha)
            [Soil].NO3.ppm
            sum([Pasture].Uptake_NO3)
            [Pasture].Uptake_NO3
            sum([Pasture].Uptake_NO3) as NO3Uptake
          EventNames:
            [Clock].DoReport
        Soil Red Kandosol (Galong No545) (disabled): ASCOrder=Kandosol; ASCSubOrder=Red; SoilType=Other; Site=Galong; NearestTown=Galong; Region=South West Slopes; State=New South Wales; Country=Australia; ApsoilNumber=545; Latitude=-34.598; Longitude=148.558; LocationAccuracy=Regional Soil Type; YearOfSampling=0; DataSource=Michael Robertson, CSIRO Sustainable Ecosystems; Comments=Canola CLL measured, other crops estimated
          Physical
            Thickness  BD    AirDry  LL15  DUL   SAT
            100        1.22  0.05    0.1   0.17  0.51
            100        1.45  0.104   0.13  0.19  0.42
            100        1.45  0.14    0.14  0.2   0.42
            150        1.45  0.14    0.14  0.23  0.42
            200        1.45  0.14    0.14  0.27  0.42
            200        1.5   0.14    0.14  0.29  0.4
            SoilCrop Perennial RyegrassSoil: LL=[0.1, 0.13, 0.14, 0.15, 0.19, 0.22]; KL=[0.07, 0.07, 0.07, 0.06, 0.04, 0]; XF=[1, 1, 1, 1, 1, 1]
          Organic: FOMCNRatio=30; CarbonUnits=WalkleyBlack
            Thickness  Carbon  SoilCNRatio  FBiom  FInert  FOM
            100        1.3     14.5         0.04   0.5     432.8
            100        0.6     14.5         0.02   0.5     373.9
            100        0.4     14.5         0.02   0.5     323
            150        0.3     14.5         0.01   0.6     259.3
            200        0.3     14.5         0.01   0.6     193.5
            200        0.22    14.5         0.01   0.6     144.4
          Chemical: Thickness=[100, 100, 100, 150, 200, 200]; PH=[5.8, 5.9, 6.6, 6.8, 7, 7.1]; PHUnits=Water
          Nutrient
          Solute NO3: Thickness=[100, 100, 100, 150, 200, 200]; InitialValues=[30, 10, 4, 2, 1.5, 1.5]; InitialValuesUnits=ppm; WaterTableConcentration=0; D0=0; DepthConstant=0; MaxDepthSoluteAccessible=0; RunoffEffectivenessAtMovingSolute=0; MaxEffectiveRunoff=0
          Solute NH4: InitialValuesUnits=kg/ha; WaterTableConcentration=0; D0=0; DepthConstant=0; MaxDepthSoluteAccessible=0; RunoffEffectivenessAtMovingSolute=0; MaxEffectiveRunoff=0
          Solute Urea: Thickness=[100, 100, 100, 150, 200, 200]; InitialValues=[0, 0, 0, 0, 0, 0]; InitialValuesUnits=kg/ha; WaterTableConcentration=0; D0=0; DepthConstant=0; MaxDepthSoluteAccessible=0; RunoffEffectivenessAtMovingSolute=0; MaxEffectiveRunoff=0
          Water: Thickness=[100, 100, 100, 150, 200, 200]; InitialValues=[0.17, 0.19, 0.2, 0.23, 0.27, 0.29]; FilledFromTop=false
          CERESSoilTemperature
          WaterBalance SoilWater: SummerDate=1-Nov; SummerU=6; SummerCona=3.5; WinterDate=1-Apr; WinterU=2; WinterCona=2; DiffusConst=88; DiffusSlope=35.4; Salb=0.13; CN2Bare=72; CNRed=20; CNCov=0.8; DischargeWidth=0; CatchmentArea=0; PSIDul=-100; Thickness=[100, 100, 100, 150, 200, 200, 200, 200, 200, 600]; SWCON=[0.4, 0.4, 0.4, 0.4, 0.4, 0.4, 0.4, 0.4, 0.4, 0.4]
        Soil: SoilType=NZ_sedementary; Region=Plains; State=Canterbury; Country=New Zealnd; Latitude=0; Longitude=0
          Chemical: PHUnits=Water
            Thickness  PH   CEC
            100        5.8  14.287
            100        5.9  10.51
            100        6.6  12.726
            150        6.8  12.501
            200        7    16.239
            200        7.1  16.059
            CEC source: Calculated
          Physical
            Thickness  ParticleSizeSand  ParticleSizeSilt  ParticleSizeClay  Rocks  BD    AirDry  LL15  DUL   SAT
            100        58                14                28                0      1.22  0.022   0.1   0.17  0.51
            100        61                20                19                0      1.45  0.028   0.13  0.19  0.42
            100        45                22                33                0      1.45  0.03    0.14  0.2   0.42
            150        45                22                33                0      1.45  0.032   0.15  0.23  0.42
            200        45                8                 47                0      1.45  0.039   0.19  0.27  0.42
            200        45                8                 47                0      1.5   0.044   0.22  0.29  0.4
            Rocks source: Calculated
            SoilCrop Perennial RyegrassSoil: LL=[0.1, 0.13, 0.14, 0.15, 0.19, 0.22]; KL=[0.07, 0.07, 0.07, 0.06, 0.04, 0]; XF=[1, 1, 1, 1, 1, 1]
          WaterBalance SoilWater: SummerDate=1-Nov; SummerU=6; SummerCona=3.5; WinterDate=1-Apr; WinterU=2; WinterCona=2; DiffusConst=0; DiffusSlope=0; Salb=0.13; CN2Bare=52; CNRed=20; CNCov=0.8; DischargeWidth=0; CatchmentArea=0; PSIDul=-100
            Thickness  SWCON  KLAT
            100        0.4    0
            100        0.4    0
            100        0.4    0
            150        0.4    0
            200        0.4    0
            200        0.4    0
          Organic: FOMCNRatio=53.5; CarbonUnits=Total
            Thickness  Carbon  SoilCNRatio  FBiom  FInert  FOM
            100        1.3     14.5         0.02   0       975
            100        0.6     14.5         0.01   0       600
            100        0.4     14.5         0.01   0       400
            150        0.3     14.5         0.006  0       150
            200        0.3     14.5         0.006  0       30
            200        0.22    14.5         0.006  0       20
          SoilTemperature SoilTemperatureCampbell (disabled): InteractionsPerDay=8
          CERESSoilTemperature
          Water: Thickness=[100, 100, 100, 150, 200, 200]; InitialValues=[0.17, 0.19, 0.2, 0.23, 0.27, 0.29]; FilledFromTop=false
          Nutrient
          Solute Urea: Thickness=[100, 100, 100, 150, 200, 200]; InitialValues=[0, 0, 0, 0, 0, 0]; InitialValuesUnits=ppm; WaterTableConcentration=0; D0=0; DepthConstant=0; MaxDepthSoluteAccessible=0; RunoffEffectivenessAtMovingSolute=0; MaxEffectiveRunoff=0
          Solute NO3: Thickness=[100, 100, 100, 150, 200, 200]; InitialValues=[30, 10, 4, 2, 1.5, 1.5]; InitialValuesUnits=ppm; WaterTableConcentration=0; D0=0; DepthConstant=0; MaxDepthSoluteAccessible=0; RunoffEffectivenessAtMovingSolute=0; MaxEffectiveRunoff=0
          Solute NH4: same as Experiment.Ryegrass.Paddock.Soil.Urea
          CERESSoilTemperature Temperature
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