Simulations: Version=213
  Memo Notes
    # Notes:

    * The AusFarm directory contains all the Ausfarm simulation files (*.afs) named the same as the simulations in Pasture.apsimx.
    * To get Ausfarm output .csv files, run the simulation in AusFarm, then right click on 'Output' in Ausfarm simulation tree and export to SQLITE DB. Use ```DBBrowser for SQLite``` and export the Simulation table to a .csv file (e.g. Clover.csv).
    * AUSFARM uses tomorrows rain and evap data. I have moved the rain and evap in the weatherfile up by 1 day.
    * Line 2757 pasture.cs: FWeather[#TWeatherData.wdtWind] = 0;   // AUSFARM DOESN'T HAVE DEFAULT WINDSPEED !!!!!
    * Line 2545 pasture.cs: In Ausfarm, the VPD calculation uses SVPfrac = 0.75 instead of 0.66 in APSIM (weather.cs)
    * Line 2736 pasture.cs: if (systemClock.Today != systemClock.StartDate) // Ausfarm doesn't seem to drop dead roots to soil on day 1.
    * Ausfarm doesn't take inert fraction into account when initialising humic pool
    * In Ausfarm, water uptake happens before crop growth.
    * In Ausfarm, nutrient uptake happens after crop growth.
    * Soil evaporation is different between the two models. To get near identical, comment out lines 271-275 in EvaporationModel.cs

    ```c#
        // If U has changed (due to summer / winter turn over) and infiltration is zero then reset sumes1 to U to stop
        // artificially entering stage 1 evap. GitHub Issue #8112
        if (UYesterday != U)
        {
            sumes1 = U;
            sumes2 = CONA * Math.Pow(t, 0.5);
        }
    ```

    # Process for debugging models side by side

    * Run Ausfarm simulation on Bitzer (remote desktop) from RAD Studio so that code can be debugged (Models.groupproj - RAS studio project file)
      File is: "L:\projects\ApsimX\Prototypes\Pasture\Validation\just_pasture_ryegrass.afs"
  DataStore
  Simulation Ryegrass
    Weather: FileName=cbr_70014.met
    Clock: Start=1990-08-01; End=1992-02-03
    Summary summaryfile
    SoilArbitrator Soil Arbitrator
    MicroClimate: a_interception=0; b_interception=1; c_interception=0; d_interception=0; SoilHeatFluxFraction=0.4; MinimumHeightDiffForNewLayer=0; NightInterceptionFraction=0.5; ReferenceHeight=2
    Zone Paddock: Area=1; Slope=4.2; AspectAngle=0; Altitude=50
      Operations IrrigationEvents
        2009-11-11  [Irrigation].Apply(20);
        2009-11-19  [Irrigation].Apply(25);
        2009-11-26  [Irrigation].Apply(25);
        2009-12-11  [Irrigation].Apply(20);
        2009-12-21  [Irrigation].Apply(35);
        2009-12-29  [Irrigation].Apply(40);
        2010-01-05  [Irrigation].Apply(35);
        2010-01-13  [Irrigation].Apply(30);
        2010-03-02  [Irrigation].Apply(40);
        2010-03-03  [Irrigation].Apply(40);
      Operations FertiliserEvents
        2009-11-23  [Fertiliser].Apply(150, "NO3N",10);
      Operations Harvest
        2010-02-23  [Barley].Harvest();
      SurfaceOrganicMatter Surface Organic Matter: InitialResidueType=Barley; InitialResidueMass=0; InitialStandingFraction=0; InitialCPR=0; InitialCNR=60
      Soil: SoilType=NZ_sedementary; Region=Plains; State=Canterbury; Country=New Zealnd; Latitude=0; Longitude=0
        Chemical: PHUnits=Water
          Thickness  PH   CEC
          100        5.8  14.287
          100        5.9  10.51
          100        6.6  12.726
          150        6.8  12.501
          200        7    16.239
          200        7.1  16.059
          CEC source: Calculated
        Physical
          Thickness  ParticleSizeSand  ParticleSizeSilt  ParticleSizeClay  Rocks  BD    AirDry  LL15  DUL   SAT
          100        58                14                28                0      1.22  0.022   0.1   0.17  0.51
          100        61                20                19                0      1.45  0.028   0.13  0.19  0.42
          100        45                22                33                0      1.45  0.03    0.14  0.2   0.42
          150        45                22                33                0      1.45  0.032   0.15  0.23  0.42
          200        45                8                 47                0      1.45  0.039   0.19  0.27  0.42
          200        45                8                 47                0      1.5   0.044   0.22  0.29  0.4
          Rocks source: Calculated
          SoilCrop Perennial RyegrassSoil: LL=[0.1, 0.13, 0.14, 0.15, 0.19, 0.22]; KL=[0.07, 0.07, 0.07, 0.06, 0.04, 0]; XF=[1, 1, 1, 1, 1, 1]
        WaterBalance SoilWater: SummerDate=1-Nov; SummerU=6; SummerCona=3.5; WinterDate=1-Apr; WinterU=2; WinterCona=2; DiffusConst=0; DiffusSlope=0; Salb=0.13; CN2Bare=52; CNRed=20; CNCov=0.8; DischargeWidth=0; CatchmentArea=0; PSIDul=-100
          Thickness  SWCON  KLAT
          100        0.4    0
          100        0.4    0
          100        0.4    0
          150        0.4    0
          200        0.4    0
          200        0.4    0
        Organic: FOMCNRatio=53.5; CarbonUnits=Total
          Thickness  Carbon  SoilCNRatio  FBiom  FInert  FOM
          100        1.3     14.5         0.02   0       975
          100        0.6     14.5         0.01   0       600
          100        0.4     14.5         0.01   0       400
          150        0.3     14.5         0.006  0       150
          200        0.3     14.5         0.006  0       30
          200        0.22    14.5         0.006  0       20
        SoilTemperature SoilTemperatureCampbell (disabled): InteractionsPerDay=8
        CERESSoilTemperature
        Water: Thickness=[100, 100, 100, 150, 200, 200]; InitialValues=[0.17, 0.19, 0.2, 0.23, 0.27, 0.29]; FilledFromTop=false
        Nutrient
        Solute Urea: Thickness=[100, 100, 100, 150, 200, 200]; InitialValues=[0, 0, 0, 0, 0, 0]; InitialValuesUnits=ppm; WaterTableConcentration=0; D0=0; DepthConstant=0; MaxDepthSoluteAccessible=0; RunoffEffectivenessAtMovingSolute=0; MaxEffectiveRunoff=0
        Solute NO3: Thickness=[100, 100, 100, 150, 200, 200]; InitialValues=[30, 10, 4, 2, 1.5, 1.5]; InitialValuesUnits=ppm; WaterTableConcentration=0; D0=0; DepthConstant=0; MaxDepthSoluteAccessible=0; RunoffEffectivenessAtMovingSolute=0; MaxEffectiveRunoff=0
        Solute NH4: same as Ryegrass.Paddock.Soil.Urea
      Irrigation
      Fertiliser
      Pasture: Species=Perennial Ryegrass; Fertility=0.8; Nutrients=N; MaxRtDep=650; LaggedDayT=-999.9; Phenology=1.0015; FlowerLen=0; FlowerTime=0; SencIndex=0; DormIndex=0; DormT=-999.9; ExtinctCoeff=[0, 10, 0]; SeedDormTime=0; GermIndex=0; Albedo=0.23; Gsmax=0.011; R50=200; WaterDemand=0; LAI=0
        GenericOrgan Leaf: IsAboveGround=true
        GenericOrgan Stem: IsAboveGround=true
        GenericOrgan Root: IsAboveGround=false
        CompositeBiomass AboveGround: OrganNames=[Leaf, Stem]; IncludeLive=true; IncludeDead=true
        CompositeBiomass AboveGroundLive: OrganNames=[Leaf, Stem]; IncludeLive=true; IncludeDead=false
        CompositeBiomass AboveGroundDead: OrganNames=[Leaf, Stem]; IncludeLive=false; IncludeDead=true
        GreenCohortInitialise: RootWeight=[400, 400]; RootDepth=650; EstIndex=0; StressIndex=0; StemReloc=0; Frosts=0; Status=established; LeafDMD=[0.825]; LeafWeight=[800]; LeafNConc=[0.01]; LeafSpecificArea=[430]; StemDMD=[0.825]; StemWeight=[800]; StemNConc=[0.01]; StemSpecificArea=[10]
        DryCohortInitialise: Status=established; LeafDMD=[0.825]; LeafWeight=[800]; LeafNConc=[0.01]; LeafSpecificArea=[430]; StemDMD=[0.825]; StemWeight=[800]; StemNConc=[0.01]; StemSpecificArea=[10]
        CompositeBiomass Total: OrganNames=[Leaf, Stem, Root]; IncludeLive=true; IncludeDead=true
      Report DailyReport
        VariableNames:
          [Clock].Today
          [Weather].Rain
          [Pasture].Leaf.Wt
          [Pasture].Leaf.N
          [Pasture].Leaf.NConc
          [Pasture].Stem.Wt
          [Pasture].Stem.N
          [Pasture].Stem.NConc
          [Pasture].Root.Wt
          [Pasture].Root.N
          [Pasture].Root.NConc
          [Pasture].AboveGround.Wt
          [Pasture].AboveGround.N
          [Pasture].AboveGround.NConc
          [Pasture].AboveGroundLive.Wt
          [Pasture].AboveGroundLive.N
          [Pasture].AboveGroundLive.NConc
          [Pasture].AboveGroundDead.Wt
          [Pasture].AboveGroundDead.N
          [Pasture].AboveGroundDead.NConc
          [Pasture].Total.Wt
          [Pasture].Total.N
          [Pasture].Total.NConc
          [Pasture].Leaf.N + [Pasture].Stem.N
          [Pasture].AboveGroundLive.N + [Pasture].AboveGroundDead.N
        EventNames:
          [Clock].EndOfDay
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