Simulations: Version=213
  Memo Title Page
    # The APSIM STOCK Model

    Neville Herrmann (CSIRO)

    Andrew Moore (CSIRO)

    Eric Zurcher (CSIRO)

    Dean Holzworth (AgResearch/CSIRO)

    Mark Lieffering (AgResearch)

    Val Snow (AgResearch)

    # Acknowledgements

    CSIRO, AgResearch and the APSIM Initiative (https://www.apsim.info/) for funding the implemetation of the Stock model into APSIMX
  Memo Introduction
    # Introduction

    The Stock model is an implementation of the CSIRO’s Australian Feeding Standards as expressed in the Grazplan (https://grazplan.csiro.au/) model. The technical document for Grazplan is available at available at https://grazplan.csiro.au/wp-content/uploads/2007/08/TechPaperMay12.pdf. The model has been ported into APSIM NextGeneration to allow full interaction with other models within the APSIM environment. Animals in Stock show the full range of growth, reproduction and death processes (see Grazplan) and the basic management actions (mating, weaning, moving, feeding supplements, selling and buying) have been implemented. All crop/plant models in APSIM NextGeneration have a ‘damage’ interface implemented and so allow grazing as soon as the Stock are moved to the same location (zone or paddock) as the crop.

    Different animal species, genotypes and ages can be modelled together and various management systems implemented, including, but not limited to, forage crop grazing, rotational grazing, moving stock from paddock to feedlot and back again. Management can be simulated via Operations managers as in the simulations here or scripts. The collection of simulations in the Stock example shows examples of simulating three different management regimes (forage grazing, rotational grazing and a wheat/feedlot system) using scripts.

    Management of animal groups is done by user-assigned tag values that take integer values. Tag values have two purposes:

    * They can be used to manage distinct groups of animals in a common fashion. For example, all lactating ewes might be assigned the same tag value, and then all animals with this tag value might undergo the same supplementary feeding regime.
    * If tag values are assigned sequentially (starting at 1), they can be used to generate summary variables. For example, WeightTag[#1] gives the average live weight of all animals in groups with a tag value of 1.

    Note that animal groups with different tag values are never merged, even if they are otherwise similar.

    * To set the tag value of an animal group, use the Tag method.

    * To determine the tag value of an animal group, use the TagNo variable.

    Animal groups that become sufficiently similar are automatically merged into a single group.Animals are similar if all these criteria are the same:

    * Occupy the same paddock
    * Reproduction status (Castrated, Male, Empty, Early Preg,  Late Preg)
    * Number of foetuses
    * Mating cycle (day in the mating cycle)
    * Days to mating (Days left in joining period)
    * Pregnancy (Days since conception)
    * Lactation status (Days since parturition (if lactating)) – within 7 days
    * Has (not) young
    * If young exist, their reproductive status must be the same
    * Implants (hormone implants)
    * Mean age (if the animals are less than one year old )

    These two simulations in this file are validations of the Stock model in APSIM Next Gen. A description of the validation dataset can found in the "Description" memo of the "Validation" node. Descriptions of the two validation simulations ("LUDF" and "StockSlurp")  can be found in the memos of the respective simulations.

    The parameters and variables that can be specified in the Stock model are in the auto-generated APSIM Next Gen documentation which can be found at https://apsimnextgeneration.netlify.app/ under the "Model documentation" link; the "Stock" model is near the bottom of the first table.
  Memo Changing Stock Parameters
    # Changing Stock Parameters

    ## Overview

    The Stock model is an implementation of the CSIRO’s Australian Feeding Standards as expressed in the Grazplan (https://grazplan.csiro.au/) model.

    The technical paper describing Grazplan can be found at https://grazplan.csiro.au/wp-content/uploads/2007/08/TechPaperMay12.pdf

    The structure of the stock parameter strings (which can be found after adding a "Genotype" model to the "Stock" node) is not user friendly but they are needed so the code stays aligned with Grazplan.

    A useful resource to decipher the stock parameter strings are the Sheep and Cattle Explorer Excel spreadsheets. The Explorers are also useful to explore the effect of changing parameter values and they can be found at:

    * https://grazplan.csiro.au/wp-content/uploads/2007/08/SheepExplorer.xlsx for sheep and
    * https://grazplan.csiro.au/wp-content/uploads/2007/08/CattleExplorer.xlsx for cattle

    ## Example

    An example on how to change a parameter value is shown below. In the example, the Growth rate constant (CN1), which controls growth (and hence potential intake) will be changed from its default of 0.0115 to 0.015

    1. in the Cattle Explorer Excel sheet, go to the "Pot.Intake" worksheet and confirm that the default Growth rate constant (CN1) is 0.0115 (cell B6). Note also any other numbers listed above or below the desired parameter - this is to double check you have the right value in the Stock GUI

    2. in the genotype node (in the validation example "Friesian" under the main Stock node; this is where the animal's default parameters are defined) look for the appropriate name in the left hand column i.e. Growth
    3. this name is followed by notation ("Growth C c-n-") in which the last two characters match that in the Explorer (CN)
    4. ensure that the default value (0.0115) in the Cattle Explorer is found in the array in the right hand column along with the other numbers next to the default value of interest. This is just to ensure that you are dealing with the right parameter value
    5. double click the array and change the default value to the new, desired value (0.015)
    6. click away to save the changed value
  DataStore
    ExcelInput Observed: SheetNames=[ValidationData, ValidationDataCopy, SlurpData]
      FileNames=[LUDFValidateData.xlsx, FeedLotObserved.xlsx, Thomas2007Observed.xlsx]
  Folder Validation
    Folder Dairy
      PredictedObserved DairyPredictedObserved: PredictedTableName=ValidationReport; ObservedTableName=ValidationData; FieldNameUsedForMatch=SimulationName; FieldName2UsedForMatch=Date; AllColumns=false
      Memo Validation Data Description
        # Validation Data Set Description

        This vignette describes the origins and development of the Stock Model validation dataset. A high-level overview of the Stock Model itself can be found by clicking the Stock node.

        The observed data set used for this validation simulation is based on publicly available data from New Zealand’s Lincoln University Dairy Farm [LUDF](http://www.siddc.org.nz/lu-dairy-farm/). The LUDF is a commercial demonstration dairy farm established in 2001 and operated by the South Island Dairying Development Centre (SIDDC) on behalf of Lincoln University to showcase sustainable and profitable dairy farming.

        The LUDF is located at 1504 Shands Road, Lincoln (New Zealand; 43°38'S 172°26'E). The property is 186 ha of which 160 ha is the milking platform. The different soil types on the farm represent most of the common soil types in the surrounding Canterbury region. The farm operates in the top 2% of NZ dairy farms on profitability.  The farm’s targets and goals have varied over the years but in the 2019/20 season the target stocking rate was 3.5 cows/ha (peak milked), milk production of 1750 kg MS/ha (equivalent to 500kg MS/cow i.e. >100% liveweight in milk production), application of 160kg N/ha plus 300kg DM/cow imported supplement. Most cows are wintered off farm.

        Average annual rainfall of 666 mm per annum is supplemented by an average irrigation input of 450 mm; average evapotranspiration for Lincoln is 870 mm/year. The milking platform was sown at conversion from a sheep operation (March 2001) in a mix of ryegrasses with white clovers, and a small amount of Timothy.
        The breed of cows at the LUDF are “KiwiCross” which was established as a separate breed in 2005 and is now New Zealand's most popular breed. In the 2019/20 season peak number of cows milked was 555 with the average days in milk of 282 days. The stocking rate of 3.5 cows/ha is equivalent to 1,665 kg liveweight/ha. In terms of feeding, in 2019/20 the cows ate 4.4 t DM/cow as pasture and 0.2 t DM/cow as supplement. Off-farm grazing was 0.7 t DM/cow giving a total feed intake of 5.4 t DM/cow.

        Weekly farm data from the LUDF is available at [http://www.siddc.org.nz/lu-dairy-farm/weekly-data/](http://www.siddc.org.nz/lu-dairy-farm/weekly-data/) as PDF reports. The data for the years 2004 to 2017 was transcribed and collated into an validation dataset.

        Note that for these validation simulations, one stock parameter was changed from the original values in [#FREER1997] to reflect modern dairy cow genetics. This, which can be accessed via the GUI in the "Friesian" node in the Stock model, was "Potential intake (Intake C c-i-[#2]) which was increased from 0.025 to 0.04. Also note that "Dairy intake peak (c-idy-0)"  was set to 1.

        Acknowledgements

        South Island Dairying Development Centre (SIDDC) and Lincoln University for making the dairy farm’s production data available. Scott Rains, Samuel Dennis, Anna Taylor, Rogerio Cichota and Ronaldo Vibart for collating the LUDF data when working at AgResearch. Ron Pellow (SIDDC) for comments on the collated data set. David Pacheco and Ronaldo Vibart (AgResearch) for further discussions about the data.
      Simulation LUDF
        Memo Feedlot memo
          # Feedlot simulation

          The Feedlot simulation is a simple illustration of the Stock model by using animals entering a feedlot, being fed and milked and leaving the feedlot. In addition to the Stock model itself and the Supplement specification GUI, at its core is the ChangeLactatingCowNumber GUI, the Stock operations and the Supplement operations. Both the operation files are based on stock and pasture/supplement data from the LUDF dataset (see the Validation memo for details). In the Stock operations, data on actual LUDF weekly changes in cow number have been collated from 1/08/2004 to 30/06/2017. Positive numbers denote lactating cows have been bought and moved to the feedlot while negative numbers are when cows are dried off and removed from the feedlot. It was assumed that cows were bought at weekly intervals. For the Supplement operations, six types of supplements labelled "silage_11me", "pasture_11.5me", "pasture_12me", "pasture_12.5me", "pasture_13me", and "pasture_13.5me" are bought. An excess amount of each supplement is bought (enough to last longer than the simulation) and their characteristics must be specified in the Supplement node. The LUDF dataseet is based on weekly reports - the daily pasture and supplements supplied (and their characteristics such as ME content) listed in the Supplement operations was extrapolated from the weekly data to the intervening days.
        Clock: Start=2004-08-01; End=2017-06-30
        Weather: FileName=%root%/Examples/WeatherFiles/NZ_Lincoln.met
        MicroClimate: a_interception=0; b_interception=1; c_interception=0; d_interception=0; SoilHeatFluxFraction=0.4; MinimumHeightDiffForNewLayer=0; NightInterceptionFraction=0.5; ReferenceHeight=2
        Manager ChangeLactatingCowNumber
          Genotype = Friesian
          Sex = Female
          Age = 48
          Weight = 480
          Pregnant = 0
          Lactating = 2
          NumYoung = 0
```csharp
using Models.Soils;
using System;
using Models.Core;
using Models.Utilities;
using Models.GrazPlan;
using APSIM.Shared.Utilities;
using System.Diagnostics;

namespace Models
{

    [Serializable]
    public class Script : Model
    {
        [Link] Clock clock;
        [Link] Stock stock;
        [Link] Supplement supplement;
        [Link] ISummary summary;
        [Link] Simulation farm;

        public enum Genotypes
        {
            Friesian,
            Jersey,
            EternalKiwiCross
        }

        [Separator("Stock type info, the same type of stock are brought onto the paddock at each grazing")]

        [Description("Stock: genotype (e.g. Friesian, Jersey):")] 
        public Genotypes Genotype { get; set; }

        [Description("Stock: sex (Female, Male, Castrate):")] 
        public ReproductiveType Sex { get; set; }

        [Description("Stock: age (months):")] 
        public double Age { get; set; }

        [Description("Stock: weight (kg liveweight /head):")] 
        public double Weight { get; set; }

        [Description("Stock: fertility status (0 if non-pregnant or days since conception):")] 
        public int Pregnant { get; set; }

        [Description("Stock: lactation status (0 if non-lactating or days since parturition):")]
        public int Lactating { get; set; }

        [Description("Stock: Number of young (foetuses or calves):")]
        public int NumYoung { get; set; }

        public void ChangeStockNum(int NumCowsToChange, string NewLocation)
        {
            if (NumCowsToChange > 0)
            {
                int preg = Pregnant;
                int lact = Lactating;
                int numyoung = NumYoung;

                if (stock.AnimalGroups.Count == 2)
                {
                    preg = stock.AnimalGroups[1].Pregnancy;
                    lact = stock.AnimalGroups[1].Lactation;
                    numyoung = stock.AnimalGroups[1].NoFoetuses;
                }

                StockBuy purchase = new StockBuy();
                purchase.Genotype = ReflectionUtilities.EnumToString(Genotype);
                purchase.Number = NumCowsToChange; //from the Operations file; positive is buy, negative is sell
                purchase.Sex = Sex;
                purchase.Age = Age;       // age in months
                purchase.Weight = Weight;  // liveweight in kg
                purchase.UseTag = 1;
                purchase.MatedTo = purchase.Genotype;
                purchase.Pregnant = preg;   // days pregnant
                purchase.Lactating = lact;  // days lactating
                purchase.NumYoung = numyoung;    // cows can be bought lactating with no young

                stock.Buy(purchase);

                stock.Move(NewLocation);

            }

            if (NumCowsToChange < 0)
                stock.Sell(-NumCowsToChange);
        }
    
    }
}
```
        Operations Stock operations
          2004-09-04  [ChangeLactatingCowNumber].Script.ChangeStockNum(390,Feedlot)
          2004-09-11  [ChangeLactatingCowNumber].Script.ChangeStockNum(54,Feedlot)
          2004-09-18  [ChangeLactatingCowNumber].Script.ChangeStockNum(46,Feedlot)
          2004-09-25  [ChangeLactatingCowNumber].Script.ChangeStockNum(47,Feedlot)
          2004-09-27  [ChangeLactatingCowNumber].Script.ChangeStockNum(18,Feedlot)
          2004-10-04  [ChangeLactatingCowNumber].Script.ChangeStockNum(20,Feedlot)
          2004-10-11  [ChangeLactatingCowNumber].Script.ChangeStockNum(23,Feedlot)
          2004-10-18  [ChangeLactatingCowNumber].Script.ChangeStockNum(34,Feedlot)
          2004-10-25  [ChangeLactatingCowNumber].Script.ChangeStockNum(8,Feedlot)
          2004-10-28  [ChangeLactatingCowNumber].Script.ChangeStockNum(9,Feedlot)
          2005-03-25  [ChangeLactatingCowNumber].Script.ChangeStockNum(-5,Feedlot)
          2005-03-28  [ChangeLactatingCowNumber].Script.ChangeStockNum(-6,Feedlot)
          2005-04-04  [ChangeLactatingCowNumber].Script.ChangeStockNum(-32,Feedlot)
          2005-04-11  [ChangeLactatingCowNumber].Script.ChangeStockNum(2,Feedlot)
          2005-04-18  [ChangeLactatingCowNumber].Script.ChangeStockNum(-9,Feedlot)
          2005-04-25  [ChangeLactatingCowNumber].Script.ChangeStockNum(0,Feedlot)
          2005-04-27  [ChangeLactatingCowNumber].Script.ChangeStockNum(-51,Feedlot)
          2005-05-04  [ChangeLactatingCowNumber].Script.ChangeStockNum(-67,Feedlot)
          2005-05-11  [ChangeLactatingCowNumber].Script.ChangeStockNum(-82,Feedlot)
          2005-05-18  [ChangeLactatingCowNumber].Script.ChangeStockNum(2,Feedlot)
          2005-05-19  [ChangeLactatingCowNumber].Script.ChangeStockNum(-401,Feedlot)
          2005-08-04  [ChangeLactatingCowNumber].Script.ChangeStockNum(98,Feedlot)
          2005-08-11  [ChangeLactatingCowNumber].Script.ChangeStockNum(90,Feedlot)
          2005-08-18  [ChangeLactatingCowNumber].Script.ChangeStockNum(152,Feedlot)
          2005-08-25  [ChangeLactatingCowNumber].Script.ChangeStockNum(44,Feedlot)
          2005-08-28  [ChangeLactatingCowNumber].Script.ChangeStockNum(43,Feedlot)
          2005-09-04  [ChangeLactatingCowNumber].Script.ChangeStockNum(22,Feedlot)
          2005-09-11  [ChangeLactatingCowNumber].Script.ChangeStockNum(31,Feedlot)
          2005-09-18  [ChangeLactatingCowNumber].Script.ChangeStockNum(44,Feedlot)
          2005-09-25  [ChangeLactatingCowNumber].Script.ChangeStockNum(28,Feedlot)
          2005-09-27  [ChangeLactatingCowNumber].Script.ChangeStockNum(33,Feedlot)
          2005-10-04  [ChangeLactatingCowNumber].Script.ChangeStockNum(18,Feedlot)
          2005-10-11  [ChangeLactatingCowNumber].Script.ChangeStockNum(17,Feedlot)
          2005-10-18  [ChangeLactatingCowNumber].Script.ChangeStockNum(7,Feedlot)
          2005-10-25  [ChangeLactatingCowNumber].Script.ChangeStockNum(6,Feedlot)
          2005-10-28  [ChangeLactatingCowNumber].Script.ChangeStockNum(2,Feedlot)
          2005-11-04  [ChangeLactatingCowNumber].Script.ChangeStockNum(7,Feedlot)
          2005-11-11  [ChangeLactatingCowNumber].Script.ChangeStockNum(9,Feedlot)
          2006-03-04  [ChangeLactatingCowNumber].Script.ChangeStockNum(-7,Feedlot)
          2006-03-11  [ChangeLactatingCowNumber].Script.ChangeStockNum(-1,Feedlot)
          2006-03-18  [ChangeLactatingCowNumber].Script.ChangeStockNum(-2,Feedlot)
          2006-03-25  [ChangeLactatingCowNumber].Script.ChangeStockNum(-8,Feedlot)
          2006-03-28  [ChangeLactatingCowNumber].Script.ChangeStockNum(-2,Feedlot)
          2006-04-04  [ChangeLactatingCowNumber].Script.ChangeStockNum(-11,Feedlot)
          2006-04-11  [ChangeLactatingCowNumber].Script.ChangeStockNum(-11,Feedlot)
          2006-04-18  [ChangeLactatingCowNumber].Script.ChangeStockNum(-1,Feedlot)
          2006-04-25  [ChangeLactatingCowNumber].Script.ChangeStockNum(-2,Feedlot)
          2006-04-27  [ChangeLactatingCowNumber].Script.ChangeStockNum(0,Feedlot)
          2006-05-04  [ChangeLactatingCowNumber].Script.ChangeStockNum(-41,Feedlot)
          2006-05-11  [ChangeLactatingCowNumber].Script.ChangeStockNum(-37,Feedlot)
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          2006-05-18  [ChangeLactatingCowNumber].Script.ChangeStockNum(4,Feedlot)
          2006-05-25  [ChangeLactatingCowNumber].Script.ChangeStockNum(-251,Feedlot)
          2006-05-26  [ChangeLactatingCowNumber].Script.ChangeStockNum(-281,Feedlot)
          2006-07-25  [ChangeLactatingCowNumber].Script.ChangeStockNum(26,Feedlot)
          2006-08-04  [ChangeLactatingCowNumber].Script.ChangeStockNum(45,Feedlot)
          2006-08-11  [ChangeLactatingCowNumber].Script.ChangeStockNum(87,Feedlot)
          2006-08-18  [ChangeLactatingCowNumber].Script.ChangeStockNum(124,Feedlot)
          2006-08-25  [ChangeLactatingCowNumber].Script.ChangeStockNum(86,Feedlot)
          2006-09-04  [ChangeLactatingCowNumber].Script.ChangeStockNum(62,Feedlot)
          2006-09-11  [ChangeLactatingCowNumber].Script.ChangeStockNum(41,Feedlot)
          2006-10-25  [ChangeLactatingCowNumber].Script.ChangeStockNum(11,Feedlot)
          2006-10-28  [ChangeLactatingCowNumber].Script.ChangeStockNum(3,Feedlot)
          2006-11-11  [ChangeLactatingCowNumber].Script.ChangeStockNum(1,Feedlot)
          2007-03-04  [ChangeLactatingCowNumber].Script.ChangeStockNum(-22,Feedlot)
          2007-03-11  [ChangeLactatingCowNumber].Script.ChangeStockNum(-23,Feedlot)
          2007-03-18  [ChangeLactatingCowNumber].Script.ChangeStockNum(-4,Feedlot)
          2007-03-25  [ChangeLactatingCowNumber].Script.ChangeStockNum(-3,Feedlot)
          2007-05-04  [ChangeLactatingCowNumber].Script.ChangeStockNum(-94,Feedlot)
          2007-05-11  [ChangeLactatingCowNumber].Script.ChangeStockNum(-10,Feedlot)
          2007-05-18  [ChangeLactatingCowNumber].Script.ChangeStockNum(-18,Feedlot)
          2007-05-25  [ChangeLactatingCowNumber].Script.ChangeStockNum(-25,Feedlot)
          2007-05-26  [ChangeLactatingCowNumber].Script.ChangeStockNum(-461,Feedlot)
          2007-07-28  [ChangeLactatingCowNumber].Script.ChangeStockNum(74,Feedlot)
          2007-08-04  [ChangeLactatingCowNumber].Script.ChangeStockNum(39,Feedlot)
          2007-08-18  [ChangeLactatingCowNumber].Script.ChangeStockNum(106,Feedlot)
          2007-08-25  [ChangeLactatingCowNumber].Script.ChangeStockNum(69,Feedlot)
          2007-09-11  [ChangeLactatingCowNumber].Script.ChangeStockNum(36,Feedlot)
          2007-09-25  [ChangeLactatingCowNumber].Script.ChangeStockNum(25,Feedlot)
          2007-09-29  [ChangeLactatingCowNumber].Script.ChangeStockNum(27,Feedlot)
          2007-10-06  [ChangeLactatingCowNumber].Script.ChangeStockNum(16,Feedlot)
          2007-10-20  [ChangeLactatingCowNumber].Script.ChangeStockNum(14,Feedlot)
          2007-10-27  [ChangeLactatingCowNumber].Script.ChangeStockNum(10,Feedlot)
          2008-03-08  [ChangeLactatingCowNumber].Script.ChangeStockNum(-34,Feedlot)
          2008-05-03  [ChangeLactatingCowNumber].Script.ChangeStockNum(-38,Feedlot)
          2008-05-10  [ChangeLactatingCowNumber].Script.ChangeStockNum(-210,Feedlot)
          2008-05-17  [ChangeLactatingCowNumber].Script.ChangeStockNum(-24,Feedlot)
          2008-05-18  [ChangeLactatingCowNumber].Script.ChangeStockNum(-370,Feedlot)
          2008-08-02  [ChangeLactatingCowNumber].Script.ChangeStockNum(63,Feedlot)
          2008-08-16  [ChangeLactatingCowNumber].Script.ChangeStockNum(72,Feedlot)
          2008-08-23  [ChangeLactatingCowNumber].Script.ChangeStockNum(121,Feedlot)
          2008-08-30  [ChangeLactatingCowNumber].Script.ChangeStockNum(83,Feedlot)
          2008-09-13  [ChangeLactatingCowNumber].Script.ChangeStockNum(59,Feedlot)
          2009-02-21  [ChangeLactatingCowNumber].Script.ChangeStockNum(-30,Feedlot)
          2009-03-28  [ChangeLactatingCowNumber].Script.ChangeStockNum(-33,Feedlot)
          2009-04-11  [ChangeLactatingCowNumber].Script.ChangeStockNum(-19,Feedlot)
          2009-04-25  [ChangeLactatingCowNumber].Script.ChangeStockNum(-48,Feedlot)
          2009-05-09  [ChangeLactatingCowNumber].Script.ChangeStockNum(-65,Feedlot)
          2009-05-16  [ChangeLactatingCowNumber].Script.ChangeStockNum(-61,Feedlot)
          2009-05-24  [ChangeLactatingCowNumber].Script.ChangeStockNum(-335,Feedlot)
          2009-08-15  [ChangeLactatingCowNumber].Script.ChangeStockNum(70,Feedlot)
          2009-08-22  [ChangeLactatingCowNumber].Script.ChangeStockNum(107,Feedlot)
          2009-08-29  [ChangeLactatingCowNumber].Script.ChangeStockNum(118,Feedlot)
          2009-09-19  [ChangeLactatingCowNumber].Script.ChangeStockNum(51,Feedlot)
          2009-09-26  [ChangeLactatingCowNumber].Script.ChangeStockNum(19,Feedlot)
          2010-05-02  [ChangeLactatingCowNumber].Script.ChangeStockNum(-29,Feedlot)
          2010-05-15  [ChangeLactatingCowNumber].Script.ChangeStockNum(-128,Feedlot)
          2010-05-22  [ChangeLactatingCowNumber].Script.ChangeStockNum(-78,Feedlot)
          2010-05-23  [ChangeLactatingCowNumber].Script.ChangeStockNum(-334,Feedlot)
          2010-07-31  [ChangeLactatingCowNumber].Script.ChangeStockNum(42,Feedlot)
          2010-08-14  [ChangeLactatingCowNumber].Script.ChangeStockNum(56,Feedlot)
        Operations Supplement operations
          2004-09-04  [Supplement].Buy(2E+18,"silage_11me")
          2004-09-04  [Supplement].Buy(2E+18,"pasture_11.5me")
          2004-09-04  [Supplement].Buy(2E+18,"pasture_12me")
          2004-09-04  [Supplement].Buy(2E+18,"pasture_12.5me")
          2004-09-04  [Supplement].Buy(2E+18,"pasture_13me")
          2004-09-04  [Supplement].Buy(2E+18,"pasture_13.5me")
          2004-09-04  [Supplement].Feed("pasture_13me",3861,"Feedlot")
          2004-09-05  [Supplement].Feed("pasture_13me",3861,"Feedlot")
          2004-09-06  [Supplement].Feed("pasture_13me",3861,"Feedlot")
          2004-09-07  [Supplement].Feed("pasture_13me",3861,"Feedlot")
          2004-09-08  [Supplement].Feed("pasture_13me",3861,"Feedlot")
          2004-09-09  [Supplement].Feed("pasture_13me",3861,"Feedlot")
          2004-09-10  [Supplement].Feed("pasture_13me",3861,"Feedlot")
          2004-09-11  [Supplement].Feed("pasture_13me",4351.2,"Feedlot")
          2004-09-12  [Supplement].Feed("pasture_13me",4351.2,"Feedlot")
          2004-09-13  [Supplement].Feed("pasture_13me",4351.2,"Feedlot")
          2004-09-14  [Supplement].Feed("pasture_13me",4351.2,"Feedlot")
          2004-09-15  [Supplement].Feed("pasture_13me",4351.2,"Feedlot")
          2004-09-16  [Supplement].Feed("pasture_13me",4351.2,"Feedlot")
          2004-09-17  [Supplement].Feed("pasture_13me",4351.2,"Feedlot")
          2004-09-18  [Supplement].Feed("pasture_13me",4459,"Feedlot")
          2004-09-19  [Supplement].Feed("pasture_13me",4459,"Feedlot")
          2004-09-20  [Supplement].Feed("pasture_13me",4459,"Feedlot")
          2004-09-21  [Supplement].Feed("pasture_13me",4459,"Feedlot")
          2004-09-22  [Supplement].Feed("pasture_13me",4459,"Feedlot")
          2004-09-23  [Supplement].Feed("pasture_13me",4459,"Feedlot")
          2004-09-24  [Supplement].Feed("pasture_13me",4459,"Feedlot")
          2004-09-25  [Supplement].Feed("pasture_13me",6981,"Feedlot")
          2004-09-26  [Supplement].Feed("pasture_13me",6981,"Feedlot")
          2004-09-27  [Supplement].Feed("pasture_13me",8991,"Feedlot")
          2004-09-28  [Supplement].Feed("pasture_13me",8991,"Feedlot")
          2004-09-29  [Supplement].Feed("pasture_13me",8991,"Feedlot")
          2004-09-30  [Supplement].Feed("pasture_13me",8991,"Feedlot")
          2004-10-01  [Supplement].Feed("pasture_13me",8991,"Feedlot")
          2004-10-02  [Supplement].Feed("pasture_13me",8991,"Feedlot")
          2004-10-03  [Supplement].Feed("pasture_13me",8991,"Feedlot")
          2004-10-04  [Supplement].Feed("pasture_13me",7820,"Feedlot")
          2004-10-05  [Supplement].Feed("pasture_13me",7820,"Feedlot")
          2004-10-06  [Supplement].Feed("pasture_13me",7820,"Feedlot")
          2004-10-07  [Supplement].Feed("pasture_13me",7820,"Feedlot")
          2004-10-08  [Supplement].Feed("pasture_13me",7820,"Feedlot")
          2004-10-09  [Supplement].Feed("pasture_13me",7820,"Feedlot")
          2004-10-10  [Supplement].Feed("pasture_13me",7820,"Feedlot")
          2004-10-11  [Supplement].Feed("pasture_13me",9209.2,"Feedlot")
          2004-10-12  [Supplement].Feed("pasture_13me",9209.2,"Feedlot")
          2004-10-13  [Supplement].Feed("pasture_13me",9209.2,"Feedlot")
          2004-10-14  [Supplement].Feed("pasture_13me",9209.2,"Feedlot")
          2004-10-15  [Supplement].Feed("pasture_13me",9209.2,"Feedlot")
          2004-10-16  [Supplement].Feed("pasture_13me",9209.2,"Feedlot")
          2004-10-17  [Supplement].Feed("pasture_13me",9209.2,"Feedlot")
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          2004-10-18  [Supplement].Feed("pasture_13me",9353.6,"Feedlot")
          2004-10-25  [Supplement].Feed("pasture_12.5me",10368,"Feedlot")
          2004-10-28  [Supplement].Feed("pasture_12.5me",10189.3,"Feedlot")
          2004-11-04  [Supplement].Feed("pasture_12me",12319.5,"Feedlot")
          2004-11-11  [Supplement].Feed("pasture_12.5me",10852.8,"Feedlot")
          2004-11-18  [Supplement].Feed("pasture_12.5me",11469.6,"Feedlot")
          2004-11-25  [Supplement].Feed("pasture_12.5me",11033,"Feedlot")
          2004-11-27  [Supplement].Feed("pasture_12.5me",10968.1,"Feedlot")
          2004-12-04  [Supplement].Feed("pasture_12.5me",9475.4,"Feedlot")
          2004-12-11  [Supplement].Feed("pasture_12.5me",10157.9,"Feedlot")
          2004-12-18  [Supplement].Feed("pasture_12.5me",9590.4,"Feedlot")
          2004-09-04  [Supplement].Feed("silage_11me",507,"Feedlot")
          2004-09-11  [Supplement].Feed("silage_11me",0,"Feedlot")
          2004-12-04  [Supplement].Feed("silage_11me",2271.5,"Feedlot")
          2004-12-11  [Supplement].Feed("silage_11me",517.6,"Feedlot")
          2004-12-18  [Supplement].Feed("silage_11me",1490.4,"Feedlot")
          2004-12-25  [Supplement].Feed("silage_11me",1932,"Feedlot")
          2004-12-28  [Supplement].Feed("silage_11me",388.2,"Feedlot")
          2005-01-25  [Supplement].Feed("silage_11me",841.1,"Feedlot")
          2005-01-28  [Supplement].Feed("silage_11me",905.8,"Feedlot")
          2005-02-04  [Supplement].Feed("silage_11me",1485.8,"Feedlot")
          2005-02-11  [Supplement].Feed("silage_11me",832,"Feedlot")
          2005-03-04  [Supplement].Feed("silage_11me",2503.8,"Feedlot")
          2005-03-11  [Supplement].Feed("silage_11me",2115.3,"Feedlot")
          2005-03-18  [Supplement].Feed("silage_11me",4050.9,"Feedlot")
          2005-03-25  [Supplement].Feed("silage_11me",3799.6,"Feedlot")
          2005-03-28  [Supplement].Feed("silage_11me",4083.2,"Feedlot")
          2005-04-04  [Supplement].Feed("silage_11me",2605.8,"Feedlot")
          2005-04-11  [Supplement].Feed("silage_11me",2796.8,"Feedlot")
          2005-04-18  [Supplement].Feed("silage_11me",3534.1,"Feedlot")
          2005-04-25  [Supplement].Feed("silage_11me",3414.3,"Feedlot")
          2005-04-27  [Supplement].Feed("silage_11me",3945.6,"Feedlot")
          2005-05-04  [Supplement].Feed("silage_11me",3222.7,"Feedlot")
          2005-05-11  [Supplement].Feed("silage_11me",2513.7,"Feedlot")
          2005-05-18  [Supplement].Feed("silage_11me",2566.4,"Feedlot")
          2005-09-18  [Supplement].Feed("silage_11me",4034.8,"Feedlot")
          2005-10-04  [Supplement].Feed("silage_11me",1869.3,"Feedlot")
          2005-10-11  [Supplement].Feed("silage_11me",3038,"Feedlot")
          2005-10-18  [Supplement].Feed("silage_11me",752.4,"Feedlot")
          2005-11-18  [Supplement].Feed("silage_11me",1367.1,"Feedlot")
          2005-11-25  [Supplement].Feed("silage_11me",7203.9,"Feedlot")
          2005-11-27  [Supplement].Feed("silage_11me",4314.8,"Feedlot")
          2005-12-04  [Supplement].Feed("silage_11me",2206.6,"Feedlot")
          2005-12-28  [Supplement].Feed("silage_11me",1038.4,"Feedlot")
          2006-01-04  [Supplement].Feed("silage_11me",1425.6,"Feedlot")
          2006-01-11  [Supplement].Feed("silage_11me",1099.9,"Feedlot")
          2006-02-11  [Supplement].Feed("silage_11me",1733.4,"Feedlot")
          2006-02-18  [Supplement].Feed("silage_11me",2957.8,"Feedlot")
          2006-03-04  [Supplement].Feed("silage_11me",1288,"Feedlot")
          2006-03-11  [Supplement].Feed("silage_11me",2636.3,"Feedlot")
          2006-03-18  [Supplement].Feed("silage_11me",2756.3,"Feedlot")
          2006-03-25  [Supplement].Feed("silage_11me",3544.8,"Feedlot")
          2006-03-28  [Supplement].Feed("silage_11me",4101.5,"Feedlot")
          2006-04-04  [Supplement].Feed("silage_11me",3472,"Feedlot")
          2006-04-11  [Supplement].Feed("silage_11me",3105.9,"Feedlot")
          2006-04-18  [Supplement].Feed("silage_11me",3648,"Feedlot")
          2006-04-25  [Supplement].Feed("silage_11me",2787.6,"Feedlot")
          2006-04-27  [Supplement].Feed("silage_11me",2060.4,"Feedlot")
          2006-05-04  [Supplement].Feed("silage_11me",2203.5,"Feedlot")
          2006-05-11  [Supplement].Feed("silage_11me",2006.4,"Feedlot")
          Memo Supplement operations memo
            The Supplement operation file is based on pasture/supplement data from the LUDF dataset (see the Validation memo for details).  For the Supplement operations, there are six types of supplements labelled "silage_11me", "pasture_11.5me", "pasture_12me", "pasture_12.5me", "pasture_13me", and "pasture_13.5me" that are bought at the start of the simulation. An excess amount, expressed in kilograms, of each supplement is bought - enough to last longer than the simulation (2E+18 kg in the LUDF validation) and their characteristics must be specified in the Supplement node. The LUDF dataset is based on weekly reports - the daily pasture and supplements supplied (and their characteristics such as ME content) listed in the Supplement operations was extrapolated from the weekly data to the intervening days.

            To specify the buy and feeding out in the Supplement operation file the following can be used:

            * to buy: "2004-09-04 [#Supplement].Buy(2E+18,"pasture_13.5me")" (without enclosing quotation marks) where "2004-09-04" is the date of the operation, and "[#Supplement].Buy(2E+18,"pasture_13.5me")" is to buy 2E+18 kg of supplement type "pasture_13.5me". Remember that type of supplement must be specified in the Supplement node.

            * to feed out: "2004-09-04 [#Supplement].Feed("pasture_13me",3861,"Feedlot")" (without enclosing quotation marks) where "2004-09-04" is the date of the operation and "[#Supplement].Feed("pasture_13me",3861,"Feedlot")" means to feed out 3861 kg of supplement "pasture_13me". Again, the fed out supplement must be specified in the Supplement node.
        Supplement: SpoilageTime=0
          Stores:
            Name            Stored  IsRoughage  DMContent  DMD   MEContent  CPConc  ProtDg  PConc   SConc   EEConc  ADIP2CP  AshAlk  MaxPassage
            fodder          0       true        0.85       0     0          0       0       0       0       0       0        0       0
            silage_11me     0       true        1          0.8   11         0.16    0.8     0.0032  0.0024  0.02    0.06     0.6     0
            pasture_11me    0       true        1          0.76  11         0.16    0.8     0.0032  0.0024  0.02    0.06     0.6     0
            pasture_11.5me  0       true        1          0.76  11.5       0.16    0.8     0.0032  0.0024  0.02    0.06     0.6     0
            pasture_12me    0       true        1          0.76  12         0.16    0.8     0.0032  0.0024  0.02    0.06     0.6     0
            pasture_12.5me  0       true        1          0.76  12.5       0.16    0.8     0.0032  0.0024  0.02    0.06     0.6     0
            pasture_13me    0       true        1          0.76  13         0.16    0.8     0.0032  0.0024  0.02    0.06     0.6     0
            pasture_13.5me  0       true        1          0.76  13.5       0.16    0.8     0.0032  0.0024  0.02    0.06     0.6     0
        Stock: RandSeed=9999
          Genotype Friesian: sEditor=Andrew Moore; sEditDate=30 Jan 2013; Animal=1; FDairyIntakePeak=1; SRWScalars=[1.2, 1.4]; MaxFleeceDiam=0; bDairyBreed=true; MortRate=[0, 5.53e-05, 5.53e-05]; MortAge=[0, 300, 365]; MortIntensity=0.3; MortCondConst=0.6; MortWtDiff=0.1; GrowthC=[0, 0.0115, 0.27, 0.4, 1.1]; IntakeLactC=[0, 0.85, 0.577, 0.9]; DgProtC=[0, 0.3, 0.25, 0.1, 0.007, 0.005, 0.35, 0.1, 0.1]; ProtC=[0, 0.05, 0.85, 5.5, 0.178, 0.92, 1, 0.6, 0.25, 0.9]; PregScale=[0, 1, 1.15, 0]; BirthWtScale=[0, 0.07, 0.055, 0]; PeakLactC=[0, 0.5, 0.62, 0]; WoolC=[0, 0, 0, 0, 0, 0, 0, 0, 0, 0, 0, 0, 0, 0, 0]; SulfC=[0, 0.07, 0.07, 0, 0.00114]; MethC=[0, 18.4, 0.013, 0.00752, 0.0237, 0.00336, 18.1, 25.29]; AshAlkC=[0, 0.34, 0.28, 1.1]; OvulationPeriod=21; Puberty=[183, 365]; DayLengthConst=[0, 0, 0, 0]; F2=[0, 0.7, 5, 0]; F3=[0, 5.89, 5.89, 0]; ToxaemiaSigs=[0, 0]; DystokiaSigs=[0, 0]; ExposureConsts=[0, 0, 0, 0]; SelfWeanPropn=0.05; MaxYoung=0; BreedSRW=550; PotFleeceWt=0; FleeceRatio=0; PeakMilk=50; ConceiveSigs=[[0, 0], [0.7, 5.89], [5, 5.89], [0, 0]]; FertWtDiff=0
            IntakeC=[0, 0.04, 1.7, 0.22, 60, 0.02, 25, 22, 81, 1.7, 0.6, 0.05, 0.15, 0.005, 0.002, 0.5, 1, 0.01, 20, 3, 1.5, 0.7]
            GrazeC=[0, 0.8, 0.17, 1.7, 0.00078, 0.6, 0.00074, 0.5, 150, 0.14, 0.28, 10.5, 0.8, 0.35, 1, 0, 0, 0.012, 1, 1, 11.5]
            EfficC=[0, 0.5, 0.02, 0.85, 0.7, 0.4, 0.02, 0.6, 0.133, 0.95, 0.84, 0.8, 0.7, 0.035, 0.33, 0.12, 0.043]
            MaintC=[0, 0.09, 0.36, 8e-05, 0.84, 0.23, 0.0025, 0.9, 5.2e-05, 0.16, 0.0152, 0.000526, 0.0161, 0.0422, 0.00011, 0.15, 0.0026, 5]
            PregC=[0, 285, 2.2, 1.77, 0.33, 1.8, 2.42, 1.16, 4.11, 343.5, 0.0164, 0.134, 6.22, 0.747]
            LactC=[0, 4, 30, 0.6, 0.105, 0.94, 3.1, 1.17, 0, 0, 0.04, 90, 0.42, 0.58, 0.0357, 0.032, 0.7, 0.01, 0.1, 1.6, 4, 0.0027, 0.004, 3, 0.6, 1.03]
            ChillC=[0, 0.09, 4.1, 1.6, 0.5, 0.7, 0.15, 0.481, 0.619, 1.1, 0.322, 39, 1.5, 5, 0.15, 10, 0.38]
            GainC=[0, 0.6, 0.7, 0.8, -6, 0.4, 0.9, 0.97, 27, 20.3, 2, 13.8, 0.072, 0.14, 0.008, 0.115, 1, 0.5, 1.09]
            PhosC=[0, 0.7, 0.95, 2e-05, 0.003, 4.4e-05, 0.0041, 0.001, 0, 0.00051, 3.7e-06, 0.00051, 3.7e-06, 0.0012, 0.004635, 0.22]
        Forages
          Parameters:
            {Name=SurfaceOrganicMatter.Residue, LiveDigestibility=0.7, DeadDigestibility=0.3, LiveFractionConsumable=1, DeadFractionConsumable=1, LiveMinimumBiomass=100, DeadMinimumBiomass=0}
        Summary SummaryFile
        Zone Feedlot: Area=10; Slope=0; AspectAngle=0; Altitude=50
          Soil: ASCOrder=Vertosol; ASCSubOrder=Black; SoilType=Clay; Site=Norwin; NearestTown=Norwin; Region=Darling Downs and Granite Belt; State=Queensland; Country=Australia; NaturalVegetation=Qld. Bluegrass, possible Qld. Blue gum; ApsoilNumber=900; Latitude=-27.581836; Longitude=151.320206; LocationAccuracy=+/- 20m
            DataSource=CSIRO Sustainable Ecosystems, Toowoomba; Characteriesd as part of the GRDC funded project"Doing it better, doing it smarter, managing soil water in Australian agriculture' 2011
            Comments=OC, CLL for all crops estimated-based on Bongeen Mywybilla Soil No1
            Physical
              Thickness  BD       AirDry    LL15      DUL       SAT       KS
              150        1.01056  0.13025   0.2605    0.521     0.588655  20
              150        1.07146  0.198689  0.248362  0.496723  0.565677  20
              300        1.09394  0.28      0.28      0.488438  0.557193  20
              300        1.15861  0.28      0.28      0.480297  0.532787  20
              300        1.17301  0.28      0.28      0.471584  0.527354  20
              300        1.16287  0.28      0.28      0.457071  0.53118   20
              300        1.1875   0.28      0.28      0.452332  0.521888  20
              SoilCrop WheatSoil: LL=[0.261, 0.248, 0.28, 0.306, 0.36, 0.392, 0.446]; KL=[0.06, 0.06, 0.06, 0.04, 0.04, 0.02, 0.01]; XF=[1, 1, 1, 1, 1, 1, 1]
            WaterBalance SoilWater: SummerDate=1-Nov; SummerU=5; SummerCona=5; WinterDate=1-Apr; WinterU=5; WinterCona=5; DiffusConst=40; DiffusSlope=16; Salb=0.12; CN2Bare=73; CNRed=20; CNCov=0.8; PSIDul=-100; Thickness=[150, 150, 300, 300, 300, 300, 300]; SWCON=[0.3, 0.3, 0.3, 0.3, 0.3, 0.3, 0.3]
            Organic: FOMCNRatio=40; CarbonUnits=Total
              Thickness  Carbon  SoilCNRatio  FBiom  FInert  FOM
              150        1.2     12           0.04   0.4     347.129
              150        0.96    12           0.02   0.6     270.344
              300        0.6     12           0.02   0.8     163.972
              300        0.3     12           0.02   1       99.4541
              300        0.18    12           0.01   1       60.322
              300        0.12    12           0.01   1       36.5871
              300        0.12    12           0.01   1       22.1912
            Chemical: Thickness=[150, 150, 300, 300, 300, 300, 300]; PH=[8, 8, 8, 8, 8, 8, 8]; PHUnits=Water
            Water: Thickness=[150, 150, 300, 300, 300, 300, 300]; FilledFromTop=false
              InitialValues=[0.521, 0.496723, 0.488438, 0.480297, 0.471584, 0.457071, 0.452332]
            Nutrient
            Solute NO3: Thickness=[150, 150, 300, 300, 300, 300, 300]; InitialValues=[1, 1, 1, 1, 1, 1, 1]; InitialValuesUnits=ppm; WaterTableConcentration=0; D0=0; DepthConstant=0; MaxDepthSoluteAccessible=0; RunoffEffectivenessAtMovingSolute=0; MaxEffectiveRunoff=0
            Solute NH4: Thickness=[150, 150, 300, 300, 300, 300, 300]; InitialValues=[0.1, 0.1, 0.1, 0.1, 0.1, 0.1, 0.1]; InitialValuesUnits=ppm; WaterTableConcentration=0; D0=0; DepthConstant=0; MaxDepthSoluteAccessible=0; RunoffEffectivenessAtMovingSolute=0; MaxEffectiveRunoff=0
            Solute Urea: Thickness=[150, 150, 300, 300, 300, 300, 300]; InitialValues=[0, 0, 0, 0, 0, 0, 0]; InitialValuesUnits=kg/ha; WaterTableConcentration=0; D0=0; DepthConstant=0; MaxDepthSoluteAccessible=0; RunoffEffectivenessAtMovingSolute=0; MaxEffectiveRunoff=0
            SoilTemperature Temperature: InteractionsPerDay=8
          SurfaceOrganicMatter: InitialResidueName=wheat_stubble; InitialResidueType=wheat; InitialResidueMass=0; InitialStandingFraction=0; InitialCPR=0; InitialCNR=100
          MicroClimate: a_interception=0; b_interception=1; c_interception=0; d_interception=0; SoilHeatFluxFraction=0.4; MinimumHeightDiffForNewLayer=0; NightInterceptionFraction=0.5; ReferenceHeight=2
        Report ValidationReport: EventNames=[Clock].EndOfDay
          VariableNames:
            //[ChangeRuminantPRM].Script.Dummy as Description
            //[ChangeRuminantPRM].Script.FileName as ParameterSet
            [Clock].Today as Date
            [Clock].Today
            [Stock].NumberAll as CowNumberInMilk
            [Stock].WeightAll as CowWeight // kg
            [Stock].IntakeAll.Weight as CowIntake // kg DM /head /day
            [Stock].PastIntakeAll.Weight as CowPastureIntake // kg DM /head /day
            [Stock].SuppIntakeAll.Weight as CowSilageIntake // kg DM /head /day
            ([Stock].MilkWtAll * 0.04 * 0.80 + [Stock].MilkWtAll * 0.04) as MilkSolids // kg MS /head /day - 0.80 is the average Protein:Fat ratio from LUDF data, the NZ national average is 0.77 https://www.dairynz.co.nz/media/816845/WEB_Protein-to-fat-ratio.pdf
            [Stock].CondScoreAll as ConditionScore1to5 // spurious
            [Stock].LactatingAll
            [Stock].NoGroups
        Memo Milk production memo
          The LUDF dataset was selected partly because it was the only grazing trial in which we had access to intake information, and partly it was thought that dairy cows would stretch the capability of the feeding standards. It is evident from the observed versus predicted milk production data that the former tends to be higher than the latter. It is likely that to better match observed and predicted requires an update to the genetic parameters/assumptions in the underlying model and that is beyond the scope of this initiative.
        Memo Body mass memo
          The LUDF dataset was selected partly because it was the only grazing trial in which we had access to intake information, and partly it was thought that dairy cows would stretch the capability of the feeding standards. It is evident from the observed versus predicted cow body mass data that the weight change profile over a milking season is markedly different; the predicted body mass rises considerably more than the observed. It is likely that to better match observed and predicted requires an update to the genetic parameters/assumptions in the underlying model and that is beyond the scope of this initiative.
        Memo Intake memo
          In the validation dataset there are two values for pasture intake – that based on measured pasture disappearance i.e. the difference in pre- and post-grazing DM as well as that which takes into account the likely wastage of pasture during grazing. Estimating this wastage event is difficult. In an investigation conducted at the LUDF, [#Pal2012] found that by direct measurement about 8% of the dry matter cows removed from the plants was not ingested (i.e. dropped to the ground). A similar wastage value (6%) was used in a DairyNZ feeding fact sheet for farmers (https://www.dairynz.co.nz/feed/nutrition/lactating-cows; accessed June 2020). Using 30 farmlet-years of data across ten farmlet trials, DairyNZ back-calculated stock intake from measurements of pasture energy density, changes in stock liveweight and milk production. That intake estimate was compared with pasture disappearance and they estimated that about 6% of the measured disappearance was not consumed (C. Glassey, DairyNZ, personal communication 2020). Considering that the 6-8% wastage values are under ideal grazing conditions (which do not occur all the time), the pasture intake after waste ("ObservedWastage" in the plots) was calculated as 90% of pasture intake ("Observed" in the plots).

          It is noted that variability in simulated intake is much less than that of the observed data. This is expected of intake data. Intake was calculated by difference from week to week, and therefore variability can be overexpressed in the data. While the calculation could done over longer periods of time and that would average out those differences but they would still be there in the underlying data.
      Simulation StockSlurp
        Memo SLURP memo
          #SLURP simulation

          Ideally, to test the Stock model’s estimates of production we would have a simulation of the animals rotationally grazing paddocks in which an appropriate pasture was growing. That would be a good reflection of reality but would also add errors in the modelling of plant growth and rotation rules that might obscure the testing of the Stock model.

          SLURP is a “crop” model that has been built using the Plant Modelling Framework to provide a very simple representation of crops and pastures with user-prescribed growth rather than an internal calculation of growth. The model does not predict crop growth, development or yields - these are supplied by the user. By continually setting the SLURP biomass and pasture quality at the start of the day to the pre-grazing values measured at LUDF, we can use SLURP to test the performance of Stock without adding in other sources of error.

          In this simulation, the pre-grazing pasture characteristics of SLURP are set in the SlurpPreGrazingSet component under the Paddock node. Here the relevant Excel file and worksheet are specified; within which PreGrazingCover, GrazedArea, PastureMEConc, PastureDigestibility, and SupplementOffered are specified. In addition to the Stock model itself, at its core the simulation has the ChangeLactatingCowNumber component, Stock Operations and SLURP. Stock Operations continually resets the number of dairy cows with the values taken from the LUDF dataset (see the Validation memo for details). In the Stock Operations, data on actual LUDF weekly changes in cow number have been collated from 1-Aug-2004 to 30-Jun-2017. Positive numbers denote lactating cows have been bought and moved to the feedlot while negative numbers are when cows are dried off and removed from the paddock. It was assumed that cows were bought at weekly intervals. For SLURP, the LUDF dataset is based on weekly reports - the pasture and supplement supplied in the SLURP Excel spreadsheet was extrapolated to the intervening days.
        Clock: Start=2004-08-01; End=2017-06-30
        Weather: FileName=%root%/Examples/WeatherFiles/NZ_Lincoln
        MicroClimate: a_interception=0; b_interception=1; c_interception=0; d_interception=0; SoilHeatFluxFraction=0.4; MinimumHeightDiffForNewLayer=0; NightInterceptionFraction=0.5; ReferenceHeight=2
        Supplement: SpoilageTime=0
          Stores:
            Name         Stored   IsRoughage  DMContent  DMD   MEContent  CPConc  ProtDg  PConc   SConc   EEConc  ADIP2CP  AshAlk  MaxPassage
            fodder       0        true        0.85       0     0          0       0       0       0       0       0        0       0
            silage_11me  4500000  true        1          0.76  11         0.17    0.8     0.0032  0.0024  0.02    0.06     0.6     0
        Manager ChangeLactatingCowNumber: same as Validation.Dairy.LUDF.ChangeLactatingCowNumber
        Stock: RandSeed=9999
          Genotype Friesian: sEditor=Andrew Moore; sEditDate=30 Jan 2013; Animal=1; FDairyIntakePeak=1; SRWScalars=[1.2, 1.4]; MaxFleeceDiam=0; bDairyBreed=true; MortRate=[0, 5.53e-05, 5.53e-05]; MortAge=[0, 300, 365]; MortIntensity=0.3; MortCondConst=0.6; MortWtDiff=0.1; GrowthC=[0, 0.0115, 0.27, 0.4, 1.1]; IntakeLactC=[0, 0.85, 0.577, 0.9]; DgProtC=[0, 0.3, 0.25, 0.1, 0.007, 0.005, 0.35, 0.1, 0.1]; ProtC=[0, 0.05, 0.85, 5.5, 0.178, 0.92, 1, 0.6, 0.25, 0.9]; PregScale=[0, 1, 1.15, 0]; BirthWtScale=[0, 0.07, 0.055, 0]; PeakLactC=[0, 0.5, 0.62, 0]; WoolC=[0, 0, 0, 0, 0, 0, 0, 0, 0, 0, 0, 0, 0, 0, 0]; SulfC=[0, 0.07, 0.07, 0, 0.00114]; MethC=[0, 18.4, 0.013, 0.00752, 0.0237, 0.00336, 18.1, 25.29]; AshAlkC=[0, 0.34, 0.28, 1.1]; OvulationPeriod=21; Puberty=[183, 365]; DayLengthConst=[0, 0, 0, 0]; F2=[0, 0.7, 5, 0]; F3=[0, 5.89, 5.89, 0]; ToxaemiaSigs=[0, 0]; DystokiaSigs=[0, 0]; ExposureConsts=[0, 0, 0, 0]; SelfWeanPropn=0.05; MaxYoung=0; BreedSRW=550; PotFleeceWt=0; FleeceRatio=0; PeakMilk=27.5; ConceiveSigs=[[0, 0], [0.7, 5.89], [5, 5.89], [0, 0]]; FertWtDiff=0
            IntakeC=[0, 0.04, 1.7, 0.22, 60, 0.02, 25, 22, 81, 1.7, 0.6, 0.05, 0.15, 0.005, 0.002, 0.5, 1, 0.01, 20, 3, 1.5, 0.7]
            GrazeC=[0, 0.8, 0.17, 1.7, 0.00078, 0.6, 0.00074, 0.5, 150, 0.14, 0.28, 10.5, 0.8, 0.35, 1, 0, 0, 0.012, 1, 1, 11.5]
            EfficC=[0, 0.5, 0.02, 0.85, 0.7, 0.4, 0.02, 0.6, 0.133, 0.95, 0.84, 0.8, 0.7, 0.035, 0.33, 0.12, 0.043]
            MaintC=[0, 0.09, 0.36, 8e-05, 0.84, 0.23, 0.0025, 0.9, 5.2e-05, 0.16, 0.0152, 0.000526, 0.0161, 0.0422, 0.00011, 0.15, 0.0026, 5]
            PregC=[0, 285, 2.2, 1.77, 0.33, 1.8, 2.42, 1.16, 4.11, 343.5, 0.0164, 0.134, 6.22, 0.747]
            LactC=[0, 4, 30, 0.6, 0.105, 0.94, 3.1, 1.17, 0, 0, 0.04, 90, 0.42, 0.58, 0.0357, 0.032, 0.7, 0.01, 0.1, 1.6, 4, 0.0027, 0.004, 3, 0.6, 1.03]
            ChillC=[0, 0.09, 4.1, 1.6, 0.5, 0.7, 0.15, 0.481, 0.619, 1.1, 0.322, 39, 1.5, 5, 0.15, 10, 0.38]
            GainC=[0, 0.6, 0.7, 0.8, -6, 0.4, 0.9, 0.97, 27, 20.3, 2, 13.8, 0.072, 0.14, 0.008, 0.115, 1, 0.5, 1.09]
            PhosC=[0, 0.7, 0.95, 2e-05, 0.003, 4.4e-05, 0.0041, 0.001, 0, 0.00051, 3.7e-06, 0.00051, 3.7e-06, 0.0012, 0.004635, 0.22]
        Forages
          Parameters:
            Name                          LiveDigestibility  DeadDigestibility  LiveFractionConsumable  DeadFractionConsumable  LiveMinimumBiomass  DeadMinimumBiomass
            Slurp.Root                    0.7                0.3                1                       1                       100                 0
            Slurp.Leaf                    0.7                0.3                1                       1                       100                 0
            SurfaceOrganicMatter.Residue  0.7                0.3                1                       1                       100                 0
        Operations Stock operations
          2004-09-04  [ChangeLactatingCowNumber].Script.ChangeStockNum(390,Paddock)
          2004-09-11  [ChangeLactatingCowNumber].Script.ChangeStockNum(54,Paddock)
          2004-09-18  [ChangeLactatingCowNumber].Script.ChangeStockNum(46,Paddock)
          2004-09-25  [ChangeLactatingCowNumber].Script.ChangeStockNum(47,Paddock)
          2004-09-27  [ChangeLactatingCowNumber].Script.ChangeStockNum(18,Paddock)
          2004-10-04  [ChangeLactatingCowNumber].Script.ChangeStockNum(20,Paddock)
          2004-10-11  [ChangeLactatingCowNumber].Script.ChangeStockNum(23,Paddock)
          2004-10-18  [ChangeLactatingCowNumber].Script.ChangeStockNum(34,Paddock)
          2004-10-25  [ChangeLactatingCowNumber].Script.ChangeStockNum(8,Paddock)
          2004-10-28  [ChangeLactatingCowNumber].Script.ChangeStockNum(9,Paddock)
          2005-03-25  [ChangeLactatingCowNumber].Script.ChangeStockNum(-5,Paddock)
          2005-03-28  [ChangeLactatingCowNumber].Script.ChangeStockNum(-6,Paddock)
          2005-04-04  [ChangeLactatingCowNumber].Script.ChangeStockNum(-32,Paddock)
          2005-04-11  [ChangeLactatingCowNumber].Script.ChangeStockNum(2,Paddock)
          2005-04-18  [ChangeLactatingCowNumber].Script.ChangeStockNum(-9,Paddock)
          2005-04-25  [ChangeLactatingCowNumber].Script.ChangeStockNum(0,Paddock)
          2005-04-27  [ChangeLactatingCowNumber].Script.ChangeStockNum(-51,Paddock)
          2005-05-04  [ChangeLactatingCowNumber].Script.ChangeStockNum(-67,Paddock)
          2005-05-11  [ChangeLactatingCowNumber].Script.ChangeStockNum(-82,Paddock)
          2005-05-18  [ChangeLactatingCowNumber].Script.ChangeStockNum(2,Paddock)
          2005-05-19  [ChangeLactatingCowNumber].Script.ChangeStockNum(-401,Paddock)
          2005-08-04  [ChangeLactatingCowNumber].Script.ChangeStockNum(98,Paddock)
          2005-08-11  [ChangeLactatingCowNumber].Script.ChangeStockNum(90,Paddock)
          2005-08-18  [ChangeLactatingCowNumber].Script.ChangeStockNum(152,Paddock)
          2005-08-25  [ChangeLactatingCowNumber].Script.ChangeStockNum(44,Paddock)
          2005-08-28  [ChangeLactatingCowNumber].Script.ChangeStockNum(43,Paddock)
          2005-09-04  [ChangeLactatingCowNumber].Script.ChangeStockNum(22,Paddock)
          2005-09-11  [ChangeLactatingCowNumber].Script.ChangeStockNum(31,Paddock)
          2005-09-18  [ChangeLactatingCowNumber].Script.ChangeStockNum(44,Paddock)
          2005-09-25  [ChangeLactatingCowNumber].Script.ChangeStockNum(28,Paddock)
          2005-09-27  [ChangeLactatingCowNumber].Script.ChangeStockNum(33,Paddock)
          2005-10-04  [ChangeLactatingCowNumber].Script.ChangeStockNum(18,Paddock)
          2005-10-11  [ChangeLactatingCowNumber].Script.ChangeStockNum(17,Paddock)
          2005-10-18  [ChangeLactatingCowNumber].Script.ChangeStockNum(7,Paddock)
          2005-10-25  [ChangeLactatingCowNumber].Script.ChangeStockNum(6,Paddock)
          2005-10-28  [ChangeLactatingCowNumber].Script.ChangeStockNum(2,Paddock)
          2005-11-04  [ChangeLactatingCowNumber].Script.ChangeStockNum(7,Paddock)
          2005-11-11  [ChangeLactatingCowNumber].Script.ChangeStockNum(9,Paddock)
          2006-03-04  [ChangeLactatingCowNumber].Script.ChangeStockNum(-7,Paddock)
          2006-03-11  [ChangeLactatingCowNumber].Script.ChangeStockNum(-1,Paddock)
          2006-03-18  [ChangeLactatingCowNumber].Script.ChangeStockNum(-2,Paddock)
          2006-03-25  [ChangeLactatingCowNumber].Script.ChangeStockNum(-8,Paddock)
          2006-03-28  [ChangeLactatingCowNumber].Script.ChangeStockNum(-2,Paddock)
          2006-04-04  [ChangeLactatingCowNumber].Script.ChangeStockNum(-11,Paddock)
          2006-04-11  [ChangeLactatingCowNumber].Script.ChangeStockNum(-11,Paddock)
          2006-04-18  [ChangeLactatingCowNumber].Script.ChangeStockNum(-1,Paddock)
          2006-04-25  [ChangeLactatingCowNumber].Script.ChangeStockNum(-2,Paddock)
          2006-04-27  [ChangeLactatingCowNumber].Script.ChangeStockNum(0,Paddock)
          2006-05-04  [ChangeLactatingCowNumber].Script.ChangeStockNum(-41,Paddock)
          2006-05-11  [ChangeLactatingCowNumber].Script.ChangeStockNum(-37,Paddock)
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          2006-05-18  [ChangeLactatingCowNumber].Script.ChangeStockNum(4,Paddock)
          2006-05-25  [ChangeLactatingCowNumber].Script.ChangeStockNum(-251,Paddock)
          2006-05-26  [ChangeLactatingCowNumber].Script.ChangeStockNum(-281,Paddock)
          2006-07-25  [ChangeLactatingCowNumber].Script.ChangeStockNum(26,Paddock)
          2006-08-04  [ChangeLactatingCowNumber].Script.ChangeStockNum(45,Paddock)
          2006-08-11  [ChangeLactatingCowNumber].Script.ChangeStockNum(87,Paddock)
          2006-08-18  [ChangeLactatingCowNumber].Script.ChangeStockNum(124,Paddock)
          2006-08-25  [ChangeLactatingCowNumber].Script.ChangeStockNum(86,Paddock)
          2006-09-04  [ChangeLactatingCowNumber].Script.ChangeStockNum(62,Paddock)
          2006-09-11  [ChangeLactatingCowNumber].Script.ChangeStockNum(41,Paddock)
          2006-10-25  [ChangeLactatingCowNumber].Script.ChangeStockNum(11,Paddock)
          2006-10-28  [ChangeLactatingCowNumber].Script.ChangeStockNum(3,Paddock)
          2006-11-11  [ChangeLactatingCowNumber].Script.ChangeStockNum(1,Paddock)
          2007-03-04  [ChangeLactatingCowNumber].Script.ChangeStockNum(-22,Paddock)
          2007-03-11  [ChangeLactatingCowNumber].Script.ChangeStockNum(-23,Paddock)
          2007-03-18  [ChangeLactatingCowNumber].Script.ChangeStockNum(-4,Paddock)
          2007-03-25  [ChangeLactatingCowNumber].Script.ChangeStockNum(-3,Paddock)
          2007-05-04  [ChangeLactatingCowNumber].Script.ChangeStockNum(-94,Paddock)
          2007-05-11  [ChangeLactatingCowNumber].Script.ChangeStockNum(-10,Paddock)
          2007-05-18  [ChangeLactatingCowNumber].Script.ChangeStockNum(-18,Paddock)
          2007-05-25  [ChangeLactatingCowNumber].Script.ChangeStockNum(-25,Paddock)
          2007-05-26  [ChangeLactatingCowNumber].Script.ChangeStockNum(-461,Paddock)
          2007-07-28  [ChangeLactatingCowNumber].Script.ChangeStockNum(74,Paddock)
          2007-08-04  [ChangeLactatingCowNumber].Script.ChangeStockNum(39,Paddock)
          2007-08-18  [ChangeLactatingCowNumber].Script.ChangeStockNum(106,Paddock)
          2007-08-25  [ChangeLactatingCowNumber].Script.ChangeStockNum(69,Paddock)
          2007-09-11  [ChangeLactatingCowNumber].Script.ChangeStockNum(36,Paddock)
          2007-09-25  [ChangeLactatingCowNumber].Script.ChangeStockNum(25,Paddock)
          2007-09-29  [ChangeLactatingCowNumber].Script.ChangeStockNum(27,Paddock)
          2007-10-06  [ChangeLactatingCowNumber].Script.ChangeStockNum(16,Paddock)
          2007-10-20  [ChangeLactatingCowNumber].Script.ChangeStockNum(14,Paddock)
          2007-10-27  [ChangeLactatingCowNumber].Script.ChangeStockNum(10,Paddock)
          2008-03-08  [ChangeLactatingCowNumber].Script.ChangeStockNum(-34,Paddock)
          2008-05-03  [ChangeLactatingCowNumber].Script.ChangeStockNum(-38,Paddock)
          2008-05-10  [ChangeLactatingCowNumber].Script.ChangeStockNum(-210,Paddock)
          2008-05-17  [ChangeLactatingCowNumber].Script.ChangeStockNum(-24,Paddock)
          2008-05-18  [ChangeLactatingCowNumber].Script.ChangeStockNum(-370,Paddock)
          2008-08-02  [ChangeLactatingCowNumber].Script.ChangeStockNum(63,Paddock)
          2008-08-16  [ChangeLactatingCowNumber].Script.ChangeStockNum(72,Paddock)
          2008-08-23  [ChangeLactatingCowNumber].Script.ChangeStockNum(121,Paddock)
          2008-08-30  [ChangeLactatingCowNumber].Script.ChangeStockNum(83,Paddock)
          2008-09-13  [ChangeLactatingCowNumber].Script.ChangeStockNum(59,Paddock)
          2009-02-21  [ChangeLactatingCowNumber].Script.ChangeStockNum(-30,Paddock)
          2009-03-28  [ChangeLactatingCowNumber].Script.ChangeStockNum(-33,Paddock)
          2009-04-11  [ChangeLactatingCowNumber].Script.ChangeStockNum(-19,Paddock)
          2009-04-25  [ChangeLactatingCowNumber].Script.ChangeStockNum(-48,Paddock)
          2009-05-09  [ChangeLactatingCowNumber].Script.ChangeStockNum(-65,Paddock)
          2009-05-16  [ChangeLactatingCowNumber].Script.ChangeStockNum(-61,Paddock)
          2009-05-24  [ChangeLactatingCowNumber].Script.ChangeStockNum(-335,Paddock)
          2009-08-15  [ChangeLactatingCowNumber].Script.ChangeStockNum(70,Paddock)
          2009-08-22  [ChangeLactatingCowNumber].Script.ChangeStockNum(107,Paddock)
          2009-08-29  [ChangeLactatingCowNumber].Script.ChangeStockNum(118,Paddock)
          2009-09-19  [ChangeLactatingCowNumber].Script.ChangeStockNum(51,Paddock)
          2009-09-26  [ChangeLactatingCowNumber].Script.ChangeStockNum(19,Paddock)
          2010-05-02  [ChangeLactatingCowNumber].Script.ChangeStockNum(-29,Paddock)
          2010-05-15  [ChangeLactatingCowNumber].Script.ChangeStockNum(-128,Paddock)
          2010-05-22  [ChangeLactatingCowNumber].Script.ChangeStockNum(-78,Paddock)
          2010-05-23  [ChangeLactatingCowNumber].Script.ChangeStockNum(-334,Paddock)
          2010-07-31  [ChangeLactatingCowNumber].Script.ChangeStockNum(42,Paddock)
          2010-08-14  [ChangeLactatingCowNumber].Script.ChangeStockNum(56,Paddock)
        Summary SummaryFile
        Zone Paddock: Area=1; Slope=0; AspectAngle=0; Altitude=50
          Manager SlurpPreGrazingSet
            SSheetFileName = LUDFValidateData.xlsx
            SSheetWorksheetName = SLURPData
```csharp
using APSIM.Core;
using System.Diagnostics;
using System.IO;
using System.Data;
using Models.PMF.Organs;
using Models.PMF;
using APSIM.Shared.Utilities;
using Models.GrazPlan;
using Models.Utilities;
using Models.Core;
using System;
using Models.Soils;
    
namespace Models
{
    [Serializable]
    public class Script : Model, IStructureDependency
    {
        [Link] private Clock clock;
        [Link] private Plant slurp;
        [Link] private Simulation simulation;
        [Link] private Zone paddock;
        [Link] private Stock stock;
        [Link] private Supplement supplement;
        [Link] private Summary summary;
        [NonSerialized]
        private DataView data;
        [NonSerialized]
        private SimpleLeaf slurpLeaf;
        
        public IStructure Structure { private get; set; }



        [Separator("Slurp will be automatically 'sown' at the sart of the simulation")]

        [Description("EXCEL file name with the resetting data (must be .xlsx)")]
        [Display(Type=DisplayType.FileName)]
        public string SSheetFileName { get; set; }

        [Description ("Name of worksheet containing the data")]
        public string SSheetWorksheetName { get; set; }

        public double GrazedArea { get; set; }

        public double SupplementOffered { get; set; }

        [EventSubscribe("StartOfSimulation")]
        private void OnStartOfSimulation(object sender, EventArgs e)
        {
            var fullFileName = SSheetFileName;
            if (simulation != null && simulation.FileName != null)
                fullFileName = PathUtilities.GetAbsolutePath(SSheetFileName, simulation.FileName);

            if (!File.Exists(fullFileName))
                throw new Exception("Cannot find file: " + fullFileName);
            data = new DataView(ExcelUtilities.ReadExcelFileData(fullFileName, SSheetWorksheetName, headerRow:true));

            slurpLeaf =   Structure.FindChild<SimpleLeaf>(relativeTo: (INodeModel)slurp);

            double wt = 300;
            slurpLeaf.Live.StructuralWt = wt;
            slurpLeaf.Live.StorageWt = 0;
            slurpLeaf.Live.StructuralN = wt * slurpLeaf.MinNConc;
            slurpLeaf.Live.StorageN = wt * slurpLeaf.MaxNConc - slurpLeaf.Live.StructuralN;

            supplement.SpoilageTime = 0.0; //days
        }

        [EventSubscribe("DoManagement")]
        private void OnDoManagement(object sender, EventArgs e)
        {
            double DM = 0.0;
            double digestibility = 0.0;


            // Find last area grazed 
            double oldGrazedArea = GrazedArea;
            data.RowFilter = "Date <=#" + clock.Today.ToString("yyyy-MM-dd") + "# and GrazedArea >0";
            if (data.Count > 0)
            {
                var mostRecentRow = data[data.Count-1];
                if (!Convert.IsDBNull(mostRecentRow["GrazedArea"]))
                    GrazedArea = Convert.ToDouble(mostRecentRow["GrazedArea"]); 
                if (GrazedArea != oldGrazedArea)
                {
                    paddock.Area = GrazedArea;
                }
            }

            // Find last DM value - This will be the most recent day.
            data.RowFilter = "Date <=#" + clock.Today.ToString("yyyy-MM-dd") + "# and PreGrazingCover >0";
            if (data.Count > 0)
            {
                var mostRecentRow = data[data.Count-1];

                if (!Convert.IsDBNull(mostRecentRow["PreGrazingCover"]))
                    DM = Convert.ToDouble(mostRecentRow["PreGrazingCover"]) / 10; // to g/m2
            }

            // Find last ME value - This will be the most recent day.
            data.RowFilter = "Date <=#" + clock.Today.ToString("yyyy-MM-dd") + "# and PastureMEConc >0";
            if (data.Count > 0)
            {
                var mostRecentRow = data[data.Count-1];

                if (!Convert.IsDBNull(mostRecentRow["PastureMEConc"]))
                    digestibility = Convert.ToDouble(mostRecentRow["PastureDigestibility"]);
            }
            if (digestibility == 0)
                digestibility = 0.84;

            if (DM > 0)
            {
                slurpLeaf.Live.StructuralWt = DM;
                slurpLeaf.Live.StorageWt = 0;
                slurpLeaf.Live.StructuralN = DM * slurpLeaf.MinNConc;
                slurpLeaf.Live.StorageN = DM * slurpLeaf.MaxNConc - slurpLeaf.Live.StructuralN;
            }

            // Handle the supplements, find last supplemenet value - This will be the most recent day.
            SupplementOffered = 0.0;
            //data.RowFilter = "Date <=#" + clock.Today.ToString("yyyy-MM-dd") + "# and SupplementOffered >0";
            data.RowFilter = "Date <=#" + clock.Today.ToString("yyyy-MM-dd") + "#";  // I want to retain the 0 values this time as they are meaningful (not just blank)
            if (data.Count > 0)
            {
                var mostRecentRow = data[data.Count-1];

                if (!Convert.IsDBNull(mostRecentRow["SupplementOffered"]))
                    SupplementOffered = Convert.ToDouble(mostRecentRow["SupplementOffered"]); 
            }

            if (SupplementOffered > 0.0)
            {
                // don't need to buy - set up the store with sufficient before the simulation started
                //supplement.Buy(stock.NumberAll * supplementOffered, "Silage_11ME"); 
                supplement.Feed("Silage_11ME", stock.NumberAll * SupplementOffered, "Paddock", false);  //should be true but will through an error

                summary.WriteMessage(this, "Total supp offered = " + (stock.NumberAll * SupplementOffered).ToString(), MessageType.Diagnostic);
                summary.WriteMessage(this, supplement.PaddAmounts[1].ToString(), MessageType.Diagnostic);
            }
            // Columns in spreadsheet:
            // Date
            // Pasture_Growth_Rate    (kgDM/ha/day)
            // Pre_Cover  (kgDM/ha)
            // Post_Cover (kgDM/ha)
            // PastureOffered_Obs (kgDM/cow/d)
            // PastureOffered_ObsMJ (MJME/cow/d)
            // PastureOffered_Mlcalc (MJME/kgDM)
            // Milkers offered Grass Silage (kgDM/cow/d)
            // ME Silage Obs or Assumed (MJME/kgDM)
            // EstmSilageIntake_Obs (MJME)
            // EstmSilageIntake_Calc (MJME)
            // EstmTotalIntake_Obs (MJME)
            // EstmTotalIntake_Calc (MJME)
            // Pasture_ME (ME/kgDM)
            // Pasture_Protein (%)
            // Pasture_DM (%)
            // Pasture_WSC (%)
            // Pasture_NDF (%)
            // Digestability
        }
    }
}
```
          Plant Slurp
          SurfaceOrganicMatter: InitialResidueName=wheat_stubble; InitialResidueType=wheat; InitialResidueMass=0; InitialStandingFraction=0; InitialCPR=0; InitialCNR=100
          Soil: ASCOrder=Vertosol; ASCSubOrder=Black; SoilType=Clay; Site=Norwin; NearestTown=Norwin; Region=Darling Downs and Granite Belt; State=Queensland; Country=Australia; NaturalVegetation=Qld. Bluegrass, possible Qld. Blue gum; ApsoilNumber=900; Latitude=-27.581836; Longitude=151.320206; LocationAccuracy=+/- 20m
            DataSource=CSIRO Sustainable Ecosystems, Toowoomba; Characteriesd as part of the GRDC funded project"Doing it better, doing it smarter, managing soil water in Australian agriculture' 2011
            Comments=OC, CLL for all crops estimated-based on Bongeen Mywybilla Soil No1
            Physical
              Thickness  BD       AirDry    LL15      DUL       SAT       KS
              150        1.01056  0.13025   0.2605    0.521     0.588655  20
              150        1.07146  0.198689  0.248362  0.496723  0.565677  20
              300        1.09394  0.28      0.28      0.488438  0.557193  20
              300        1.15861  0.28      0.28      0.480297  0.532787  20
              300        1.17301  0.28      0.28      0.471584  0.527354  20
              300        1.16287  0.28      0.28      0.457071  0.53118   20
              300        1.1875   0.28      0.28      0.452332  0.521888  20
              SoilCrop SlurpSoil: LL=[0.261, 0.248, 0.28, 0.306, 0.36, 0.392, 0.446]; KL=[0.06, 0.06, 0.06, 0.04, 0.04, 0.02, 0.01]; XF=[1, 1, 1, 1, 1, 1, 1]
            WaterBalance SoilWater: same as Validation.Dairy.LUDF.Feedlot.Soil.SoilWater
            Organic: same as Validation.Dairy.LUDF.Feedlot.Soil.Organic
            Chemical: Thickness=[150, 150, 300, 300, 300, 300, 300]; PH=[8, 8, 8, 8, 8, 8, 8]; PHUnits=Water
            Water: Thickness=[150, 150, 300, 300, 300, 300, 300]; FilledFromTop=false
              InitialValues=[0.521, 0.496723, 0.488438, 0.480297, 0.471584, 0.457071, 0.452332]
            Nutrient
            Solute NO3: same as Validation.Dairy.LUDF.Feedlot.Soil.NO3
            Solute NH4: same as Validation.Dairy.LUDF.Feedlot.Soil.NH4
            Solute Urea: same as Validation.Dairy.LUDF.Feedlot.Soil.Urea
            SoilTemperature Temperature: InteractionsPerDay=8
        Report ValidationReport: EventNames=[Clock].EndOfDay
          VariableNames:
            //[ChangeRuminantPRM].Script.Dummy as Description
            //[ChangeRuminantPRM].Script.FileName as ParameterSet
            [Clock].Today as Date
            [Clock].Today
            [Stock].NumberAll as CowNumberInMilk
            [Stock].WeightAll as CowWeight // kg
            [Stock].IntakeAll.Weight as CowIntake // kg DM /head /day
            [Stock].PastIntakeAll.Weight as CowPastureIntake // kg DM /head /day
            [Stock].SuppIntakeAll.Weight as CowSilageIntake // kg DM /head /day
            ([Stock].MilkWtAll * 0.04 * 0.80 + [Stock].MilkWtAll * 0.04) as MilkSolids // kg MS /head /day - 0.80 is the average Protein:Fat ratio from LUDF data, the NZ national average is 0.77 https://www.dairynz.co.nz/media/816845/WEB_Protein-to-fat-ratio.pdf
            [Paddock].Area as GrazedArea
            [Stock].CondScoreAll as ConditionScore1to5 // spurious
            [SlurpPreGrazingSet].Script.SupplementOffered
            //[SlurpPreGrazingSet].Script.SupplementOffered - [Stock].SuppIntakeAll.Weight * [Stock].NumberAll as SilageUneaten
    Folder Beef
      PredictedObserved BeefPredictedObserved: PredictedTableName=ValidationReport; ObservedTableName=ValidationData; FieldNameUsedForMatch=SimulationName; FieldName2UsedForMatch=Date; AllColumns=false
      Folder FeedlotTests
        Experiment Hersom1
          Factors
            CompositeFactor HGW
              Specifications:
                [SetUpStock].Script.Age = 13
                [SetUpStock].Script.Weight = 404
            CompositeFactor LGW
              Specifications:
                [SetUpStock].Script.Age = 13
                [SetUpStock].Script.Weight = 311
            CompositeFactor NR
              Specifications:
                [SetUpStock].Script.Age = 13
                [SetUpStock].Script.Weight = 255
          Simulation Hersom1Base
            Memo Feedlot memo: same as Validation.Dairy.LUDF.Feedlot memo
            Clock: Start=2000-05-01; End=2000-12-21
            Weather: FileName=StillWater.met
            MicroClimate: a_interception=0; b_interception=1; c_interception=0; d_interception=0; SoilHeatFluxFraction=0.4; MinimumHeightDiffForNewLayer=0; NightInterceptionFraction=0.5; ReferenceHeight=2
            Supplement: SpoilageTime=0
              Stores:
                Name        Stored  IsRoughage  DMContent  DMD   MEContent  CPConc  ProtDg  PConc   SConc   EEConc  ADIP2CP  AshAlk  MaxPassage
                fodder      0       true        0.85       0     0          0       0       0       0       0       0        0       0
                hersom1mix  100000  false       1          0.76  13.05      0.134   0.4     0.0032  0.0024  0.068   0.114    0.6     0
            Stock: RandSeed=9999
            Manager SetUpStock
              Genotype = Angus
              Sex = Male
              Age = 13
              Weight = 404
              Pregnant = 0
              Lactating = 0
              NumYoung = 0
              NumStock = 1
```csharp
using Models.Soils;
using System;
using Models.Core;
using Models.Utilities;
using Models.GrazPlan;
using APSIM.Shared.Utilities;
using System.Diagnostics;

namespace Models
{

    [Serializable]
    public class Script : Model
    {
        [Link] Clock clock;
        [Link] Stock stock;
        [Link] Supplement supplement;
        [Link] ISummary summary;
        [Link] Simulation farm;

        public enum Genotypes
        {
            Friesian,
            Jersey,
            Angus,
            Hereford,
            Brahman,
            Chianina,
            EternalKiwiCross
        }

        [Separator("Stock type info, the same type of stock are brought onto the paddock at each grazing")]

        [Description("Stock: genotype (e.g. Friesian, Jersey):")] 
        public Genotypes Genotype { get; set; }

        [Description("Stock: sex (Female, Male, Castrate):")] 
        public ReproductiveType Sex { get; set; }

        [Description("Stock: age (months):")] 
        public double Age { get; set; }

        [Description("Stock: weight (kg liveweight /head):")] 
        public double Weight { get; set; }

        [Description("Stock: fertility status (0 if non-pregnant or days since conception):")] 
        public int Pregnant { get; set; }

        [Description("Stock: lactation status (0 if non-lactating or days since parturition):")]
        public int Lactating { get; set; }

        [Description("Stock: Number of young (foetuses or calves):")]
        public int NumYoung { get; set; }

        [Description("Stock: Number of animals:")]
        public int NumStock { get; set; }
        
        
        

        [EventSubscribe("StartOfSimulation")]
        private void OnStartOfSimulation(object sender, EventArgs e)
        {

                int preg = Pregnant;
                int lact = Lactating;
                int numyoung = NumYoung;

                if (stock.AnimalGroups.Count == 2)
                {
                    preg = stock.AnimalGroups[1].Pregnancy;
                    lact = stock.AnimalGroups[1].Lactation;
                    numyoung = stock.AnimalGroups[1].NoFoetuses;
                }

                StockBuy purchase = new StockBuy();
                purchase.Genotype = ReflectionUtilities.EnumToString(Genotype);
                purchase.Number = NumStock;
                purchase.Sex = Sex;
                purchase.Age = Age;       // age in months
                purchase.Weight = Weight;  // liveweight in kg
                purchase.UseTag = 1;
                purchase.MatedTo = purchase.Genotype;
                purchase.Pregnant = preg;   // days pregnant
                purchase.Lactating = lact;  // days lactating
                purchase.NumYoung = numyoung;    // cows can be bought lactating with no young

                stock.Buy(purchase);

                stock.Move("Feedlot");

            

        }
    
    }
}
```
            Manager FeedStock
```csharp
using Models.Soils;
using System;
using Models.Core;
using Models.Utilities;
using Models.GrazPlan;
using APSIM.Shared.Utilities;
using System.Diagnostics;

namespace Models
{

    [Serializable]
    public class Script : Model
    {
        [Link] Clock clock;
        [Link] Stock stock;
        [Link] Supplement supplement;
        [Link] ISummary summary;
        [Link] Simulation farm;



        [EventSubscribe("DoManagement")]
        private void OnDoManagement(object sender, EventArgs e)
        {

           supplement.Feed("Hersom1Mix",10,"Feedlot");
        }
        
    }
}
```
            Forages
              Parameters:
                {Name=SurfaceOrganicMatter.Residue, LiveDigestibility=0.7, DeadDigestibility=0.3, LiveFractionConsumable=1, DeadFractionConsumable=1, LiveMinimumBiomass=100, DeadMinimumBiomass=0}
            Summary SummaryFile
            Zone Feedlot: same as Validation.Dairy.LUDF.Feedlot
            Report ValidationReport: EventNames=[Clock].DoReport
              VariableNames:
                [Clock].Today as Date
                [Clock].Today
                [Stock].NumberAll
                [Stock].WeightAll
                [Stock].IntakeAll.Weight
                sum of [Stock].IntakeAll.Weight from 1-may to 31-dec as TotalIntake
                diff of [Stock].WeightAll from 1-may to 31-dec as LiveWtGain
                [Weather].MaxT
                [Weather].MinT
        Experiment Hersom2
          Factors
            CompositeFactor HGW
              Specifications:
                [SetUpStock].Script.Age = 13
                [SetUpStock].Script.Weight = 395
            CompositeFactor LGW
              Specifications:
                [SetUpStock].Script.Age = 13
                [SetUpStock].Script.Weight = 333
            CompositeFactor NR
              Specifications:
                [SetUpStock].Script.Age = 13
                [SetUpStock].Script.Weight = 257
          Simulation Hersom2Base
            Memo Feedlot memo: same as Validation.Dairy.LUDF.Feedlot memo
            Clock: Start=2000-05-01; End=2000-12-21
            Weather: FileName=StillWater.met
            MicroClimate: a_interception=0; b_interception=1; c_interception=0; d_interception=0; SoilHeatFluxFraction=0.4; MinimumHeightDiffForNewLayer=0; NightInterceptionFraction=0.5; ReferenceHeight=2
            Supplement: SpoilageTime=0
              Stores:
                Name        Stored  IsRoughage  DMContent  DMD     MEContent  CPConc  ProtDg  PConc   SConc   EEConc  ADIP2CP  AshAlk  MaxPassage
                fodder      0       true        0.85       0       0          0       0       0       0       0       0        0       0
                hersom2mix  100000  false       1          0.7744  12.88      0.1348  0.4     0.0032  0.0024  0.032   0.114    0.6     0
            Stock: RandSeed=9999
            Manager SetUpStock: same as Validation.Beef.FeedlotTests.Hersom1.Hersom1Base.SetUpStock
            Manager FeedStock
```csharp
using Models.Soils;
using System;
using Models.Core;
using Models.Utilities;
using Models.GrazPlan;
using APSIM.Shared.Utilities;
using System.Diagnostics;

namespace Models
{

    [Serializable]
    public class Script : Model
    {
        [Link] Clock clock;
        [Link] Stock stock;
        [Link] Supplement supplement;
        [Link] ISummary summary;
        [Link] Simulation farm;



        [EventSubscribe("DoManagement")]
        private void OnDoManagement(object sender, EventArgs e)
        {

           supplement.Feed("Hersom2Mix",10,"Feedlot");
        }
        
    }
}
```
            Forages
              Parameters:
                {Name=SurfaceOrganicMatter.Residue, LiveDigestibility=0.7, DeadDigestibility=0.3, LiveFractionConsumable=1, DeadFractionConsumable=1, LiveMinimumBiomass=100, DeadMinimumBiomass=0}
            Summary SummaryFile
            Zone Feedlot: same as Validation.Dairy.LUDF.Feedlot
            Report ValidationReport: EventNames=[Clock].DoReport
              VariableNames:
                [Clock].Today as Date
                [Clock].Today
                [Stock].NumberAll
                [Stock].WeightAll
                [Stock].IntakeAll.Weight
                sum of [Stock].IntakeAll.Weight from 1-may to 31-dec as TotalIntake
                diff of [Stock].WeightAll from 1-may to 31-dec as LiveWtGain
        Experiment Sharman1
          Factors
            CompositeFactor CON
              Specifications:
                [SetUpStock].Script.Age = 13
                [SetUpStock].Script.Weight = 360
            CompositeFactor CORN
              Specifications:
                [SetUpStock].Script.Age = 13
                [SetUpStock].Script.Weight = 403
            CompositeFactor LGWP
              Specifications:
                [SetUpStock].Script.Age = 13
                [SetUpStock].Script.Weight = 354
            CompositeFactor HGWP
              Specifications:
                [SetUpStock].Script.Age = 13
                [SetUpStock].Script.Weight = 401
          Simulation Sharman1Base
            Memo Feedlot memo: same as Validation.Dairy.LUDF.Feedlot memo
            Clock: Start=2000-05-01; End=2000-12-21
            Weather: FileName=StillWater.met
            MicroClimate: a_interception=0; b_interception=1; c_interception=0; d_interception=0; SoilHeatFluxFraction=0.4; MinimumHeightDiffForNewLayer=0; NightInterceptionFraction=0.5; ReferenceHeight=2
            Supplement: SpoilageTime=0
              Stores:
                Name         Stored  IsRoughage  DMContent  DMD    MEContent  CPConc  ProtDg  PConc   SConc   EEConc  ADIP2CP  AshAlk  MaxPassage
                fodder       0       true        0.85       0      0          0       0       0       0       0       0        0       0
                sharman1mix  100000  false       1          0.744  12.01      0.156   0.4     0.0032  0.0024  0.0345  0.114    0.6     0
            Stock: RandSeed=9999
            Manager SetUpStock: same as Validation.Beef.FeedlotTests.Hersom1.Hersom1Base.SetUpStock
            Manager FeedStock
```csharp
using Models.Soils;
using System;
using Models.Core;
using Models.Utilities;
using Models.GrazPlan;
using APSIM.Shared.Utilities;
using System.Diagnostics;

namespace Models
{

    [Serializable]
    public class Script : Model
    {
        [Link] Clock clock;
        [Link] Stock stock;
        [Link] Supplement supplement;
        [Link] ISummary summary;
        [Link] Simulation farm;



        [EventSubscribe("DoManagement")]
        private void OnDoManagement(object sender, EventArgs e)
        {

           supplement.Feed("Sharman1Mix",10,"Feedlot");
        }
        
    }
}
```
            Forages
              Parameters:
                {Name=SurfaceOrganicMatter.Residue, LiveDigestibility=0.7, DeadDigestibility=0.3, LiveFractionConsumable=1, DeadFractionConsumable=1, LiveMinimumBiomass=100, DeadMinimumBiomass=0}
            Summary SummaryFile
            Zone Feedlot: same as Validation.Dairy.LUDF.Feedlot
            Report ValidationReport: same as Validation.Beef.FeedlotTests.Hersom1.Hersom1Base.ValidationReport
        Experiment Sharman2
          Factors
            CompositeFactor CON
              Specifications:
                [SetUpStock].Script.Age = 13
                [SetUpStock].Script.Weight = 386
            CompositeFactor CORN
              Specifications:
                [SetUpStock].Script.Age = 13
                [SetUpStock].Script.Weight = 367
            CompositeFactor LGWP
              Specifications:
                [SetUpStock].Script.Age = 13
                [SetUpStock].Script.Weight = 381
            CompositeFactor HGWP
              Specifications:
                [SetUpStock].Script.Age = 13
                [SetUpStock].Script.Weight = 371
          Simulation Sharman2Base
            Memo Feedlot memo: same as Validation.Dairy.LUDF.Feedlot memo
            Clock: Start=2000-05-01; End=2000-12-21
            Weather: FileName=StillWater.met
            MicroClimate: a_interception=0; b_interception=1; c_interception=0; d_interception=0; SoilHeatFluxFraction=0.4; MinimumHeightDiffForNewLayer=0; NightInterceptionFraction=0.5; ReferenceHeight=2
            Supplement: SpoilageTime=0
              Stores:
                Name         Stored  IsRoughage  DMContent  DMD    MEContent  CPConc  ProtDg  PConc   SConc   EEConc  ADIP2CP  AshAlk  MaxPassage
                fodder       0       true        0.85       0      0          0       0       0       0       0       0        0       0
                sharman2mix  100000  false       1          0.692  11.53      0.137   0.4     0.0032  0.0024  0.0439  0.114    0.6     0
            Stock: RandSeed=9999
            Manager SetUpStock: same as Validation.Beef.FeedlotTests.Hersom1.Hersom1Base.SetUpStock
            Manager FeedStock
```csharp
using Models.Soils;
using System;
using Models.Core;
using Models.Utilities;
using Models.GrazPlan;
using APSIM.Shared.Utilities;
using System.Diagnostics;

namespace Models
{

    [Serializable]
    public class Script : Model
    {
        [Link] Clock clock;
        [Link] Stock stock;
        [Link] Supplement supplement;
        [Link] ISummary summary;
        [Link] Simulation farm;



        [EventSubscribe("DoManagement")]
        private void OnDoManagement(object sender, EventArgs e)
        {

           supplement.Feed("Sharman2Mix",10,"Feedlot");
        }
        
    }
}
```
            Forages
              Parameters:
                {Name=SurfaceOrganicMatter.Residue, LiveDigestibility=0.7, DeadDigestibility=0.3, LiveFractionConsumable=1, DeadFractionConsumable=1, LiveMinimumBiomass=100, DeadMinimumBiomass=0}
            Summary SummaryFile
            Zone Feedlot: same as Validation.Dairy.LUDF.Feedlot
            Report ValidationReport: same as Validation.Beef.FeedlotTests.Hersom1.Hersom1Base.ValidationReport
        Experiment Coleman
          Factors
            CompositeFactor Silage
              Specifications:
                [SetUpStock].Script.Age = 13
                [SetUpStock].Script.Weight = 342.8
                [FeedStock].Script.Amount = 12
                [FeedStock].Script.FeedType = Grain
            CompositeFactor Grain
              Specifications:
                [SetUpStock].Script.Age = 13
                [SetUpStock].Script.Weight = 369
                [FeedStock].Script.Amount = 12
                [FeedStock].Script.FeedType = Grain
          Simulation ColemanBase
            Memo Feedlot memo: same as Validation.Dairy.LUDF.Feedlot memo
            Clock: Start=2000-05-01; End=2000-12-21
            Weather: FileName=StillWater.met
            MicroClimate: a_interception=0; b_interception=1; c_interception=0; d_interception=0; SoilHeatFluxFraction=0.4; MinimumHeightDiffForNewLayer=0; NightInterceptionFraction=0.5; ReferenceHeight=2
            Supplement: SpoilageTime=0
              Stores:
                Name    Stored  IsRoughage  DMContent  DMD     MEContent  CPConc  ProtDg  PConc   SConc   EEConc  ADIP2CP  AshAlk  MaxPassage
                fodder  0       true        0.85       0       0          0       0       0       0       0       0        0       0
                silage  100000  false       1          0.76    13.05      0.134   0.4     0.0032  0.0024  0.068   0.114    0.6     0
                grain   100000  false       1          0.6945  11.36      0.13    0.4     0.0032  0.0024  0.035   0.114    0.6     0
            Stock: RandSeed=9999
            Manager SetUpStock: same as Validation.Beef.FeedlotTests.Hersom1.Hersom1Base.SetUpStock
            Manager FeedStock
              Amount = 10
              FeedType = Grain
```csharp
using Models.Soils;
using System;
using Models.Core;
using Models.Utilities;
using Models.GrazPlan;
using APSIM.Shared.Utilities;
using System.Diagnostics;

namespace Models
{

    [Serializable]
    public class Script : Model
    {
        [Link] Clock clock;
        [Link] Stock stock;
        [Link] Supplement supplement;
        [Link] ISummary summary;
        [Link] Simulation farm;

        [Description("Daily Feed Amount (kg):")] 
        public double Amount { get; set; }

        [Description("Feed Type:")] 
        public string FeedType { get; set; }

        [EventSubscribe("DoManagement")]
        private void OnDoManagement(object sender, EventArgs e)
        {

           supplement.Feed(FeedType, Amount,"Feedlot");
        }
        
    }
}
```
            Forages
              Parameters:
                {Name=SurfaceOrganicMatter.Residue, LiveDigestibility=0.7, DeadDigestibility=0.3, LiveFractionConsumable=1, DeadFractionConsumable=1, LiveMinimumBiomass=100, DeadMinimumBiomass=0}
            Summary SummaryFile
            Zone Feedlot: same as Validation.Dairy.LUDF.Feedlot
            Report ValidationReport: EventNames=[Clock].DoReport
              VariableNames:
                [Clock].Today as Date
                [Clock].Today
                [Stock].NumberAll
                [Stock].WeightAll
                [Stock].IntakeAll.Weight
                sum of [Stock].IntakeAll.Weight from 1-may to 31-dec as TotalIntake
                diff of [Stock].WeightAll from 1-may to 31-dec as LiveWtGain
                [Weather].MaxT
                [Weather].MinT
                [FeedStock].Script.FeedType
        Experiment Paco
          Factors
            CompositeFactor CA2
              Specifications:
                [SetUpStock].Script.Age = 13
                [SetUpStock].Script.Weight = 350
                [FeedStock].Script.Amount = 12
            CompositeFactor CA4
              Specifications:
                [SetUpStock].Script.Age = 13
                [SetUpStock].Script.Weight = 324
                [FeedStock].Script.Amount = 12
            CompositeFactor CLIM5
              Specifications:
                [SetUpStock].Script.Age = 13
                [SetUpStock].Script.Weight = 322
                [FeedStock].Script.Amount = 8.02
            CompositeFactor RFA7
              Specifications:
                [SetUpStock].Script.Age = 13
                [SetUpStock].Script.Weight = 324
                [FeedStock].Script.Amount = 11.73
            CompositeFactor RFA8
              Specifications:
                [SetUpStock].Script.Age = 13
                [SetUpStock].Script.Weight = 326
                [FeedStock].Script.Amount = 7.68
          Simulation PacoBase
            Memo Feedlot memo: same as Validation.Dairy.LUDF.Feedlot memo
            Clock: Start=2000-05-01; End=2000-12-21
            Weather: FileName=StillWater.met
            MicroClimate: a_interception=0; b_interception=1; c_interception=0; d_interception=0; SoilHeatFluxFraction=0.4; MinimumHeightDiffForNewLayer=0; NightInterceptionFraction=0.5; ReferenceHeight=2
            Supplement: SpoilageTime=0
              Stores:
                Name    Stored  IsRoughage  DMContent  DMD     MEContent  CPConc  ProtDg  PConc   SConc   EEConc  ADIP2CP  AshAlk  MaxPassage
                fodder  0       true        0.85       0       0          0       0       0       0       0       0        0       0
                high    100000  false       1          0.7744  12.78      0.146   0.67    0.0032  0.0024  0.05    0.063    0.6     0
            Stock: RandSeed=9999
            Manager SetUpStock: same as Validation.Beef.FeedlotTests.Hersom1.Hersom1Base.SetUpStock
            Manager FeedStock
              Amount = 10
```csharp
using Models.Soils;
using System;
using Models.Core;
using Models.Utilities;
using Models.GrazPlan;
using APSIM.Shared.Utilities;
using System.Diagnostics;

namespace Models
{

    [Serializable]
    public class Script : Model
    {
        [Link] Clock clock;
        [Link] Stock stock;
        [Link] Supplement supplement;
        [Link] ISummary summary;
        [Link] Simulation farm;

        [Description("Daily Feed Amount (kg):")] 
        public double Amount { get; set; }

        [EventSubscribe("DoManagement")]
        private void OnDoManagement(object sender, EventArgs e)
        {
           supplement.Feed("High",Amount,"Feedlot");
        }
        
    }
}
```
            Forages
              Parameters:
                {Name=SurfaceOrganicMatter.Residue, LiveDigestibility=0.7, DeadDigestibility=0.3, LiveFractionConsumable=1, DeadFractionConsumable=1, LiveMinimumBiomass=100, DeadMinimumBiomass=0}
            Summary SummaryFile
            Zone Feedlot: same as Validation.Dairy.LUDF.Feedlot
            Report ValidationReport: same as Validation.Beef.FeedlotTests.Hersom1.Hersom1Base.ValidationReport
    Folder Sheep
      PredictedObserved SheepPredictedObserved: PredictedTableName=ValidationReport; ObservedTableName=ValidationData; FieldNameUsedForMatch=SimulationName; FieldName2UsedForMatch=Date; AllColumns=false
      Experiment Thomas2007
        Factors
          CompositeFactor OMD55
            Specifications:
              [SetUpStock].Script.Age = 18
              [SetUpStock].Script.Weight = 53.6
              [FeedingOperations]
            Operations FeedingOperations
              2005-10-21  [Supplement].Feed("OMD55", 10,"Feedlot");
              2005-10-22  [Supplement].Feed("OMD55", 10,"Feedlot");
              2005-10-23  [Supplement].Feed("OMD55", 10,"Feedlot");
              2005-10-24  [Supplement].Feed("OMD55", 10,"Feedlot");
              2005-10-25  [Supplement].Feed("OMD55", 10,"Feedlot");
              2005-10-26  [Supplement].Feed("OMD55", 10,"Feedlot");
              2005-10-27  [Supplement].Feed("OMD55", 10,"Feedlot");
              2005-10-28  [Supplement].Feed("OMD55", 10,"Feedlot");
              2005-10-29  [Supplement].Feed("OMD55", 10,"Feedlot");
              2005-10-30  [Supplement].Feed("OMD55", 10,"Feedlot");
              2005-10-31  [Supplement].Feed("OMD55", 10,"Feedlot");
              2005-11-01  [Supplement].Feed("OMD55", 10,"Feedlot");
              2005-11-02  [Supplement].Feed("OMD55", 10,"Feedlot");
              2005-11-03  [Supplement].Feed("OMD55", 10,"Feedlot");
              2005-11-04  [Supplement].Feed("OMD55", 10,"Feedlot");
              2005-11-05  [Supplement].Feed("OMD55", 10,"Feedlot");
              2005-11-06  [Supplement].Feed("OMD55", 10,"Feedlot");
              2005-11-07  [Supplement].Feed("OMD55", 10,"Feedlot");
              2005-11-08  [Supplement].Feed("OMD55", 10,"Feedlot");
              2005-11-09  [Supplement].Feed("OMD55", 10,"Feedlot");
              2005-11-10  [Supplement].Feed("OMD55", 10,"Feedlot");
              2005-11-11  [Supplement].Feed("OMD55", 10,"Feedlot");
              2005-11-12  [Supplement].Feed("OMD55", 10,"Feedlot");
              2005-11-13  [Supplement].Feed("OMD55", 10,"Feedlot");
              2005-11-14  [Supplement].Feed("OMD55", 10,"Feedlot");
              2005-11-15  [Supplement].Feed("OMD55", 10,"Feedlot");
              2005-11-16  [Supplement].Feed("OMD55", 10,"Feedlot");
              2005-11-17  [Supplement].Feed("OMD55", 10,"Feedlot");
              2005-11-18  [Supplement].Feed("OMD55", 10,"Feedlot");
              2005-11-19  [Supplement].Feed("OMD55", 10,"Feedlot");
              2005-11-20  [Supplement].Feed("OMD55", 10,"Feedlot");
              2005-11-21  [Supplement].Feed("OMD55", 10,"Feedlot");
              2005-11-22  [Supplement].Feed("OMD55", 10,"Feedlot");
              2005-11-23  [Supplement].Feed("OMD55", 10,"Feedlot");
              2005-11-24  [Supplement].Feed("OMD55", 10,"Feedlot");
              2005-11-25  [Supplement].Feed("OMD55", 10,"Feedlot");
              2005-11-26  [Supplement].Feed("OMD55", 1.27,"Feedlot");
              2005-11-27  [Supplement].Feed("OMD55", 1.27,"Feedlot");
              2005-11-28  [Supplement].Feed("OMD55", 1.27,"Feedlot");
              2005-11-29  [Supplement].Feed("OMD55", 1.27,"Feedlot");
              2005-11-30  [Supplement].Feed("OMD55", 1.27,"Feedlot");
              2005-12-01  [Supplement].Feed("OMD55", 1.27,"Feedlot");
              2005-12-02  [Supplement].Feed("OMD55", 1.27,"Feedlot");
          CompositeFactor OMD62
            Specifications:
              [SetUpStock].Script.Age = 18
              [SetUpStock].Script.Weight = 53.3
              [FeedingOperations]
            Operations FeedingOperations
              2005-10-21  [Supplement].Feed("OMD62", 10,"Feedlot");
              2005-10-22  [Supplement].Feed("OMD62", 10,"Feedlot");
              2005-10-23  [Supplement].Feed("OMD62", 10,"Feedlot");
              2005-10-24  [Supplement].Feed("OMD62", 10,"Feedlot");
              2005-10-25  [Supplement].Feed("OMD62", 10,"Feedlot");
              2005-10-26  [Supplement].Feed("OMD62", 10,"Feedlot");
              2005-10-27  [Supplement].Feed("OMD62", 10,"Feedlot");
              2005-10-28  [Supplement].Feed("OMD62", 10,"Feedlot");
              2005-10-29  [Supplement].Feed("OMD62", 10,"Feedlot");
              2005-10-30  [Supplement].Feed("OMD62", 10,"Feedlot");
              2005-10-31  [Supplement].Feed("OMD62", 10,"Feedlot");
              2005-11-01  [Supplement].Feed("OMD62", 10,"Feedlot");
              2005-11-02  [Supplement].Feed("OMD62", 10,"Feedlot");
              2005-11-03  [Supplement].Feed("OMD62", 10,"Feedlot");
              2005-11-04  [Supplement].Feed("OMD62", 10,"Feedlot");
              2005-11-05  [Supplement].Feed("OMD62", 10,"Feedlot");
              2005-11-06  [Supplement].Feed("OMD62", 10,"Feedlot");
              2005-11-07  [Supplement].Feed("OMD62", 10,"Feedlot");
              2005-11-08  [Supplement].Feed("OMD62", 10,"Feedlot");
              2005-11-09  [Supplement].Feed("OMD62", 10,"Feedlot");
              2005-11-10  [Supplement].Feed("OMD62", 10,"Feedlot");
              2005-11-11  [Supplement].Feed("OMD62", 10,"Feedlot");
              2005-11-12  [Supplement].Feed("OMD62", 10,"Feedlot");
              2005-11-13  [Supplement].Feed("OMD62", 10,"Feedlot");
              2005-11-14  [Supplement].Feed("OMD62", 10,"Feedlot");
              2005-11-15  [Supplement].Feed("OMD62", 10,"Feedlot");
              2005-11-16  [Supplement].Feed("OMD62", 10,"Feedlot");
              2005-11-17  [Supplement].Feed("OMD62", 10,"Feedlot");
              2005-11-18  [Supplement].Feed("OMD62", 10,"Feedlot");
              2005-11-19  [Supplement].Feed("OMD62", 10,"Feedlot");
              2005-11-20  [Supplement].Feed("OMD62", 10,"Feedlot");
              2005-11-21  [Supplement].Feed("OMD62", 10,"Feedlot");
              2005-11-22  [Supplement].Feed("OMD62", 10,"Feedlot");
              2005-11-23  [Supplement].Feed("OMD62", 10,"Feedlot");
              2005-11-24  [Supplement].Feed("OMD62", 10,"Feedlot");
              2005-11-25  [Supplement].Feed("OMD62", 10,"Feedlot");
              2005-11-26  [Supplement].Feed("OMD62", 1.27,"Feedlot");
              2005-11-27  [Supplement].Feed("OMD62", 1.27,"Feedlot");
              2005-11-28  [Supplement].Feed("OMD62", 1.27,"Feedlot");
              2005-11-29  [Supplement].Feed("OMD62", 1.27,"Feedlot");
              2005-11-30  [Supplement].Feed("OMD62", 1.27,"Feedlot");
              2005-12-01  [Supplement].Feed("OMD62", 1.27,"Feedlot");
              2005-12-02  [Supplement].Feed("OMD62", 1.27,"Feedlot");
          CompositeFactor OMD69
            Specifications:
              [SetUpStock].Script.Age = 18
              [SetUpStock].Script.Weight = 55.6
              [FeedingOperations]
            Operations FeedingOperations
              2005-10-21  [Supplement].Feed("OMD69", 10,"Feedlot");
              2005-10-22  [Supplement].Feed("OMD69", 10,"Feedlot");
              2005-10-23  [Supplement].Feed("OMD69", 10,"Feedlot");
              2005-10-24  [Supplement].Feed("OMD69", 10,"Feedlot");
              2005-10-25  [Supplement].Feed("OMD69", 10,"Feedlot");
              2005-10-26  [Supplement].Feed("OMD69", 10,"Feedlot");
              2005-10-27  [Supplement].Feed("OMD69", 10,"Feedlot");
              2005-10-28  [Supplement].Feed("OMD69", 10,"Feedlot");
              2005-10-29  [Supplement].Feed("OMD69", 10,"Feedlot");
              2005-10-30  [Supplement].Feed("OMD69", 10,"Feedlot");
              2005-10-31  [Supplement].Feed("OMD69", 10,"Feedlot");
              2005-11-01  [Supplement].Feed("OMD69", 10,"Feedlot");
              2005-11-02  [Supplement].Feed("OMD69", 10,"Feedlot");
              2005-11-03  [Supplement].Feed("OMD69", 10,"Feedlot");
              2005-11-04  [Supplement].Feed("OMD69", 10,"Feedlot");
              2005-11-05  [Supplement].Feed("OMD69", 10,"Feedlot");
              2005-11-06  [Supplement].Feed("OMD69", 10,"Feedlot");
              2005-11-07  [Supplement].Feed("OMD69", 10,"Feedlot");
              2005-11-08  [Supplement].Feed("OMD69", 10,"Feedlot");
              2005-11-09  [Supplement].Feed("OMD69", 10,"Feedlot");
              2005-11-10  [Supplement].Feed("OMD69", 10,"Feedlot");
              2005-11-11  [Supplement].Feed("OMD69", 10,"Feedlot");
              2005-11-12  [Supplement].Feed("OMD69", 10,"Feedlot");
              2005-11-13  [Supplement].Feed("OMD69", 10,"Feedlot");
              2005-11-14  [Supplement].Feed("OMD69", 10,"Feedlot");
              2005-11-15  [Supplement].Feed("OMD69", 10,"Feedlot");
              2005-11-16  [Supplement].Feed("OMD69", 10,"Feedlot");
              2005-11-17  [Supplement].Feed("OMD69", 10,"Feedlot");
              2005-11-18  [Supplement].Feed("OMD69", 10,"Feedlot");
              2005-11-19  [Supplement].Feed("OMD69", 10,"Feedlot");
              2005-11-20  [Supplement].Feed("OMD69", 10,"Feedlot");
              2005-11-21  [Supplement].Feed("OMD69", 10,"Feedlot");
              2005-11-22  [Supplement].Feed("OMD69", 10,"Feedlot");
              2005-11-23  [Supplement].Feed("OMD69", 10,"Feedlot");
              2005-11-24  [Supplement].Feed("OMD69", 10,"Feedlot");
              2005-11-25  [Supplement].Feed("OMD69", 10,"Feedlot");
              2005-11-26  [Supplement].Feed("OMD69", 1.27,"Feedlot");
              2005-11-27  [Supplement].Feed("OMD69", 1.27,"Feedlot");
              2005-11-28  [Supplement].Feed("OMD69", 1.27,"Feedlot");
              2005-11-29  [Supplement].Feed("OMD69", 1.27,"Feedlot");
              2005-11-30  [Supplement].Feed("OMD69", 1.27,"Feedlot");
              2005-12-01  [Supplement].Feed("OMD69", 1.27,"Feedlot");
              2005-12-02  [Supplement].Feed("OMD69", 1.27,"Feedlot");
          CompositeFactor OMD76
            Specifications:
              [SetUpStock].Script.Age = 18
              [SetUpStock].Script.Weight = 54
              [FeedingOperations]
            Operations FeedingOperations
              2005-10-21  [Supplement].Feed("OMD76", 10,"Feedlot");
              2005-10-22  [Supplement].Feed("OMD76", 10,"Feedlot");
              2005-10-23  [Supplement].Feed("OMD76", 10,"Feedlot");
              2005-10-24  [Supplement].Feed("OMD76", 10,"Feedlot");
              2005-10-25  [Supplement].Feed("OMD76", 10,"Feedlot");
              2005-10-26  [Supplement].Feed("OMD76", 10,"Feedlot");
              2005-10-27  [Supplement].Feed("OMD76", 10,"Feedlot");
              2005-10-28  [Supplement].Feed("OMD76", 10,"Feedlot");
              2005-10-29  [Supplement].Feed("OMD76", 10,"Feedlot");
              2005-10-30  [Supplement].Feed("OMD76", 10,"Feedlot");
              2005-10-31  [Supplement].Feed("OMD76", 10,"Feedlot");
              2005-11-01  [Supplement].Feed("OMD76", 10,"Feedlot");
              2005-11-02  [Supplement].Feed("OMD76", 10,"Feedlot");
              2005-11-03  [Supplement].Feed("OMD76", 10,"Feedlot");
              2005-11-04  [Supplement].Feed("OMD76", 10,"Feedlot");
              2005-11-05  [Supplement].Feed("OMD76", 10,"Feedlot");
              2005-11-06  [Supplement].Feed("OMD76", 10,"Feedlot");
              2005-11-07  [Supplement].Feed("OMD76", 10,"Feedlot");
              2005-11-08  [Supplement].Feed("OMD76", 10,"Feedlot");
              2005-11-09  [Supplement].Feed("OMD76", 10,"Feedlot");
              2005-11-10  [Supplement].Feed("OMD76", 10,"Feedlot");
              2005-11-11  [Supplement].Feed("OMD76", 10,"Feedlot");
              2005-11-12  [Supplement].Feed("OMD76", 10,"Feedlot");
              2005-11-13  [Supplement].Feed("OMD76", 10,"Feedlot");
              2005-11-14  [Supplement].Feed("OMD76", 10,"Feedlot");
              2005-11-15  [Supplement].Feed("OMD76", 10,"Feedlot");
              2005-11-16  [Supplement].Feed("OMD76", 10,"Feedlot");
              2005-11-17  [Supplement].Feed("OMD76", 10,"Feedlot");
              2005-11-18  [Supplement].Feed("OMD76", 10,"Feedlot");
              2005-11-19  [Supplement].Feed("OMD76", 10,"Feedlot");
              2005-11-20  [Supplement].Feed("OMD76", 10,"Feedlot");
              2005-11-21  [Supplement].Feed("OMD76", 10,"Feedlot");
              2005-11-22  [Supplement].Feed("OMD76", 10,"Feedlot");
              2005-11-23  [Supplement].Feed("OMD76", 10,"Feedlot");
              2005-11-24  [Supplement].Feed("OMD76", 10,"Feedlot");
              2005-11-25  [Supplement].Feed("OMD76", 10,"Feedlot");
              2005-11-26  [Supplement].Feed("OMD76", 1.27,"Feedlot");
              2005-11-27  [Supplement].Feed("OMD76", 1.27,"Feedlot");
              2005-11-28  [Supplement].Feed("OMD76", 1.27,"Feedlot");
              2005-11-29  [Supplement].Feed("OMD76", 1.27,"Feedlot");
              2005-11-30  [Supplement].Feed("OMD76", 1.27,"Feedlot");
              2005-12-01  [Supplement].Feed("OMD76", 1.27,"Feedlot");
              2005-12-02  [Supplement].Feed("OMD76", 1.27,"Feedlot");
        Simulation Thomas2007Base
          Memo Feedlot memo: same as Validation.Dairy.LUDF.Feedlot memo
          Clock: Start=2005-10-21; End=2005-12-02
          Weather: FileName=Perth.met
          MicroClimate: a_interception=0; b_interception=1; c_interception=0; d_interception=0; SoilHeatFluxFraction=0.4; MinimumHeightDiffForNewLayer=0; NightInterceptionFraction=0.5; ReferenceHeight=2
          Operations FeedingOperations
          Supplement: SpoilageTime=0
            Stores:
              Name    Stored  IsRoughage  DMContent  DMD    MEContent  CPConc  ProtDg  PConc   SConc   EEConc  ADIP2CP  AshAlk  MaxPassage
              fodder  0       true        0.85       0      0          0       0       0       0       0       0        0       0
              omd55   100000  false       1          0.588  8.4        0.105   0.8     0.0032  0.0024  0.02    0.114    0.6     0
              omd62   100000  false       1          0.636  9.2        0.125   0.8     0.0032  0.0024  0.02    0.114    0.6     0
              omd69   100000  false       1          0.696  10.3       0.144   0.8     0.0032  0.0024  0.02    0.114    0.6     0
              omd76   100000  false       1          0.702  10.4       0.133   0.8     0.0032  0.0024  0.02    0.114    0.6     0
          Stock: RandSeed=9999
          Manager SetUpStock
            Genotype = Large Merino
            Sex = Castrate
            Age = 18
            Weight = 51.2
            Pregnant = 0
            Lactating = 0
            NumYoung = 0
            NumStock = 1
```csharp
using System.Linq;
using System;
using System.Collections.Generic;
using Models.Core;

using Models.Functions;
using Models.Soils;
using Models.Utilities;
using Models.GrazPlan;
using APSIM.Shared.Utilities;
using System.Diagnostics;


namespace Models
{

    [Serializable]
    public class Script : Model
    {
        [Link] Clock clock;
        [Link] Stock stock;
        [Link] Supplement supplement;
        [Link] ISummary summary;
        [Link] Simulation farm;

       

        [Separator("Stock type info, the same type of stock are brought onto the paddock at each grazing")]
        [Description("Stock: genotype (e.g. Small Merino, Angus, Friesian):")] 
        [Display(Values = "GetGenotypes")]
        public string Genotype { get; set; }

        [Description("Stock: sex (Female, Male, Castrate):")] 
        public ReproductiveType Sex { get; set; }

        [Description("Stock: age (months):")] 
        public double Age { get; set; }

        [Description("Stock: weight (kg liveweight /head):")] 
        public double Weight { get; set; }

        [Description("Stock: fertility status (0 if non-pregnant or days since conception):")] 
        public int Pregnant { get; set; }

        [Description("Stock: lactation status (0 if non-lactating or days since parturition):")]
        public int Lactating { get; set; }

        [Description("Stock: Number of young (foetuses or calves):")]
        public int NumYoung { get; set; }

        [Description("Stock: Number of animals:")]
        public int NumStock { get; set; }
        
        
        // <summary>Return a list of genotypes to the properties tab.</summary>
        public string[] GetGenotypes()
        {
            if (stock != null)
                return stock.Genotypes.Names.ToArray();
            return null;
        }

        [EventSubscribe("StartOfSimulation")]
        private void OnStartOfSimulation(object sender, EventArgs e)
        {

                int preg = Pregnant;
                int lact = Lactating;
                int numyoung = NumYoung;

                if (stock.AnimalGroups.Count == 2)
                {
                    preg = stock.AnimalGroups[1].Pregnancy;
                    lact = stock.AnimalGroups[1].Lactation;
                    numyoung = stock.AnimalGroups[1].NoFoetuses;
                }

                StockBuy purchase = new StockBuy();
                purchase.Genotype = Genotype; 
                purchase.Number = NumStock;
                purchase.Sex = Sex;
                purchase.Age = Age;       // age in months
                purchase.Weight = Weight;  // liveweight in kg
                purchase.UseTag = 1;
                purchase.MatedTo = purchase.Genotype;
                purchase.Pregnant = preg;   // days pregnant
                purchase.Lactating = lact;  // days lactating
                purchase.NumYoung = numyoung;    // cows can be bought lactating with no young

                stock.Buy(purchase);

                stock.Move("Feedlot");

            

        }
    
    }
}
```
          Forages
            Parameters:
              {Name=SurfaceOrganicMatter.Residue, LiveDigestibility=0.7, DeadDigestibility=0.3, LiveFractionConsumable=1, DeadFractionConsumable=1, LiveMinimumBiomass=100, DeadMinimumBiomass=0}
          Summary SummaryFile
          Zone Feedlot: same as Validation.Dairy.LUDF.Feedlot
          Report ValidationReport: EventNames=[Clock].DoReport
            VariableNames:
              [Clock].Today as Date
              [Clock].Today
              [Stock].NumberAll
              [Stock].WeightAll
              [Stock].IntakeAll.Weight
              sum of [Stock].IntakeAll.Weight from 21-oct to 2-dec as TotalIntake
              diff of [Stock].WeightAll from 21-oct to 2-dec as LiveWtGain
              [Weather].MaxT
              [Weather].MinT
  Folder Sensibility
    Memo
      This sensibility test explores dual-purpose wheat in a high rainfall livestock system in south-eastern Australia.

      It is based on [#Sprague2015]

      _Sheep grazing wheat and fed in feedlot_

      In this example simulation sheep are bought and sold on specified date.
      They are fed supplement in a feedlot at a set rate, but graze a wheat crop when crop biomass >= 2.4 t/ha.
      Sheep are moved from the wheat crop and back to feedlot when crop biomass reaches 0.5 t/ha or crop zadok = 31.

      _Activities in this manager:_

      1. Buy animals at start of year & put in feedlot
      2. Move animals from feedlot to crop when ready to graze
      3. Move animals from crop to feedlot
      4. Shear all animals on specified date
      5. Sell all animals at end of year

      _NOTES_

      1. When the animals are in the feedlot and an animal dies during the day, the supplement has already been fed into the feedlot
         based on the number of animals in the feedlot at the start of the day. This means the remaining animals have access to slightly
         more supplement and causes a spike in supp intake graph.
      2. When sheep are culled for age + purchased to maintain stocking rate, several groups of sheep are created.
         This causes irregular amounts of supplement to be fed.
    Simulation WheatSheepFeedlot
      Clock: Start=2000-01-01; End=2012-06-30
      Summary SummaryFile
      Weather: FileName=%root%/Tests/WeatherFiles/Ginninderra.met
      SoilArbitrator
      Stock: RandSeed=9999
      Forages
        Parameters:
          Name                          LiveDigestibility  DeadDigestibility  LiveFractionConsumable  DeadFractionConsumable  LiveMinimumBiomass  DeadMinimumBiomass
          SurfaceOrganicMatter.Residue  0.7                0.3                1                       1                       100                 0
          Wheat.Grain                   0.7                0.3                1                       1                       100                 0
          Wheat.Root                    0.7                0.3                1                       1                       100                 0
          Wheat.Leaf                    0.7                0.3                1                       1                       100                 0
          Wheat.Spike                   0.7                0.3                1                       1                       100                 0
          Wheat.Stem                    0.7                0.3                1                       1                       100                 0
      Supplement: SpoilageTime=0
        Stores:
          Name            Stored  IsRoughage  DMContent  DMD  MEContent  CPConc  ProtDg  PConc   SConc   EEConc  ADIP2CP  AshAlk  MaxPassage
          fodder          0       true        0.85       0    0          0       0       0       0       0       0        0       0
          wheat, crushed  500     false       1          0.9  13.8       0.14    0.92    0.0038  0.0014  0.02    0.02     0.18    0
      Manager ManageStock
        Buying = True
        Genotype = Small Merino
        Sex = Female
        BuyDate = 1-Jan
        BuyAge = 12
        BuyWeight = 30
        BuyLactating = 0
        NumAntoBuy = 50
        Selling = True
        SaleFirstDate = 20-Dec
        SaleLastDate = 20-Dec
        SellPolicy = CulledForAge
        SaleAge = 36
        SaleWeight = -
        SalePercentAnimals = 100
        PaddockToMoveAnimalsTo = [WheatSheep]
        GrazingWindowStartDate = 1-Jan
        GrazingWindowEndDate = 31-Dec
        ExpressionToMoveAnimalsToField = Wheat.Phenology.Zadok > 0 && Wheat.Phenology.Zadok < 31 && Wheat.AboveGround.Wt >= 240
        ExpressionToMoveAnimalsToFeedlot = Wheat.Phenology.Zadok >= 31 || Wheat.AboveGround.Wt <= 50
        ShearDate = 15-dec
        Dummy =
```csharp
/*-------------------------------------------------------------------------------------
Sheep grazing wheat when conditions are suitable, and in feedlot the rest of the time.
---------------------------------------------------------------------------------------

In this script animals are bought and sold within a specified date window.
They are fed supplement in a feedlot at a set rate, but graze a wheat crop when a criteria is met.
Animals are moved from the wheat crop and back to feedlot when a second criteria is met.

Based on Sprague SJ, Kirkegaard JA, Dove H, Graham JM, McDonald SE, Kelman WM (2015) Integrating dual-purpose wheat and canola into high-rainfall livestock systems in south-eastern Australia. 1. Crop forage and grain yield. Crop and Pasture Science 66(4), 365-376. 

Activities in this manager:
1. Buy animals at start of year & put in feedlot
2. Move animals from feedlot to crop when ready to graze
3. Move animals from crop to feedlot 
4. Shear all animals on specified date
5. Sell all animals at end of year

NOTES
1. When the animals are in the feedlot and an animal dies during the day, the supplement has already been fed into the feedlot
   based on the number of animals in the feedlot at the start of the day. This means the remaining animals have access to slightly
   more supplement and causes a spike in supp intake graph
2. When sheep are culled for age + purchased to maintain stocking rate, several groups of sheep are created.
   This causes irregular amounts of supplement to be fed.
--------------------------------------------------------------------------------------*/


using System.Linq;
using System;
using System.Collections.Generic;
using Models.Core;
using Models.PMF;
using Models.Functions;
using Models.Soils;
using Models.Utilities;
using Models.GrazPlan;
using APSIM.Shared.Utilities;
using System.Diagnostics;

namespace Models
{
    [Serializable]
    [Description(
        "<p><b>Animals grazing a crop when conditions are suitable, and in feedlot the rest of the time.</b></p>" +
        "In this script animals are bought and sold within a specified date window. " +
        "They are fed supplement in a feedlot at a set rate, but graze a wheat crop when a criteria is met. " +
        "Animals are moved from the wheat crop and back to feedlot when a second criteria is met.")]    
    public class Script : Model
    {
        [Link] Clock clock;
        [Link] Stock Animals;
        [Link] Supplement Feed;
        [Link] Summary Summary;
        [Link] IPlant plant;
        [Link] Soil Soil;
        [Link] Zone Paddock;

        private IBooleanFunction expressionMoveAnimalsToField;
        private IBooleanFunction expressionMoveAnimalsToFeedlot;

        public enum SellPolicyType
        {
            Date,
            PercentageHerdWhenAverageWeightGreaterThan,
            PercentageHerdWhenAverageAgeGreaterThan,
            CulledForAge,
            CulledForWeight,
            SellYoung
        }

        ////////////////////////////////////////////////////////
        [Separator("Buying of animals")]

        [Description("Buy animals?")] 
        public bool Buying { get; set; }

        [Description("Stock: genotype (e.g. Small Merino, Angus, Friesian):")] 
        [Display(Values = "GetGenotypes")]
        public string Genotype { get; set; }

        [Description("Stock: sex (Female, Male, Castrate):")] 
        public ReproductiveType Sex { get; set; }

        [Description("Date to buy animals (dd-mmm)")] 
        [Display(EnabledCallback = "BuyingEnabled")]
        public string BuyDate { get; set; }

        [Description("Age of bought animals (months): ")] 
        [Display(EnabledCallback = "BuyingEnabled")]
        public double BuyAge { get; set; }

        [Description("Weight of bought animals (kg): ")] 
        [Display(EnabledCallback = "BuyingEnabled")]
        public double BuyWeight { get; set; }

        [Description("Zero denotes not lactating; 1 or more denotes the time (days) since parturition:")] 
        [Display(EnabledCallback = "BuyingEnabled")]
        public int BuyLactating { get; set; }

        [Description("Number of animals to buy: ")] 
        [Display(EnabledCallback = "BuyingEnabled")]
        public int NumAntoBuy { get; set; }

        ////////////////////////////////////////////////////////
        [Separator("Selling of animals")]

        [Description("Selling animals?")] 
        public bool Selling { get; set; }

        [Description("First date to consider selling animals (dd-mmm)")] 
        public string SaleFirstDate { get; set; }

        [Description("Last date to consider selling animals (dd-mmm)")] 
        public string SaleLastDate { get; set; }

        [Description("Selling policy ")] 
        [Display(EnabledCallback = "SellingEnabled")]
        public SellPolicyType SellPolicy { get; set; }

        [Description("Age at which to sell (months): ")] 
        [Display(EnabledCallback = "SellingAgeEnabled")]
        public int SaleAge { get; set; }

        [Description("Weight at which to sell (kg): ")] 
        [Display(EnabledCallback = "SellingWeightEnabled")]
        public double SaleWeight { get; set; }

        [Description("Percentage of animals to sell (%)")] 
        [Display(EnabledCallback = "SellingEnabled")]
        public double SalePercentAnimals { get; set; }

        ////////////////////////////////////////////////////////
        [Separator("Rule for moving animals into and out of paddock")]

        [Description("Name of paddock to move animals in to:")] 
        [Display(Type = DisplayType.Model, ModelType = typeof(Zone))]
        public IModel PaddockToMoveAnimalsTo { get; set; }

        [Description("First date to consider moving animals:")] 
        public string GrazingWindowStartDate { get; set; }

        [Description("Last date to consider moving animals:")] 
        public string GrazingWindowEndDate { get; set; }

        [Description("Criteria to move animals to field")]
        public string ExpressionToMoveAnimalsToField { get; set; }

        [Description("Criteria to move animals to feedlot")]
        public string ExpressionToMoveAnimalsToFeedlot { get; set; }


        ////////////////////////////////////////////////////////
        [Separator("Shearing")]
        [Description("Date to shear animals (dd-mmm)")] 
        public string ShearDate { get; set; }

        [Description(" ")] 
        public string Dummy { get; set; }

        ////////////////////////////////////////////////////////////////////////////
        // Callback properties to control disabling of properties.
        ////////////////////////////////////////////////////////////////////////////
        public bool BuyingEnabled { get { return Buying; } }

        public bool SellingEnabled { get { return Selling; } }

        public bool SellingAgeEnabled
        { 
            get
            { 
                return Selling &&
                (SellPolicy == SellPolicyType.PercentageHerdWhenAverageAgeGreaterThan || SellPolicy == SellPolicyType.CulledForAge);
            } 
        }

        public bool SellingWeightEnabled
        { 
            get
            { 
                return Selling &&
                (SellPolicy == SellPolicyType.PercentageHerdWhenAverageWeightGreaterThan || SellPolicy == SellPolicyType.CulledForWeight);
            } 
        }

        ////////////////////////////////////////////////////////////////////////////
        // Outputs
        ////////////////////////////////////////////////////////////////////////////
        // <summary>Number of animals sold.</summary>
        public int NumberSold { get; set; }

        // <summary>Description of something that has happened.</summary>
        public string EventName { get; set; }

        // <summary>Return a list of genotypes to the properties tab.</summary>
        public string[] GetGenotypes()
        {
            if (Animals != null)
                return Animals.Genotypes.Names.ToArray();
            return null;
        }

        public string CurrentLocation { get; set; }  // location of the sheep



        // ============================================================
        // Called once at beginning of simulation run
        // ============================================================
        [EventSubscribe("StartOfSimulation")]
        private void OnStartOfSimulation(object sender, EventArgs e)
        {
            if (string.IsNullOrEmpty(ExpressionToMoveAnimalsToField))
                throw new Exception("You must specify a criteria for moving animals to the field");
                
            if (CSharpExpressionFunction.Compile(ExpressionToMoveAnimalsToField, Node, out IBooleanFunction function, out string errorMessages))
                expressionMoveAnimalsToField = function;
            else
                throw new Exception(errorMessages);
                        
            if (string.IsNullOrEmpty(ExpressionToMoveAnimalsToFeedlot))
                throw new Exception("You must specify a criteria for moving animals to the feedlot");
            if (CSharpExpressionFunction.Compile(ExpressionToMoveAnimalsToFeedlot, Node, out IBooleanFunction function2, out string errorMessages2))
                expressionMoveAnimalsToFeedlot = function2;
            else
                throw new Exception(errorMessages2);

            CurrentLocation = "";
        }



        // ============================================================
        // Management that happens every day.
        // ============================================================
        [EventSubscribe("DoManagement")]
        private void OnDoManagement(object sender, EventArgs e)
        {
            EventName = string.Empty;

            // Buy animals
            if (Buying && DateUtilities.DatesAreEqual(BuyDate, clock.Today))
            {
                var purchase = new StockBuy();
                purchase.Genotype = Genotype;   // "small merino"
                purchase.Number = NumAntoBuy;
                purchase.Sex = Sex;               // "wethers"
                purchase.Age = BuyAge;
                purchase.Weight = BuyWeight;
                purchase.Lactating = BuyLactating;
                Animals.Buy(purchase);
                Animals.Move("Feedlot");
                EventName = NumAntoBuy + " animals bought";

                CurrentLocation = "Feedlot";
            }

            // Sell animals
            if (SellingEnabled && DateUtilities.WithinDates(SaleFirstDate, clock.Today, SaleLastDate))
            { 
                if (SellPolicy == SellPolicyType.PercentageHerdWhenAverageWeightGreaterThan || 
                    SellPolicy == SellPolicyType.PercentageHerdWhenAverageAgeGreaterThan)
                {
                    bool doSell = false;
                    if (SellPolicy == SellPolicyType.Date)
                        doSell = true;
                    else if (SellPolicy == SellPolicyType.PercentageHerdWhenAverageWeightGreaterThan && Animals.WeightAll >= SaleWeight)
                        doSell = true;
                    else if (SellPolicy == SellPolicyType.PercentageHerdWhenAverageAgeGreaterThan && Animals.AgeMonthsAll >= SaleAge)
                        doSell = true;

                    if (doSell)
                    {
                        NumberSold = Convert.ToInt32(Animals.NumberAll * SalePercentAnimals / 100.0);
                        Animals.Sell(NumberSold);
                        EventName = NumberSold + " animals sold";
                    }
                }
                else
                {
                    IEnumerable<AnimalGroup> animalsToSell = null;
                    if (SellPolicy == SellPolicyType.CulledForAge)
                    {
                        // split older animals into a new group
                        animalsToSell = Animals.SplitByAge(Convert.ToInt32(SaleAge * 30)); // months to days
                    }
                    else if (SellPolicy == SellPolicyType.CulledForWeight)
                    {
                        // split heavier animals into a new group
                        animalsToSell = Animals.SplitByWeight(SaleWeight);
                    }
                    else if (SellPolicy == SellPolicyType.SellYoung)
                    {
                        // split young (offspring) into new groups
                        animalsToSell = Animals.SplitByYoung();
                    }
                    if (animalsToSell != null)
                    {
                        var numberSellableAnimals = animalsToSell.Sum(g => g.NoAnimals);
                        var numberAnimalsToSell = Convert.ToInt32(numberSellableAnimals * SalePercentAnimals / 100.0);
                        if (numberAnimalsToSell > 0)
                            Animals.Sell(numberAnimalsToSell, animalsToSell);
                    }
                }
            }


            // Determine whether the animals are in the feedlot.
            bool animalsAreInFeedlot = Animals.AnimalGroups.FirstOrDefault(group => group.PaddOccupied.Name == "Feedlot") != null;
            bool inGrazingWindow = DateUtilities.WithinDates(GrazingWindowStartDate, clock.Today, GrazingWindowEndDate);

            if (animalsAreInFeedlot)
            {
                   // Animals are in feedlot. Determine if they can be moved to paddock.
                if (inGrazingWindow && expressionMoveAnimalsToField.Value())
                {
                    Animals.Move(PaddockToMoveAnimalsTo.Name);
                    EventName = "Animals moved to paddock";
                    CurrentLocation = "Paddock";
                }
            }
            else
            {
                // Animals are in paddock. Determine if they need to be moved to feedlot.
                if (!inGrazingWindow || expressionMoveAnimalsToFeedlot.Value())
                {
                    Animals.Move("Feedlot");
                    CurrentLocation = "Feedlot";
                    EventName = "Animals moved to feedlot";
                }
            }

            // Shear all animals on specified date
            if (DateUtilities.DatesEqual(ShearDate, clock.Today))
            {
                Animals.Shear(shearAdults: true, shearYoung: true);
                EventName = "Animals shorn";
            }
        }
    }
}
```
      Manager ManageSupplement
        FeedlotZone = [Feedlot]
        SupplementAmount = 0.5
        SupplementType = wheat, crushed
```csharp
using APSIM.Shared.Utilities;
using Models.GrazPlan;
using Models.Utilities;
using Models.Soils;
using Models.Soils.Nutrients;
using Models.PMF;
using Models.Core;
using System;
using System.Linq;

namespace Models
{
    [Description(
    "<b>Supplement store management.</b>" +
    "<li>When animals are in feedlot, they are fed a set amount each day.</li>" +
    "<li>Will restock the supplement store when the store reaches a minimum level.</li>"
    )]
    [Serializable]
    public class ManageSupplement : Model
    {
        [Link] Clock clock;
        [Link] Stock animals;
        [Link] Supplement supplement;

        [Description("Name of zone representing the feedlot")]
        [Display(Type=DisplayType.Model, ModelType=typeof(Zone))]
        public IModel FeedlotZone { get; set; }

        [Description("The amount of suppliment to feed each animal each day (kg)")]
        public double SupplementAmount { get; set; }

        [Description("The type of suppliment to feed the animals")]
        public string SupplementType { get; set; }

        // ============================================================
        // Called every day to perform management actions
        // ============================================================
        [EventSubscribe("DoManagement")]
        private void OnDoManagement(object sender, EventArgs e)
        {
            // Determine how many animals are in feedlot.
            var animalGroupsInFeedlot = animals.AnimalGroups.Where(group => group.PaddOccupied.Name == FeedlotZone.Name);
            var totalNumAnimalsInFeedlot = animalGroupsInFeedlot.Sum(group => group.NoAnimals);

            // If there are animals in feedlot then feed them.
            if (totalNumAnimalsInFeedlot > 0)
                supplement.Feed(SupplementType, SupplementAmount * totalNumAnimalsInFeedlot, FeedlotZone.Name);     

            // Restock the supplement store if amount falls below 500 kg/ha
            if (supplement.Stores[1].Stored <= 500)       
                supplement.Buy(5000, SupplementType);
        }
    }
}
```
      Report ReportSupplement: EventNames=[Clock].EndOfDay
        VariableNames:
          [Clock].Today
          [Stock].Paddock as StockLocation
          [Stock].NumberAll
          [stock].IntakeAll.Weight as Intake //(kg)
          [Supplement].Name
          [Supplement].stores[2].Stored as SupplementStored // (kg)
          [Stock].SuppIntakeAll.Weight as SupplementIntake //(kg)
          [stock].SuppEaten as TotalSuppIntake //(kg)
          [stock].SuppIntake
      Report ReportStock: EventNames=[Clock].EndOfDay
        VariableNames:
          [Clock].Today
          [Stock].Paddock
          [Stock].Number as No_sheep
          [Stock].NumberAll
          [Stock].NumberAll / [WheatSheep].Area as Stockrate //(sheep/ha)
          [Stock].Weight as SheepWeight // (kg)
          [Stock].Age/30.4 as SheepAge //(month)
          [Stock].NoGroups
      Report ReportBiomass: EventNames=[Clock].EndOfDay
        VariableNames:
          [Clock].Today
          [WheatSheep].Wheat.AboveGround.Wt*10 as TotalBiomass
          [WheatSheep].Wheat.Grain.Wt*10 as TotalYield
          [WheatNotGrazed].Wheat.AboveGround.Wt*10 as TotalBiomassUngrazed
          [WheatNotGrazed].Wheat.Grain.Wt*10 as TotalYieldUngrazed
          [WheatSheep].Wheat.Phenology.Zadok.Stage as Zadok
      Zone WheatSheep: Area=1; Slope=0; AspectAngle=0; Altitude=50
        Fertiliser
        Soil: ASCOrder=Podzolic; SoilType=?; Site=Canberra; NearestTown=Canberra; Region=Gungahlin District; State=Australian Capital Territory; Country=Australia; ApsoilNumber=580-YP; Latitude=-35.201; Longitude=149.082
          DataSource=YP. Ginnenderra Experiment Station (GES). Data provided by James Hunt, based on measurements by John Kirkegaard, characterisation done by Julianne Lilley. Ginnenderra Experiment Station
          Physical
            Thickness  BD    AirDry  LL15   DUL   SAT
            100        1.42  0.04    0.059  0.21  0.408
            100        1.42  0.04    0.064  0.21  0.408
            200        1.48  0.05    0.085  0.21  0.427
            100        1.48  0.06    0.114  0.21  0.427
            200        1.48  0.08    0.13   0.21  0.427
            100        1.48  0.08    0.137  0.21  0.427
            200        1.48  0.09    0.141  0.21  0.427
            300        1.48  0.11    0.15   0.21  0.427
            300        1.48  0.11    0.161  0.21  0.427
            200        1.48  0.11    0.174  0.21  0.427
            200        1.48  0.11    0.174  0.21  0.427
            SoilCrop WheatSoil
              LL=[0.059, 0.064, 0.085, 0.114, 0.13, 0.137, 0.141, 0.15, 0.161, 0.174, 0.174]
              KL=[0.08, 0.08, 0.06, 0.05, 0.04, 0.03, 0.03, 0.02, 0.02, 0.01, 0.01]
              XF=[1, 1, 1, 1, 1, 1, 1, 1, 0.7, 0.4, 0]
          WaterBalance SoilWater: SummerDate=1-Nov; SummerU=6; SummerCona=2; WinterDate=1-Apr; WinterU=2; WinterCona=2; DiffusConst=88; DiffusSlope=35.4; Salb=0.13; CN2Bare=72; CNRed=20; CNCov=0.8; PSIDul=-100; Thickness=[100, 100, 200, 100, 200, 100, 200, 300, 300, 200, 200]; SWCON=[0.8, 0.8, 0.8, 0.8, 0.8, 0.8, 0.8, 0.8, 0.6, 0.6, 0.6]
          Organic: FOMCNRatio=80; CarbonUnits=Total
            Thickness  Carbon  SoilCNRatio  FBiom  FInert  FOM
            100        2.2     10           0.06   0       671.213
            100        0.5     10           0.05   0       577.718
            200        0.3     10           0.03   0.3     427.984
            100        0.2     10           0.02   0.4     368.37
            200        0.2     10           0.02   0.5     272.895
            100        0.15    10           0.01   0.6     234.883
            200        0.15    10           0.01   0.8     174.005
            300        0.1     10           0.01   0.9     110.951
            300        0.08    10           0.01   1       70.7453
            200        0.06    10           0.01   1       52.4094
            200        0.04    10           0.01   1       38.8259
          Chemical: Thickness=[100, 100, 200, 100, 200, 100, 200, 300, 300, 200, 200]; PH=[5.1, 5.1, 5.3, 5.3, 5.9, 5.9, 6.4, 6.4, 6.8, 6.8, 6.8]; PHUnits=Water
          Water: Thickness=[100, 100, 200, 100, 200, 100, 200, 300, 300, 200, 200]; FilledFromTop=true
            InitialValues=[0.21, 0.21, 0.21, 0.21, 0.21, 0.21, 0.21, 0.21, 0.21, 0.21, 0.21]
          Nutrient
          Solute NO3: Thickness=[100, 100, 200, 100, 200, 100, 200, 300, 300, 200, 200]; InitialValuesUnits=ppm; WaterTableConcentration=0; D0=0; DepthConstant=0; MaxDepthSoluteAccessible=0; RunoffEffectivenessAtMovingSolute=0; MaxEffectiveRunoff=0
            InitialValues=[0.377074, 0.377074, 0.377074, 0.377074, 0.377074, 0.377074, 0.377074, 0.377074, 0.377074, 0.377074, 1]
          Solute NH4: Thickness=[100, 100, 200, 100, 200, 100, 200, 300, 300, 200, 200]; InitialValuesUnits=ppm; WaterTableConcentration=0; D0=0; DepthConstant=0; MaxDepthSoluteAccessible=0; RunoffEffectivenessAtMovingSolute=0; MaxEffectiveRunoff=0
            InitialValues=[0.0377074, 0.0377074, 0.0377074, 0.0377074, 0.0377074, 0.0377074, 0.0377074, 0.0377074, 0.0377074, 0.0377074, 0.2]
          Solute Urea: Thickness=[100, 100, 200, 100, 200, 100, 200, 300, 300, 200, 200]; InitialValues=[0, 0, 0, 0, 0, 0, 0, 0, 0, 0, 0]; InitialValuesUnits=kg/ha; WaterTableConcentration=0; D0=0; DepthConstant=0; MaxDepthSoluteAccessible=0; RunoffEffectivenessAtMovingSolute=0; MaxEffectiveRunoff=0
          SoilTemperature Temperature: InteractionsPerDay=8
        SurfaceOrganicMatter: InitialResidueName=wheat_stubble; InitialResidueType=wheat; InitialResidueMass=500; InitialStandingFraction=0; InitialCPR=0; InitialCNR=100
        Plant Wheat
        MicroClimate: a_interception=0; b_interception=1; c_interception=0; d_interception=0; SoilHeatFluxFraction=0.4; MinimumHeightDiffForNewLayer=0; NightInterceptionFraction=0.5; ReferenceHeight=2
        Manager SowingRule
          StartDate = 1-mar
          EndDate = 30-mar
          MinESW = 0
          MinRain = 0
          RainDays = 0
          CultivarName = MacKellar
          SowingDepth = 30
          RowSpacing = 180
          Population = 200
```csharp
using APSIM.Numerics;
using Models.Climate;
using System;
using Models.Core;
using Models.PMF;
using Models.Soils.Nutrients;
using Models.Soils;
using Models.Utilities;
using APSIM.Shared.Utilities;
using Models.Interfaces;

namespace Models
{
    [Serializable]
    public class Script : Model
    {
        [Link] private Clock Clock;
        [Link] private Fertiliser Fertiliser;
        [Link] private Summary Summary;
        [Link] private Plant Wheat;
        [Link] private Soil Soil;
        private Accumulator accumulatedRain;
        [Link]
        private ISoilWater waterBalance;
        
        [Description("Start of sowing window (d-mmm)")]
        public string StartDate { get; set;}
        [Description("End of sowing window (d-mmm)")]
        public string EndDate { get; set;}
        [Description("Minimum extractable soil water for sowing (mm)")]
        public double MinESW { get; set;}
        [Description("Accumulated rainfall required for sowing (mm)")]
        public double MinRain { get; set;}
        [Description("Duration of rainfall accumulation (d)")]
        public int RainDays { get; set;}
        [Description("Cultivar to be sown")]
        [Display(Type=DisplayType.CultivarName)]
        public string CultivarName { get; set;}
        [Description("Sowing depth (mm)")]
        public double SowingDepth { get; set;}        
        [Description("Row spacing (mm)")]
        public double RowSpacing { get; set;}    
        [Description("Plant population (/m2)")]
        public double Population { get; set;}    
        
        
        [EventSubscribe("StartOfSimulation")]
        private void OnSimulationCommencing(object sender, EventArgs e)
        {
            accumulatedRain = new Accumulator(this, "[Weather].Rain", RainDays);
        }
        

        [EventSubscribe("DoManagement")]
        private void OnDoManagement(object sender, EventArgs e)
        {
            accumulatedRain.Update();
            
            if (DateUtilities.WithinDates(StartDate,Clock.Today,EndDate) &&
                !Wheat.IsAlive &&
                MathUtilities.Sum(waterBalance.ESW) > MinESW &&
                accumulatedRain.Sum > MinRain)
            {
               Wheat.Sow(population:Population, cultivar:CultivarName, depth:SowingDepth, rowSpacing:RowSpacing);    
            }
        
        }
        
    }
}
```
        Manager SowingFertiliser
          Amount = 130
          CropName = wheat
```csharp
using Models.Soils;
using System;
using Models.Core;
using Models.PMF;
namespace Models
{
    [Serializable]
    public class Script : Model
    {
        [Link] Clock Clock;
        [Link] Fertiliser Fertiliser;
        [Link] Summary Summary;
        
        
        [Description("Amount of fertiliser to be applied (kg/ha)")]
        public double Amount { get; set;}
        
        [Description("Crop to be fertilised")]
        public string CropName { get; set;}
        
        
        

        [EventSubscribe("Sowing")]
        private void OnSowing(object sender, EventArgs e)
        {
            Model crop = sender as Model;
            if (crop.Name.ToLower()==CropName.ToLower())
                Fertiliser.Apply(amount: Amount, type: "NO3N");
        }
        
    }
}
```
        Manager Harvest
```csharp
using APSIM.Shared.Utilities;
using Models.Utilities;
using Models.Soils;
using Models.Soils.Nutrients;
using Models.PMF;
using Models.Core;
using System;

namespace Models
{
    [Serializable]
    public class Script : Model
    {
        [Link] Plant Wheat;

        [EventSubscribe("DoManagement")]
        private void OnDoManagement(object sender, EventArgs e)
        {
            if (Wheat.IsReadyForHarvesting)
            {
               Wheat.Harvest();
               Wheat.EndCrop();    
            }
        
        }
        
    }
}
```
      Zone Feedlot: Area=10; Slope=0; AspectAngle=0; Altitude=50
        Soil: same as Sensibility.WheatSheepFeedlot.WheatSheep.Soil
        SurfaceOrganicMatter: InitialResidueName=wheat_stubble; InitialResidueType=wheat; InitialResidueMass=0; InitialStandingFraction=0; InitialCPR=0; InitialCNR=100
        MicroClimate: a_interception=0; b_interception=1; c_interception=0; d_interception=0; SoilHeatFluxFraction=0.4; MinimumHeightDiffForNewLayer=0; NightInterceptionFraction=0.5; ReferenceHeight=2
        Report: VariableNames=[Clock].Today
      Zone WheatNotGrazed: same as Sensibility.WheatSheepFeedlot.WheatSheep
    Folder TemperatureResponse
      Experiment BeefCattleTemperatureResponse
        Factors
          CompositeFactor T-10-0
            Specifications:
              [Weather].MaxT = 0
              [Weather].MinT = -10
          CompositeFactor T0-10
            Specifications:
              [Weather].MaxT = 10
              [Weather].MinT = 0
          CompositeFactor T10-20
            Specifications:
              [Weather].MaxT = 20
              [Weather].MinT = 10
          CompositeFactor T20-30
            Specifications:
              [Weather].MaxT = 30
              [Weather].MinT = 20
          CompositeFactor T30-40
            Specifications:
              [Weather].MaxT = 40
              [Weather].MinT = 30
        Simulation BeefCattleTemperatureResponseBase
          Memo Feedlot memo: same as Validation.Dairy.LUDF.Feedlot memo
          Clock: Start=2000-05-01; End=2000-12-21
          ControlledEnvironment Weather: MaxT=25; MinT=15; Rain=0; Radn=20; PanEvap=6; VP=22; Wind=3; CO2=350; AirPressure=1010; DiffuseFraction=0; Latitude=-27; Longitude=0; DayLength=10; SunRise=7; TempLag=0
          MicroClimate: a_interception=0; b_interception=1; c_interception=0; d_interception=0; SoilHeatFluxFraction=0.4; MinimumHeightDiffForNewLayer=0; NightInterceptionFraction=0.5; ReferenceHeight=2
          Supplement: same as Validation.Beef.FeedlotTests.Hersom1.Hersom1Base.Supplement
          Stock: RandSeed=9999
          Manager SetUpStock: same as Validation.Beef.FeedlotTests.Hersom1.Hersom1Base.SetUpStock
          Manager FeedStock: same as Validation.Beef.FeedlotTests.Hersom1.Hersom1Base.FeedStock
          Forages
            Parameters:
              {Name=SurfaceOrganicMatter.Residue, LiveDigestibility=0.7, DeadDigestibility=0.3, LiveFractionConsumable=1, DeadFractionConsumable=1, LiveMinimumBiomass=100, DeadMinimumBiomass=0}
          Summary SummaryFile
          Zone Feedlot: same as Validation.Dairy.LUDF.Feedlot
          Report ValidationReport: same as Validation.Beef.FeedlotTests.Hersom2.Hersom2Base.ValidationReport
      Experiment SheepTemperatureResponse
        Factors: same as Sensibility.TemperatureResponse.BeefCattleTemperatureResponse.Factors
        Simulation SheepTemperatureResponseBase
          Memo Feedlot memo: same as Validation.Dairy.LUDF.Feedlot memo
          Clock: Start=2000-05-01; End=2000-12-21
          ControlledEnvironment Weather: MaxT=25; MinT=15; Rain=0; Radn=20; PanEvap=6; VP=22; Wind=3; CO2=350; AirPressure=1010; DiffuseFraction=0; Latitude=-27; Longitude=0; DayLength=10; SunRise=7; TempLag=0
          MicroClimate: a_interception=0; b_interception=1; c_interception=0; d_interception=0; SoilHeatFluxFraction=0.4; MinimumHeightDiffForNewLayer=0; NightInterceptionFraction=0.5; ReferenceHeight=2
          Supplement: same as Validation.Beef.FeedlotTests.Hersom1.Hersom1Base.Supplement
          Stock: RandSeed=9999
          Manager SetUpStock
            Genotype = Ryeland
            Sex = Female
            Age = 13
            Weight = 30
            Pregnant = 0
            Lactating = 0
            NumYoung = 0
            NumStock = 1
```csharp
using Models.Soils;
using System;
using Models.Core;
using Models.Utilities;
using Models.GrazPlan;
using APSIM.Shared.Utilities;
using System.Diagnostics;

namespace Models
{

    [Serializable]
    public class Script : Model
    {
        [Link] Clock clock;
        [Link] Stock stock;
        [Link] Supplement supplement;
        [Link] ISummary summary;
        [Link] Simulation farm;

        public enum Genotypes
        {
            Friesian,
            Jersey,
            Angus,
            Hereford,
            Brahman,
            Chianina,
            Ryeland
            
        }

        [Separator("Stock type info, the same type of stock are brought onto the paddock at each grazing")]

        [Description("Stock: genotype (e.g. Friesian, Jersey):")] 
        public Genotypes Genotype { get; set; }

        [Description("Stock: sex (Female, Male, Castrate):")] 
        public ReproductiveType Sex { get; set; }

        [Description("Stock: age (months):")] 
        public double Age { get; set; }

        [Description("Stock: weight (kg liveweight /head):")] 
        public double Weight { get; set; }

        [Description("Stock: fertility status (0 if non-pregnant or days since conception):")] 
        public int Pregnant { get; set; }

        [Description("Stock: lactation status (0 if non-lactating or days since parturition):")]
        public int Lactating { get; set; }

        [Description("Stock: Number of young (foetuses or calves):")]
        public int NumYoung { get; set; }

        [Description("Stock: Number of animals:")]
        public int NumStock { get; set; }
        
        
        

        [EventSubscribe("StartOfSimulation")]
        private void OnStartOfSimulation(object sender, EventArgs e)
        {

                int preg = Pregnant;
                int lact = Lactating;
                int numyoung = NumYoung;

                if (stock.AnimalGroups.Count == 2)
                {
                    preg = stock.AnimalGroups[1].Pregnancy;
                    lact = stock.AnimalGroups[1].Lactation;
                    numyoung = stock.AnimalGroups[1].NoFoetuses;
                }

                StockBuy purchase = new StockBuy();
                purchase.Genotype = ReflectionUtilities.EnumToString(Genotype);
                purchase.Number = NumStock;
                purchase.Sex = Sex;
                purchase.Age = Age;       // age in months
                purchase.Weight = Weight;  // liveweight in kg
                purchase.UseTag = 1;
                purchase.MatedTo = purchase.Genotype;
                purchase.Pregnant = preg;   // days pregnant
                purchase.Lactating = lact;  // days lactating
                purchase.NumYoung = numyoung;    // cows can be bought lactating with no young

                stock.Buy(purchase);

                stock.Move("Feedlot");

            

        }
    
    }
}
```
          Manager FeedStock: same as Validation.Beef.FeedlotTests.Hersom1.Hersom1Base.FeedStock
          Forages
            Parameters:
              {Name=SurfaceOrganicMatter.Residue, LiveDigestibility=0.7, DeadDigestibility=0.3, LiveFractionConsumable=1, DeadFractionConsumable=1, LiveMinimumBiomass=100, DeadMinimumBiomass=0}
          Summary SummaryFile
          Zone Feedlot: same as Validation.Dairy.LUDF.Feedlot
          Report ValidationReport: same as Validation.Beef.FeedlotTests.Hersom2.Hersom2Base.ValidationReport
  Folder MassBalanceCheck
    Simulation MassBalanceForage
      Memo
        This simulation checks the mass balance of animal / **plant** interactions. The plant model used is a PMF Slurp model that doesn't simulate plant growth. This makes it much easier to check mass balance.

        The checks are done in the MassBalanceCalculations manager script.

        The script first calculates the amount of pasture removed:

        	PastureRemoved = StartOfDayPasture - EndOfDayPasture;

        and the weight gain of the animals on a day.

        	LiveWeightGain = EndOfDayAnimal - StartOfDayAnimal;

        It then calculates two balance terms that should be zero. The first checks that pasture removed = animal intake.

        	LostWt = PastureRemoved.Wt - Intake.Wt;

        The second checks that N in the pasture removed = excreta N + the N retained by the animal.

        	LostN = PastureRemoved.N - (Excreta.N + LiveWeightGain.N);

        A check is then made (on day 1 of the simulation) that the faeces from the animal is added to the surface organic matter (som) model:

        	if (!MathUtilities.FloatsAreEqual(animals.FaecesAll.Weight, som.Wt))
        		throw new Exception("Mass balance error: The animal faeces weight on day 1 is not equal to surface organic matter weight.");

        A check is then made (on day 1 of the simulation) that the urine from the animal is added to the soil urea pool:

        	if (!MathUtilities.FloatsAreEqual(animals.UrineNAll, MathUtilities.Sum(urea.kgha)))
        		throw new Exception("Mass balance error: The animal urine on day 1 is not equal to soil urea amount.");

        These last checks are only done on day 1 because flows in and out of SOM and Urea pools make it difficult to calculate mass balance. The assumption is that if it works on day 1 it works for all other days.
      Clock: Start=2000-01-01; End=2000-05-31
      Summary SummaryFile
      Weather: FileName=%root%/Examples/WeatherFiles/NZ_Lincoln
      SoilArbitrator
      Stock: RandSeed=9999
        GenotypeCross NZFriesianCross: DamBreed=Friesian; SireBreed=Jersey; MatureDeathRate=0; WeanerDeathRate=0; Conception=[0, 1, 0, 0]; Generation=1; SRW=550; PotFleeceWt=0; MaxFibreDiam=0; FleeceYield=0; PeakMilk=35
      Forages: same as Validation.Dairy.StockSlurp.Forages
      Supplement: SpoilageTime=0
        Stores:
          Name            Stored  IsRoughage  DMContent  DMD  MEContent  CPConc  ProtDg  PConc   SConc   EEConc  ADIP2CP  AshAlk  MaxPassage
          fodder          0       true        0.85       0    0          0       0       0       0       0       0        0       0
          wheat, crushed  500000  false       1          0.9  13.8       0.14    0.92    0.0038  0.0014  0.02    0.02     0.18    0
          silage          50000   true        1          0.7  10         0.25    0.8     0.0032  0.0024  0.02    0.06     0.6     0
      Manager GrazeForageCrop
        Genotype = NZFriesianCross
        Sex = Female
        Age = 6
        Weight = 100
        Pregnant = 0
        Lactating = 0
        YoungNumber = 0
        YoungWt = 0
        StockingRate = 1
        CurrentLocation = Paddock
        PreGrazingDM = 2800
        PostGrazingDM = 50
        MinGrazingDays = 0
        DoNoGrazingWindow = False
        NoGrazeStart = 15-jun
        NoGrazeEnd = 31-jul
        SupplementName = silage
        SupplementFirst = False
        SupplementEveryDay = 0
        SupplementOnPastureMass = 0
        TriggerPastureMass = 2100
```csharp
using Models.PMF.Interfaces;
using System.Diagnostics;
using Models.AgPasture;
using System.Linq;
using System.Collections.Generic;
using System.Collections;
using Models.Soils;
using Models.Soils.Nutrients;
using Models.PMF;
using System.Xml.Serialization;
using APSIM.Shared.Utilities;
using Models.GrazPlan;
using Models.Utilities;
using Models.Core;
using Models;
using System;

namespace Models
{

    [Serializable]
    public class Script : Model
    {
        [Link] Clock clock;
        [Link] Stock stock;
        [Link] Supplement supplement;
        [Link] List<Zone> paddocks;
        [Link] ISummary summary;
        [Link] Simulation farm;
        [Link] List<IOrganDamage> forages = null;

        private int CurrentGroupNum = 1;    // animal group number
        private int CurrentLocationNum { get; set; }

        [Separator("Stock type info, the same type of stock are brought onto the paddock at each grazing")]

        [Description("Stock: genotype (e.g. Small Merino, Angus, Friesian):")] 
        [Display(Values="GetGenotypes")]
        public string Genotype { get; set; }

        [Description("Stock: sex (Female, Male, Castrate):")] 
        public ReproductiveType Sex { get; set; }

        [Description("Stock: age (months):")] 
        public double Age { get; set; }

        [Description("Stock: weight (kg liveweight /head):")] 
        public double Weight { get; set; }

        [Description("Stock: fertility status (0 if non-pregnant or days since conception):")] 
        public int Pregnant { get; set; }

        [Description("Stock: lactation status (0 if non-lactating or days since parturition):")]
        public int Lactating { get; set; }

        [Description("Stock: number of unweaned young:")]
        public int YoungNumber { get; set; }

        [Description("Stock: weight of unweaned young:")] 
        public double YoungWt { get; set; }

        [Separator("Grazing event information")]

        [Description("Paddock stocking rate (head/ha): ")] 
        public double StockingRate { get; set; }

        [Description("Initial location of the cows (give either the paddock name or 'Away'): ")] 
        public string CurrentLocation { get; set; }

        [Description("Standing biomass at which to bring the stock into the simulation (kg DM/ha): ")] 
        public double PreGrazingDM { get; set; }

        [Description("Standing biomass at which to exit  stock from the simulation (kg DM/ha): ")] 
        public double PostGrazingDM { get; set; }

        [Description("Don't move the stock onto the crop unless there is approx. X days of grazable forage available: ")] 
        public int MinGrazingDays { get; set; }

        [Description("Implement a no-grazing window? (tick for yes): ")] 
        public bool DoNoGrazingWindow { get; set; }

        [Description("Start of the no-grazing window (dd-MMM)")] 
        public string NoGrazeStart { get; set; }

        [Description("End of the no-grazing window (dd-MMM)")] 
        public string NoGrazeEnd { get; set; }

        [Separator("Supplementary feeding")]

        [Description("Name of the supplement to feed: ")] 
        public string SupplementName { get; set; }

        [Description("Feed the supplement first (i.e. before the new forage is available to the stock)?: ")] 
        public bool SupplementFirst { get; set; }

        [Description("Amount of supplementary feeding offered every day (kg DM /head /day): ")] 
        public double SupplementEveryDay { get; set; }

        [Description("Additional amount of supplement offered when available biomass is low (kg DM /head /day): ")] 
        public double SupplementOnPastureMass { get; set; }

        [Description("Trigger biomass for above rule (kg DM /ha): ")] 
        public double TriggerPastureMass { get; set; }

        public int NumStock { get; set; }
        public bool GrazingSeasonIsOpen { get; set; } // number of cows on the whole farm
        public double HarvestableBiomass { get; set; }

        // Return a list of genotypes to the properties tab.
        public string[] GetGenotypes()
        {
            if (stock != null)
                return stock.Genotypes.Names.ToArray();
            return null;
        }

        [EventSubscribe("StartOfSimulation")]
        private void OnStartOfSimulation(object sender, EventArgs e)
        {

            //Debugger.Break();

            summary.WriteMessage(this, "Initialising the paddock information", MessageType.Diagnostic);

            NumStock = (int)(Math.Round(StockingRate * farm.Area, 0));

            if ((CurrentLocation.ToLower() != "away") && (NumStock > 0))
            {
                BuyStock();
                stock.Move(CurrentLocation);
                summary.WriteMessage(this, " The Stock have been moved to " + CurrentLocation, MessageType.Diagnostic);
            }

            summary.WriteMessage(this, "     The number of animals has been rounded to " + NumStock + " from " + (StockingRate * farm.Area), MessageType.Diagnostic);
            summary.WriteMessage(this, "     The animals will begin in " + CurrentLocation + " which is paddock number " + CurrentLocationNum + " in the simulation", MessageType.Diagnostic);
            summary.WriteMessage(this, "     The area of the whole farm is " + farm.Area + " ha", MessageType.Diagnostic);

        }

        [EventSubscribe("DoManagement")]
        private void OnDoManagement(object sender, EventArgs e)
        {
            GrazingSeasonIsOpen = true;
            if (DoNoGrazingWindow)
                GrazingSeasonIsOpen = !DateUtilities.WithinDates(NoGrazeStart, clock.Today, NoGrazeEnd);

            bool sellSomeStock = false;
            if (!GrazingSeasonIsOpen)
                sellSomeStock = true;

            // Calculate forage mass in the paddock
            HarvestableBiomass = forages.Where(forage => forage.IsAboveGround)
            						    .Sum(forage => forage.Live.Wt + forage.Dead.Wt);
            HarvestableBiomass *= 10;  // Convert to kg/ha

            if (HarvestableBiomass <= PostGrazingDM)
                sellSomeStock = true;

            if (CurrentLocation == "Away")
                sellSomeStock = false;

            double minFodder = 0.03 * MinGrazingDays * NumStock * Weight; // The 0.03 is the propostion of body mass that the stock might eat
            if (CurrentLocation == "Away" && NumStock > 0 && (HarvestableBiomass >= PreGrazingDM) && HarvestableBiomass >= (PostGrazingDM + minFodder) && GrazingSeasonIsOpen)
            {
                CurrentLocation = paddocks[0].Name;
                CurrentLocationNum = paddocks[0].Index;
                BuyStock();
                stock.Move(CurrentLocation);
                summary.WriteMessage(this, "     Buying stock ", MessageType.Diagnostic);
            }

            if (sellSomeStock)
            {
                CurrentLocation = "Away";
                CurrentLocationNum = -1;
                SellStock();
                summary.WriteMessage(this, "     Selling stock ", MessageType.Diagnostic);
            }

            if (CurrentLocation != "Away")
            {
                if (SupplementEveryDay > 0)
                {
                    double silageOnHand = supplement.Stores[2 - 1].Stored;
                    if (silageOnHand < SupplementEveryDay * stock.NumberAll)
                    {
                        supplement.Buy(SupplementEveryDay * 30.0 * stock.NumberAll, SupplementName);  // i.e. 1 months worth
                        summary.WriteMessage(this, "SupplementEveryDay: Buying " + SupplementName + " of total amount : " + (SupplementEveryDay * 90 * stock.NumberAll) + " kg DM", MessageType.Diagnostic);
                    }
                    supplement.Feed(SupplementName, SupplementEveryDay * stock.NumberAll, CurrentLocation, SupplementFirst);
                }

                if (SupplementOnPastureMass > 0 && HarvestableBiomass <= TriggerPastureMass)
                {
                    double silageOnHand = supplement.Stores[2 - 1].Stored;
                    if (silageOnHand < SupplementOnPastureMass * stock.NumberAll)
                    {
                        supplement.Buy(SupplementOnPastureMass * 30.0 * stock.NumberAll, SupplementName);  // i.e. 1 months worth
                        summary.WriteMessage(this, "SupplementOnBiomass: Buying " + SupplementName + " of total amount : " + (SupplementOnPastureMass * 90 * stock.NumberAll) + " kg DM", MessageType.Diagnostic);
                    }
                    supplement.Feed(SupplementName, SupplementOnPastureMass * stock.NumberAll, CurrentLocation, SupplementFirst);
                }
            }
        }


        public void BuyStock()
        {
            CurrentGroupNum = stock.NoGroups + 1;
            StockBuy purchase = new StockBuy();
            purchase.Genotype = Genotype;
            purchase.Number = NumStock;
            purchase.Sex = Sex;
            purchase.Age = Age;       // age in months
            purchase.Weight = Weight;  // live weight in kg
            purchase.UseTag = CurrentGroupNum + 1;
            purchase.MatedTo = purchase.Genotype;
            purchase.Pregnant = Pregnant;  // days pregnant, 0 = non pregnant, 1 = pregnant
            purchase.Lactating = Lactating;  // 0 for dry, 1 for lactating
            purchase.NumYoung = YoungNumber;
            purchase.YoungWt = YoungWt;

            stock.Buy(purchase);
        }

        public void SellStock()
        {
            int NumGroups = stock.NoGroups;

            NumGroups = stock.NoGroups;
            for (int gg = 1; gg <= NumGroups; gg++)
            {
                stock.Sell(stock.Number[gg - 1]);
            }
        }
    }
}
```
      Manager MassBalanceCalculations
```csharp
using APSIM.Numerics;
using Models.Surface;
using Models.PMF.Interfaces;
using System.Diagnostics;
using Models.AgPasture;
using System.Linq;
using System.Collections.Generic;
using System.Collections;
using Models.Soils.Nutrients;
using Models.Soils;
using Models.PMF.Organs;
using Models.PMF;
using System.Xml.Serialization;
using APSIM.Shared.Utilities;
using Models.GrazPlan;
using Models.Interfaces;
using Models.Utilities;
using Models.Core;
using Models;
using System;
using Models.Soils.Nutrients;

namespace Models
{

    [Serializable]
    public class Script : Model
    {
        [Link] Clock clock;
        [Link] IOrganDamage[] forages;
        [Link] Stock animals;
        [Link] Zone paddocks;
        [Link] ISummary summary;
        [Link] Simulation farm;
        [Link] Supplement supplement;
        [Link] SurfaceOrganicMatter som;
        [Link(ByName=true)] ISolute urea;

        public BiomassAndN StartOfDayPasture { get; set; }
        public BiomassAndN EndOfDayPasture { get; set; }
        public BiomassAndN StartOfDaySupplement { get; set; }
        public BiomassAndN EndOfDaySupplement { get; set; }
        public BiomassAndN StartOfDayAnimal { get; set; }
        public BiomassAndN EndOfDayAnimal { get; set; }
        public BiomassAndN PastureRemoved { get; set; }
        public BiomassAndN SupplementRemoved { get; set; }
        public BiomassAndN LiveWeightGain { get; set; }
        public BiomassAndN Intake { get; set; }
        public BiomassAndN Excreta { get; set; }

        public double LostN { get; set; } 
        public double LostWt { get; set; } 

        // Start of simulation
        [EventSubscribe("StartOfSimulation")]
        private void OnStart(object sender, EventArgs e)
        {
            forages = forages.Where(forage => forage.IsAboveGround && !(forage is SurfaceOrganicMatter)).ToArray();
        }

        // Start of day
        [EventSubscribe("StartOfDay")]
        private void OnDoManagement(object sender, EventArgs e)
        {
            StartOfDaySupplement = new BiomassAndN() 
            { 
                Wt = supplement.Stores.Sum(supp => supp.Stored),
                N = supplement.Stores[1].CPConc / 6.25 * supplement.Stores.Sum(supp => supp.Stored),
            };
            StartOfDayPasture = new BiomassAndN() 
            { 
                Wt = forages.Sum(forage => forage.Live.Wt * 10),
                N = forages.Sum(forage => forage.Live.N * 10),
            };
            StartOfDayAnimal = new BiomassAndN() 
            { 
                Wt = animals.WeightAll,
                N = 0,
            };
        }

        // End of day
        [EventSubscribe("DoManagementCalculations")]
        private void OnDoManagementCalculations(object sender, EventArgs e)
        {
            EndOfDaySupplement = new BiomassAndN() 
            { 
                Wt = supplement.Stores.Sum(supp => supp.Stored),
                N = supplement.Stores[1].CPConc / 6.25 * supplement.Stores.Sum(supp => supp.Stored),
            };
            EndOfDayPasture = new BiomassAndN() 
            { 
                Wt = forages.Sum(forage => forage.Live.Wt * 10),
                N = forages.Sum(forage => forage.Live.N * 10),
            };
            EndOfDayAnimal = new BiomassAndN() 
            { 
                Wt = animals.WeightAll,
                N = animals.RetainedNAll,    // kg/d
            };

            Intake = new BiomassAndN()
            {
                Wt = animals.IntakeAll.Weight,
                N = animals.IntakeAll.N,
            };
            Excreta = new BiomassAndN()
            {
                Wt = animals.FaecesAll.Weight,
                N = animals.FaecesAll.N + animals.UrineNAll,
            };

            PastureRemoved = StartOfDayPasture - EndOfDayPasture;
            SupplementRemoved = StartOfDaySupplement - EndOfDaySupplement;
            LiveWeightGain = EndOfDayAnimal - StartOfDayAnimal;

            // balance calculations
            LostWt = PastureRemoved.Wt - Intake.Wt; 
            LostN = PastureRemoved.N - (Excreta.N + LiveWeightGain.N);  

            if (!MathUtilities.FloatsAreEqual(LostWt, 0))
                throw new Exception("Mass balance error: Forage mass removed is not equal to animal intake.");
            if (!MathUtilities.FloatsAreEqual(LostN, 0))
                throw new Exception("Mass balance error: N balance error.");

            if (clock.Today.DayOfYear == 1)
            {
                if (!MathUtilities.FloatsAreEqual(animals.FaecesAll.Weight, som.Wt))
                    throw new Exception("Mass balance error: The animal faeces weight on day 1 is not equal to surface organic matter weight.");
                if (!MathUtilities.FloatsAreEqual(animals.UrineNAll, MathUtilities.Sum(urea.kgha)))
                    throw new Exception("Mass balance error: The animal urine on day 1 is not equal to soil urea amount.");
            }

        }
    }

    // Helper class for containing a mass and and N concentration.
    [Serializable]
    public class BiomassAndN
    {
        public double Wt { get; set; }
        public double N { get; set; }
        public static BiomassAndN operator +(BiomassAndN a, BiomassAndN b)
        {
            return new BiomassAndN()
            {
                Wt = a.Wt + b.Wt,
                N = a.N + b.N,
            };

        }
        public static BiomassAndN operator -(BiomassAndN a, BiomassAndN b)
        {
            return new BiomassAndN()
            {
                Wt = a.Wt - b.Wt,
                N = a.N - b.N,
            };
        }
    }
}
```
      Report: EventNames=[Clock].EndOfDay
        VariableNames:
          [Clock].Today as Date
          [Stock].NumberAll
          [Stock].WeightAll
          [MassBalanceCalculations].Script.SupplementRemoved as SupplementRemoved
          [MassBalanceCalculations].Script.PastureRemoved as PastureRemoved
          [MassBalanceCalculations].Script.Intake as Intake
          [MassBalanceCalculations].Script.Excreta as Excreta
          [MassBalanceCalculations].Script.LiveWeightGain as LiveWeightGain
          [MassBalanceCalculations].Script.LostN as LostN
          [MassBalanceCalculations].Script.LostWt as LostWt
          [SurfaceOrganicMatter].Wt
          [SurfaceOrganicMatter].N
          [Stock].FaecesAll
          [Stock].UrineNAll
          sum([Urea].kgha) as SoilUrea
      Zone Paddock: Area=1; Slope=0; AspectAngle=0; Altitude=50
        Manager SlurpSetup
```csharp
using APSIM.Core;
using System.Linq;
using System;
using Models.Core;
using Models.PMF;
using Models.PMF.Organs;
using System.Data;
using Models.Soils;
    
namespace Models
{
    [Serializable]
    public class Script : Model, IStructureDependency
    {
        [Link] private Plant slurp;
        
        public IStructure Structure { private get; set; }

        [EventSubscribe("StartOfSimulation")]
        private void OnStartOfSimulation(object sender, EventArgs e)
        {
            var slurpLeaf =   Structure.FindChild<SimpleLeaf>(relativeTo: (INodeModel)slurp);

            double wt = 500; // g/m2
            slurpLeaf.Live.StructuralWt = wt;
            slurpLeaf.Live.StorageWt = 0;
            slurpLeaf.Live.StructuralN = wt * slurpLeaf.MinNConc;
            slurpLeaf.Live.StorageN = wt * slurpLeaf.MaxNConc - slurpLeaf.Live.StructuralN;
        }
    }
}
```
        Plant Slurp
        SurfaceOrganicMatter: InitialResidueName=wheat_stubble; InitialResidueType=wheat; InitialResidueMass=0; InitialStandingFraction=0; InitialCPR=0; InitialCNR=100
        Soil: same as Validation.Dairy.StockSlurp.Paddock.Soil
    Simulation MassBalanceFeedlot
      Memo
        This simulation checks the mass balance of animal / **supplement** interactions. The checks are done in the MassBalanceCalculations manager script.

        The script first calculates the amount of pasture removed:

        	PastureRemoved = StartOfDayPasture - EndOfDayPasture;

        and the weight gain of the animals on a day.

        	LiveWeightGain = EndOfDayAnimal - StartOfDayAnimal;

        It then calculates two balance terms that should be zero. The first checks that supplement removed = animal intake.

        	LostWt = SupplementRemoved.Wt - Intake.Wt;

        The second checks that N in the pasture removed = excreta N + the N retained by the animal.

        	LostN = PastureRemoved.N - (Excreta.N + LiveWeightGain.N);

        A check is then made (on day 1 of the simulation) that the faeces from the animal is added to the surface organic matter (som) model:

        	if (!MathUtilities.FloatsAreEqual(animals.FaecesAll.Weight, som.Wt))
        		throw new Exception("Mass balance error: The animal faeces weight on day 1 is not equal to surface organic matter weight.");

        A check is then made (on day 1 of the simulation) that the urine from the animal is added to the soil urea pool:

        	if (!MathUtilities.FloatsAreEqual(animals.UrineNAll, MathUtilities.Sum(urea.kgha)))
        		throw new Exception("Mass balance error: The animal urine on day 1 is not equal to soil urea amount.");

        These last checks are only done on day 1 because flows in and out of SOM and Urea pools make it difficult to calculate mass balance. The assumption is that if it works on day 1 it works for all other days.
      Clock: Start=2000-01-01; End=2000-05-31
      Summary SummaryFile
      Weather: FileName=%root%/Examples/WeatherFiles/NZ_Lincoln
      SoilArbitrator
      Stock: same as MassBalanceCheck.MassBalanceForage.Stock
      Forages
        Parameters:
          {Name=SurfaceOrganicMatter.Residue, LiveDigestibility=0, DeadDigestibility=0, LiveFractionConsumable=0, DeadFractionConsumable=0, LiveMinimumBiomass=0, DeadMinimumBiomass=0}
      Supplement: SpoilageTime=0
        Stores:
          Name    Stored  IsRoughage  DMContent  DMD  MEContent  CPConc  ProtDg  PConc   SConc   EEConc  ADIP2CP  AshAlk  MaxPassage
          fodder  0       true        0.85       0    0          0       0       0       0       0       0        0       0
          silage  50000   true        1          0.7  10         0.25    0.8     0.0032  0.0024  0.02    0.06     0.6     0
      Manager ManageStock
```csharp
using Models.Soils;
using APSIM.Shared.Utilities;
using Models.GrazPlan;
using Models.Utilities;
using Models.Core;
using System;
using System.Linq;

namespace Models
{
    [Serializable]
    public class Script : Model
    {
        [Link] Clock Calendar;
        [Link] Stock Animals;
        [Link] Supplement Feed;

        private double sale_age = 3.0;
        private int no_to_buy;
        private int group_count;
        private int g;
        
        [EventSubscribe("DoManagement")]
        private void OnDoManagement(object sender, EventArgs e)
        {
            // purchase animals annually
            if (DateUtilities.DatesEqual("01 JAN", Calendar.Today))
            {
                g = Animals.NoGroups + 1;
                no_to_buy = 1;
                
                StockBuy purchase = new StockBuy();
                purchase.Genotype = "small merino";
                purchase.Number = no_to_buy;
                purchase.Sex = ReproductiveType.Castrate;
                purchase.Age = 12;
                purchase.Weight = 45.0;
                purchase.UseTag = g + 1;
                
                Animals.Buy(purchase);
                Animals.Move("Feedlot");
            }

            // Shearing all animals
            if (DateUtilities.DatesEqual("15 Dec", Calendar.Today))
            {
                Animals.Shear(shearAdults:true, shearYoung:true);
            }
            
            // Sell cast for age animals
            if (DateUtilities.DatesEqual("20 Dec", Calendar.Today))
            {
                group_count = Animals.NoGroups;
                for (g = 1; g <= group_count; g++)
                    Animals.SplitByAge(Convert.ToInt32(365 * sale_age));                   // older animals into a new group

                foreach (var animalGroup in Animals.AnimalGroups)
                {
                    if (animalGroup.AgeDays >= 365 * sale_age)
                        Animals.Sell(animalGroup.NoAnimals, animalGroup);
                }
            }
            
            if (Animals.NumberAll > 0)
                Feed.Feed("silage", 0.8 * Animals.NumberAll, "Feedlot");
        }
    }
}
```
      Manager MassBalanceCalculations
```csharp
using APSIM.Numerics;
using Models.Surface;
using Models.PMF.Interfaces;
using System.Diagnostics;
using Models.AgPasture;
using System.Linq;
using System.Collections.Generic;
using System.Collections;
using Models.Soils.Nutrients;
using Models.Soils;
using Models.PMF.Organs;
using Models.PMF;
using System.Xml.Serialization;
using APSIM.Shared.Utilities;
using Models.GrazPlan;
using Models.Interfaces;
using Models.Utilities;
using Models.Core;
using Models;
using System;
using Models.Soils.Nutrients;

namespace Models
{

    [Serializable]
    public class Script : Model
    {
        [Link] Clock clock;
        [Link] IOrganDamage[] forages;
        [Link] Stock animals;
        [Link] Zone paddocks;
        [Link] ISummary summary;
        [Link] Simulation farm;
        [Link] Supplement supplement;
        [Link] SurfaceOrganicMatter som;
        [Link(ByName=true)] ISolute urea;

        public BiomassAndN StartOfDayPasture { get; set; }
        public BiomassAndN EndOfDayPasture { get; set; }
        public BiomassAndN StartOfDaySupplement { get; set; }
        public BiomassAndN EndOfDaySupplement { get; set; }
        public BiomassAndN StartOfDayAnimal { get; set; }
        public BiomassAndN EndOfDayAnimal { get; set; }
        public BiomassAndN PastureRemoved { get; set; }
        public BiomassAndN SupplementRemoved { get; set; }
        public BiomassAndN LiveWeightGain { get; set; }
        public BiomassAndN Intake { get; set; }
        public BiomassAndN Excreta { get; set; }
       
        public double LostN { get; set; } 
        public double LostWt { get; set; } 



        // Start of simulation
        [EventSubscribe("StartOfSimulation")]
        private void OnStart(object sender, EventArgs e)
        {
            forages = forages.Where(forage => forage.IsAboveGround && !(forage is SurfaceOrganicMatter)).ToArray();
        }

        // Start of day
        [EventSubscribe("StartOfDay")]
        private void OnDoManagement(object sender, EventArgs e)
        {
            StartOfDaySupplement = new BiomassAndN() 
            { 
                Wt = supplement.Stores.Sum(supp => supp.Stored),
                N = supplement.Stores[1].CPConc / 6.25 * supplement.Stores.Sum(supp => supp.Stored),
            };
            StartOfDayPasture = new BiomassAndN() 
            { 
                Wt = forages.Sum(forage => forage.Live.Wt * 10),
                N = forages.Sum(forage => forage.Live.N * 10),
            };
            StartOfDayAnimal = new BiomassAndN() 
            { 
                Wt = animals.WeightAll,
                N = 0,
            };
        }

        // End of day
        [EventSubscribe("DoManagementCalculations")]
        private void OnDoManagementCalculations(object sender, EventArgs e)
        {
            EndOfDaySupplement = new BiomassAndN() 
            { 
                Wt = supplement.Stores.Sum(supp => supp.Stored),
                N = supplement.Stores[1].CPConc / 6.25 * supplement.Stores.Sum(supp => supp.Stored),
            };
            EndOfDayPasture = new BiomassAndN() 
            { 
                Wt = forages.Sum(forage => forage.Live.Wt * 10),
                N = forages.Sum(forage => forage.Live.N * 10),
            };
            EndOfDayAnimal = new BiomassAndN() 
            { 
                Wt = animals.WeightAll,
                N = animals.RetainedNAll,   // kg/d
            };

            Intake = new BiomassAndN()
            {
                Wt = animals.IntakeAll.Weight,
                N = animals.IntakeAll.N,
            };
            Excreta = new BiomassAndN()
            {
                Wt = animals.FaecesAll.Weight,
                N = animals.FaecesAll.N + animals.UrineNAll,
            };

            PastureRemoved = StartOfDayPasture - EndOfDayPasture;
            SupplementRemoved = StartOfDaySupplement - EndOfDaySupplement;
            LiveWeightGain = EndOfDayAnimal - StartOfDayAnimal;
            //  do a balance calc
            LostN = SupplementRemoved.N - (Excreta.N + LiveWeightGain.N);  
            LostWt = SupplementRemoved.Wt - animals.IntakeAll.Weight; 

            if (!MathUtilities.FloatsAreEqual(LostWt, 0))
                throw new Exception("Mass balance between supplement and stock has not been maintained: " + LostWt.ToString());
            if (!MathUtilities.FloatsAreEqual(LostN, 0))
                throw new Exception("Nitrogen mass balance between supplement and stock has not been maintained: " + LostN.ToString());

            if (clock.Today.DayOfYear == 1)
            {
                if (!MathUtilities.FloatsAreEqual(animals.FaecesAll.Weight, som.Wt))
                    throw new Exception("Mass balance error: The animal faeces weight on day 1 is not equal to surface organic matter weight.");
                if (!MathUtilities.FloatsAreEqual(animals.UrineNAll, MathUtilities.Sum(urea.kgha)))
                    throw new Exception("Mass balance error: The animal urine on day 1 is not equal to soil urea amount.");
            }
        }
    }

    // Helper class for containing a mass and and N concentration.
    [Serializable]
    public class BiomassAndN
    {
        public double Wt { get; set; }
        public double N { get; set; }
        public static BiomassAndN operator +(BiomassAndN a, BiomassAndN b)
        {
            return new BiomassAndN()
            {
                Wt = a.Wt + b.Wt,
                N = a.N + b.N,
            };

        }
        public static BiomassAndN operator -(BiomassAndN a, BiomassAndN b)
        {
            return new BiomassAndN()
            {
                Wt = a.Wt - b.Wt,
                N = a.N - b.N,
            };
        }
    }
}
```
      Report: same as MassBalanceCheck.MassBalanceForage.Report
      Zone Feedlot: Area=1; Slope=0; AspectAngle=0; Altitude=50
        SurfaceOrganicMatter: InitialResidueName=wheat_stubble; InitialResidueType=wheat; InitialResidueMass=0; InitialStandingFraction=0; InitialCPR=0; InitialCNR=100
        Soil: same as Validation.Dairy.StockSlurp.Paddock.Soil
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